// SBML level 2 version 1

model MODEL1203220000()
  // Mol2013 - Leishmania macrophage signaling network
  // Created by The MathWorks, Inc. SimBiology tool, Version 3.3
  // biomodels.db:MODEL1203220000
  // hasTaxon taxonomy:5658
  // isVersionOf GO:0051707 DOID:9065

  // Compartments:
  compartment cytoplasm = 1;
  compartment nucleus = 1;

  // Species:
  substanceOnly species CD14 in cytoplasm = 0.9;  // substance in MWBUILTINPREFIX_nano_MWBUILTINUNIT_mole
  substanceOnly species TLR4 in cytoplasm = 0.38;  // substance in MWBUILTINPREFIX_nano_MWBUILTINUNIT_mole
  substanceOnly species MyD88 in cytoplasm = 0.56;  // substance in MWBUILTINPREFIX_nano_MWBUILTINUNIT_mole
  substanceOnly species IRAK4_1 in cytoplasm = 0.6; IRAK4_1 is "IRAK4/1";  // substance in MWBUILTINPREFIX_nano_MWBUILTINUNIT_mole
  substanceOnly species TNF in cytoplasm = 0.8;  // substance in MWBUILTINPREFIX_nano_MWBUILTINUNIT_mole
  substanceOnly species TNFR in cytoplasm = 0.61;  // substance in MWBUILTINPREFIX_nano_MWBUILTINUNIT_mole
  substanceOnly species TRAF_6 in cytoplasm = 0.16; TRAF_6 is "TRAF-6";  // substance in MWBUILTINPREFIX_nano_MWBUILTINUNIT_mole
  substanceOnly species TRADD in cytoplasm = 0.41;  // substance in MWBUILTINPREFIX_nano_MWBUILTINUNIT_mole
  substanceOnly species CASP in cytoplasm = 0.42;  // substance in MWBUILTINPREFIX_nano_MWBUILTINUNIT_mole
  substanceOnly species IL_1 in cytoplasm = 0.78; IL_1 is "IL-1";  // substance in MWBUILTINPREFIX_nano_MWBUILTINUNIT_mole
  substanceOnly species IL_1R in cytoplasm = 0.53; IL_1R is "IL-1R";  // substance in MWBUILTINPREFIX_nano_MWBUILTINUNIT_mole
  substanceOnly species TRAF_2 in cytoplasm = 0.39; TRAF_2 is "TRAF-2";  // substance in MWBUILTINPREFIX_nano_MWBUILTINUNIT_mole
  substanceOnly species ECSIT in cytoplasm = 0.36;  // substance in MWBUILTINPREFIX_nano_MWBUILTINUNIT_mole
  substanceOnly species TAB2 in cytoplasm = 0.46;  // substance in MWBUILTINPREFIX_nano_MWBUILTINUNIT_mole
  substanceOnly species TAK1 in cytoplasm = 0.56;  // substance in MWBUILTINPREFIX_nano_MWBUILTINUNIT_mole
  substanceOnly species NIK in cytoplasm = 0.56;  // substance in MWBUILTINPREFIX_nano_MWBUILTINUNIT_mole
  substanceOnly species MKK4_7 in cytoplasm = 0.26; MKK4_7 is "MKK4/7";  // substance in MWBUILTINPREFIX_nano_MWBUILTINUNIT_mole
  substanceOnly species MKK3_6 in cytoplasm = 0.6551; MKK3_6 is "MKK3/6";  // substance in MWBUILTINPREFIX_nano_MWBUILTINUNIT_mole
  substanceOnly species RIP in cytoplasm = 0.68;  // substance in MWBUILTINPREFIX_nano_MWBUILTINUNIT_mole
  substanceOnly species ASK1 in cytoplasm = 0.6271;  // substance in MWBUILTINPREFIX_nano_MWBUILTINUNIT_mole
  substanceOnly species MAP4K5 in cytoplasm = 0.1;  // substance in MWBUILTINPREFIX_nano_MWBUILTINUNIT_mole
  substanceOnly species p38_cytoplasm in cytoplasm = 0.36;  // substance in MWBUILTINPREFIX_nano_MWBUILTINUNIT_mole
  substanceOnly species JNK_cytoplasm in cytoplasm = 0.45;  // substance in MWBUILTINPREFIX_nano_MWBUILTINUNIT_mole
  substanceOnly species IKK in cytoplasm = 0.32;  // substance in MWBUILTINPREFIX_nano_MWBUILTINUNIT_mole
  substanceOnly species IkB_NF_kappa_B in cytoplasm = 0.56; IkB_NF_kappa_B is "IkB/NF-kappa B";  // substance in MWBUILTINPREFIX_nano_MWBUILTINUNIT_mole
  substanceOnly species MAPK3K8_cytoplasm in cytoplasm = 0.66;  // substance in MWBUILTINPREFIX_nano_MWBUILTINUNIT_mole
  substanceOnly species PAK_1_2 in cytoplasm = 0.46; PAK_1_2 is "PAK-1/2";  // substance in MWBUILTINPREFIX_nano_MWBUILTINUNIT_mole
  substanceOnly species MEKK1 in cytoplasm = 0.4;  // substance in MWBUILTINPREFIX_nano_MWBUILTINUNIT_mole
  substanceOnly species EGF in cytoplasm = 0.78;  // substance in MWBUILTINPREFIX_nano_MWBUILTINUNIT_mole
  substanceOnly species EGF_EGFR in cytoplasm = 0.627;  // substance in MWBUILTINPREFIX_nano_MWBUILTINUNIT_mole
  substanceOnly species EGF_EGFR_EGF_EGFR in cytoplasm = 0.64;  // substance in MWBUILTINPREFIX_nano_MWBUILTINUNIT_mole
  substanceOnly species GRB_2 in cytoplasm = 0.67; GRB_2 is "GRB-2";  // substance in MWBUILTINPREFIX_nano_MWBUILTINUNIT_mole
  substanceOnly species FGF in cytoplasm = 0.78;  // substance in MWBUILTINPREFIX_nano_MWBUILTINUNIT_mole
  substanceOnly species FGF_FGFR in cytoplasm = 0.52;  // substance in MWBUILTINPREFIX_nano_MWBUILTINUNIT_mole
  substanceOnly species FGF_FGFR_FGF_FGFR in cytoplasm = 0.037;  // substance in MWBUILTINPREFIX_nano_MWBUILTINUNIT_mole
  substanceOnly species PDGF in cytoplasm = 0.78;  // substance in MWBUILTINPREFIX_nano_MWBUILTINUNIT_mole
  substanceOnly species PDGF_PDGFR in cytoplasm = 0.52;  // substance in MWBUILTINPREFIX_nano_MWBUILTINUNIT_mole
  substanceOnly species PDGF_PDGFR_PDGF_PDGFR in cytoplasm = 0.02;  // substance in MWBUILTINPREFIX_nano_MWBUILTINUNIT_mole
  substanceOnly species GRB_2_SOS in cytoplasm = 0.472; GRB_2_SOS is "GRB-2_SOS";  // substance in MWBUILTINPREFIX_nano_MWBUILTINUNIT_mole
  substanceOnly species Ras_GDP in cytoplasm = 0.59; Ras_GDP is "Ras-GDP";  // substance in MWBUILTINPREFIX_nano_MWBUILTINUNIT_mole
  substanceOnly species Ras_GTP in cytoplasm = 0.64; Ras_GTP is "Ras-GTP";  // substance in MWBUILTINPREFIX_nano_MWBUILTINUNIT_mole
  substanceOnly species Raf in cytoplasm = 0.152;  // substance in MWBUILTINPREFIX_nano_MWBUILTINUNIT_mole
  substanceOnly species PLC_gamma in cytoplasm = 0.56; PLC_gamma is "PLC-gamma";  // substance in MWBUILTINPREFIX_nano_MWBUILTINUNIT_mole
  substanceOnly species PIP2 in cytoplasm = 0.64;  // substance in MWBUILTINPREFIX_nano_MWBUILTINUNIT_mole
  substanceOnly species DAG in cytoplasm = 0.732;  // substance in MWBUILTINPREFIX_nano_MWBUILTINUNIT_mole
  substanceOnly species PKC in cytoplasm = 0.68;  // substance in MWBUILTINPREFIX_nano_MWBUILTINUNIT_mole
  substanceOnly species PI3K in cytoplasm = 0.22;  // substance in MWBUILTINPREFIX_nano_MWBUILTINUNIT_mole
  substanceOnly species PI3Ka in cytoplasm = 0.348;  // substance in MWBUILTINPREFIX_nano_MWBUILTINUNIT_mole
  substanceOnly species PIP3 in cytoplasm = 0.4772;  // substance in MWBUILTINPREFIX_nano_MWBUILTINUNIT_mole
  substanceOnly species PDK1 in cytoplasm = 0.525;  // substance in MWBUILTINPREFIX_nano_MWBUILTINUNIT_mole
  substanceOnly species MEK in cytoplasm = 0.4;  // substance in MWBUILTINPREFIX_nano_MWBUILTINUNIT_mole
  substanceOnly species MEKp in cytoplasm = 0.16;  // substance in MWBUILTINPREFIX_nano_MWBUILTINUNIT_mole
  substanceOnly species MEKpp in cytoplasm = 0.11;  // substance in MWBUILTINPREFIX_nano_MWBUILTINUNIT_mole
  substanceOnly species ERK1_2_cytoplasm in cytoplasm = 0.231; ERK1_2_cytoplasm is "ERK1/2";  // substance in MWBUILTINPREFIX_nano_MWBUILTINUNIT_mole
  substanceOnly species p38_nucleus in nucleus = 0.42;  // substance in MWBUILTINPREFIX_nano_MWBUILTINUNIT_mole
  species c_fos in nucleus = 0; c_fos is "c-fos";
  substanceOnly species JNK_nucleus in nucleus = 0.431;  // substance in MWBUILTINPREFIX_nano_MWBUILTINUNIT_mole
  species c_Jun in nucleus = 0; c_Jun is "c-Jun";
  substanceOnly species MAPK3K8_nucleus in nucleus = 0.61;  // substance in MWBUILTINPREFIX_nano_MWBUILTINUNIT_mole
  species AP_1 in nucleus = 0; AP_1 is "AP-1";
  species NF_kappa_B in nucleus = 0; NF_kappa_B is "NF-kappa B";
  substanceOnly species ERK1_2_nucleus in nucleus = 0.39; ERK1_2_nucleus is "ERK1/2";  // substance in MWBUILTINPREFIX_nano_MWBUILTINUNIT_mole
  substanceOnly species Elk in nucleus = 0.62;  // substance in MWBUILTINPREFIX_nano_MWBUILTINUNIT_mole
  substanceOnly species SRF in nucleus = 0.53;  // substance in MWBUILTINPREFIX_nano_MWBUILTINUNIT_mole

  // Reactions:
  reaction_67: CD14 => TLR4; Kf1*CD14;
    Kf1 = 2.01 MWDERIVEDUNIT_1__second;
  reaction_68: TLR4 => MyD88; Kf2*TLR4;
    Kf2 = 0.41 MWDERIVEDUNIT_1__second;
  reaction_69: MyD88 => IRAK4_1; Vm3*MyD88/(Km3 + MyD88);
    Vm3 = 1.12 MWDERIVEDUNIT_nanomole__second; Km3 = 4.6 MWBUILTINPREFIX_nano_MWBUILTINUNIT_mole;
  reaction_70: IRAK4_1 => TRAF_6; Vm4*IRAK4_1/(Km4 + IRAK4_1);
    Vm4 = 11.6 MWDERIVEDUNIT_nanomole__second; Km4 = 4.376 MWBUILTINPREFIX_nano_MWBUILTINUNIT_mole;
  reaction_71: TNF => TNFR; Kf5*TNF;
    Kf5 = 0.78 MWDERIVEDUNIT_1__second;
  reaction_72: TNFR => TRAF_6; Vm6*TNFR/(Km6 + TNFR);
    Vm6 = 0.57 MWDERIVEDUNIT_nanomole__second; Km6 = 7.3 MWBUILTINPREFIX_nano_MWBUILTINUNIT_mole;
  reaction_73: TNFR => TRADD; Vm7*TNFR/(Km7 + TNFR);
    Vm7 = 0.66 MWDERIVEDUNIT_nanomole__second; Km7 = 3.8 MWBUILTINPREFIX_nano_MWBUILTINUNIT_mole;
  reaction_74: TNFR => CASP; Vm8*TNFR/(Km8 + TNFR);
    Vm8 = 0.15 MWDERIVEDUNIT_nanomole__second; Km8 = 3.89 MWBUILTINPREFIX_nano_MWBUILTINUNIT_mole;
  reaction_75: IL_1 => IL_1R; Kf9*IL_1;
    Kf9 = 1 MWDERIVEDUNIT_1__second;
  reaction_76: IL_1R => TRAF_6; Vm10*IL_1R/(Km10 + IL_1R);
    Vm10 = 0.1 MWDERIVEDUNIT_nanomole__second; Km10 = 4.6 MWBUILTINPREFIX_nano_MWBUILTINUNIT_mole;
  reaction_77: IL_1R => TRAF_2; Vm11*IL_1R/(Km11 + IL_1R);
    Vm11 = 0.43 MWDERIVEDUNIT_nanomole__second; Km11 = 2.63 MWBUILTINPREFIX_nano_MWBUILTINUNIT_mole;
  reaction_78: IL_1R => CASP; Vm12*IL_1R/(Km12 + IL_1R);
    Vm12 = 0.25 MWDERIVEDUNIT_nanomole__second; Km12 = 3.2 MWBUILTINPREFIX_nano_MWBUILTINUNIT_mole;
  reaction_79: TRAF_6 => ECSIT; Kf13*TRAF_6;
    Kf13 = 0.24 MWDERIVEDUNIT_1__second;
  reaction_80: ECSIT => TAB2; Vm14*ECSIT/(Km14 + ECSIT);
    Vm14 = 0.33 MWDERIVEDUNIT_nanomole__second; Km14 = 0.9 MWBUILTINPREFIX_nano_MWBUILTINUNIT_mole;
  reaction_81: TAB2 => TAK1; Vm15*TAB2/(Km15 + TAB2);
    Vm15 = 2.11 MWDERIVEDUNIT_nanomole__second; Km15 = 2 MWBUILTINPREFIX_nano_MWBUILTINUNIT_mole;
  reaction_82: TAK1 => NIK; Vm16*TAK1/(Km16 + TAK1);
    Vm16 = 1.14 MWDERIVEDUNIT_nanomole__second; Km16 = 2.4 MWBUILTINPREFIX_nano_MWBUILTINUNIT_mole;
  reaction_83: TAK1 => MKK4_7; Vm17*TAK1/(Km17 + TAK1);
    Vm17 = 1.4 MWDERIVEDUNIT_nanomole__second; Km17 = 0.989 MWBUILTINPREFIX_nano_MWBUILTINUNIT_mole;
  reaction_84: TAK1 => MKK3_6; Vm18*TAK1/(Km18 + TAK1);
    Vm18 = 0.00179 MWDERIVEDUNIT_nanomole__second; Km18 = 0.00941 MWBUILTINPREFIX_nano_MWBUILTINUNIT_mole;
  reaction_85: TRADD => RIP; Vm19*TRADD/(Km19 + TRADD);
    Vm19 = 0.22 MWDERIVEDUNIT_nanomole__second; Km19 = 5.4 MWBUILTINPREFIX_nano_MWBUILTINUNIT_mole;
  reaction_86: RIP => TRAF_2; Vm20*RIP/(Km20 + RIP);
    Vm20 = 0.8 MWDERIVEDUNIT_nanomole__second; Km20 = 2.2 MWBUILTINPREFIX_nano_MWBUILTINUNIT_mole;
  reaction_87: TRAF_2 => ASK1; Vm21*TRAF_2/(Km21 + TRAF_2);
    Vm21 = 0.0017 MWDERIVEDUNIT_nanomole__second; Km21 = 4.83 MWBUILTINPREFIX_nano_MWBUILTINUNIT_mole;
  reaction_88: TRAF_2 => MAP4K5; Vm22*TRAF_2/(Km22 + TRAF_2);
    Vm22 = 0.435 MWDERIVEDUNIT_nanomole__second; Km22 = 2.3 MWBUILTINPREFIX_nano_MWBUILTINUNIT_mole;
  reaction_89: ASK1 => MKK3_6; Vm23*ASK1/(Km23 + ASK1);
    Vm23 = 0.67 MWDERIVEDUNIT_nanomole__second; Km23 = 0.97 MWBUILTINPREFIX_nano_MWBUILTINUNIT_mole;
  reaction_90: MKK3_6 => p38_cytoplasm; Vm24*MKK3_6/(Km24 + MKK3_6);
    Vm24 = 0.45 MWDERIVEDUNIT_nanomole__second; Km24 = 3.05 MWBUILTINPREFIX_nano_MWBUILTINUNIT_mole;
  reaction_91: p38_cytoplasm => p38_nucleus; Vm25*p38_cytoplasm/(Km25 + p38_cytoplasm);
    Vm25 = 0.227 MWDERIVEDUNIT_nanomole__second; Km25 = 3.67 MWBUILTINPREFIX_nano_MWBUILTINUNIT_mole;
  reaction_92: p38_nucleus => c_fos; Kf26*p38_nucleus;
    Kf26 = 0.5 MWDERIVEDUNIT_1__second;
  reaction_93: MAP4K5 => MKK4_7; Vm27*MAP4K5/(Km27 + MAP4K5);
    Vm27 = 0.381 MWDERIVEDUNIT_nanomole__second; Km27 = 5.97 MWBUILTINPREFIX_nano_MWBUILTINUNIT_mole;
  reaction_94: MKK4_7 => JNK_cytoplasm; Vm28*MKK4_7/(Km28 + MKK4_7);
    Vm28 = 0.32 MWDERIVEDUNIT_nanomole__second; Km28 = 0.431 MWBUILTINPREFIX_nano_MWBUILTINUNIT_mole;
  reaction_95: JNK_cytoplasm => JNK_nucleus; Vm29*JNK_cytoplasm/(Km29 + JNK_cytoplasm);
    Vm29 = 1.3 MWDERIVEDUNIT_nanomole__second; Km29 = 5.63 MWBUILTINPREFIX_nano_MWBUILTINUNIT_mole;
  reaction_96: JNK_nucleus => c_Jun; Kf30*JNK_nucleus;
    Kf30 = 0.2119 MWDERIVEDUNIT_1__second;
  reaction_97: TAK1 => IKK; Vm31*TAK1/(Km31 + TAK1);
    Vm31 = 0.13 MWDERIVEDUNIT_nanomole__second; Km31 = 2.76 MWBUILTINPREFIX_nano_MWBUILTINUNIT_mole;
  reaction_98: NIK => IKK; Vm32*NIK/(Km32 + NIK);
    Vm32 = 0.2 MWDERIVEDUNIT_nanomole__second; Km32 = 4.3 MWBUILTINPREFIX_nano_MWBUILTINUNIT_mole;
  reaction_99: IKK => IkB_NF_kappa_B; Vm33*IKK/(Km33 + IKK);
    Vm33 = 0.1 MWDERIVEDUNIT_nanomole__second; Km33 = 4.8 MWBUILTINPREFIX_nano_MWBUILTINUNIT_mole;
  reaction_100: IKK => MAPK3K8_cytoplasm; Vm34*IKK/(Km34 + IKK);
    Vm34 = 1.4 MWDERIVEDUNIT_nanomole__second; Km34 = 0.616 MWBUILTINPREFIX_nano_MWBUILTINUNIT_mole;
  reaction_101: MAPK3K8_cytoplasm => MAPK3K8_nucleus; Vm35*MAPK3K8_cytoplasm/(Km35 + MAPK3K8_cytoplasm);
    Vm35 = 0.173 MWDERIVEDUNIT_nanomole__second; Km35 = 0.454 MWBUILTINPREFIX_nano_MWBUILTINUNIT_mole;
  reaction_102: MAPK3K8_nucleus => AP_1; Kf36*MAPK3K8_nucleus;
    Kf36 = 0.084 MWDERIVEDUNIT_1__second;
  reaction_103: IkB_NF_kappa_B => NF_kappa_B; Kf37*IkB_NF_kappa_B;
    Kf37 = 1.8 MWDERIVEDUNIT_1__second;
  reaction_104: CASP => PAK_1_2; Vm38*CASP/(Km38 + CASP);
    Vm38 = 0.003 MWDERIVEDUNIT_nanomole__second; Km38 = 5.632 MWBUILTINPREFIX_nano_MWBUILTINUNIT_mole;
  reaction_105: PAK_1_2 => MEKK1; Vm39*PAK_1_2/(Km39 + PAK_1_2);
    Vm39 = 0.9 MWDERIVEDUNIT_nanomole__second; Km39 = 2 MWBUILTINPREFIX_nano_MWBUILTINUNIT_mole;
  reaction_106: MEKK1 => MKK4_7; Vm40*MEKK1/(Km40 + MEKK1);
    Vm40 = 0.5 MWDERIVEDUNIT_nanomole__second; Km40 = 0.44 MWBUILTINPREFIX_nano_MWBUILTINUNIT_mole;
  reaction_107: MEKK1 => MKK3_6; Vm41*MEKK1/(Km41 + MEKK1);
    Vm41 = 0.7 MWDERIVEDUNIT_nanomole__second; Km41 = 6.1 MWBUILTINPREFIX_nano_MWBUILTINUNIT_mole;
  reaction_108: EGF => EGF_EGFR; Kf42*EGF;
    Kf42 = 0.68 MWDERIVEDUNIT_1__second;
  reaction_109: EGF_EGFR => EGF_EGFR_EGF_EGFR; Vm43*EGF_EGFR/(Km43 + EGF_EGFR);
    Vm43 = 0.9 MWDERIVEDUNIT_nanomole__second; Km43 = 3.4 MWBUILTINPREFIX_nano_MWBUILTINUNIT_mole;
  reaction_110: EGF_EGFR_EGF_EGFR => GRB_2; Vm44*EGF_EGFR_EGF_EGFR/(Km44 + EGF_EGFR_EGF_EGFR);
    Vm44 = 0.0003 MWDERIVEDUNIT_nanomole__second; Km44 = 0.06 MWBUILTINPREFIX_nano_MWBUILTINUNIT_mole;
  reaction_111: FGF => FGF_FGFR; Kf45*FGF;
    Kf45 = 0.78 MWDERIVEDUNIT_1__second;
  reaction_112: FGF_FGFR => FGF_FGFR_FGF_FGFR; Vm46*FGF_FGFR/(Km46 + FGF_FGFR);
    Vm46 = 0.6 MWDERIVEDUNIT_nanomole__second; Km46 = 3.27 MWBUILTINPREFIX_nano_MWBUILTINUNIT_mole;
  reaction_113: FGF_FGFR_FGF_FGFR => GRB_2; Vm47*FGF_FGFR_FGF_FGFR/(Km47 + FGF_FGFR_FGF_FGFR);
    Vm47 = 0.01 MWDERIVEDUNIT_nanomole__second; Km47 = 0.06 MWBUILTINPREFIX_nano_MWBUILTINUNIT_mole;
  reaction_114: PDGF => PDGF_PDGFR; Kf48*PDGF;
    Kf48 = 0.78 MWDERIVEDUNIT_1__second;
  reaction_115: PDGF_PDGFR => PDGF_PDGFR_PDGF_PDGFR; Vm49*PDGF_PDGFR/(Km49 + PDGF_PDGFR);
    Vm49 = 0.38 MWDERIVEDUNIT_nanomole__second; Km49 = 1.5 MWBUILTINPREFIX_nano_MWBUILTINUNIT_mole;
  reaction_116: PDGF_PDGFR_PDGF_PDGFR => GRB_2; Vm50*PDGF_PDGFR_PDGF_PDGFR/(Km50 + PDGF_PDGFR_PDGF_PDGFR);
    Vm50 = 0.027 MWDERIVEDUNIT_nanomole__second; Km50 = 0.56 MWBUILTINPREFIX_nano_MWBUILTINUNIT_mole;
  reaction_117: GRB_2 => GRB_2_SOS; Vm51*GRB_2/(Km51 + GRB_2);
    Vm51 = 3.5 MWDERIVEDUNIT_nanomole__second; Km51 = 4.1 MWBUILTINPREFIX_nano_MWBUILTINUNIT_mole;
  reaction_118: GRB_2_SOS => Ras_GDP; Vm52*GRB_2_SOS/(Km52 + GRB_2_SOS);
    Vm52 = 0.33 MWDERIVEDUNIT_nanomole__second; Km52 = 2.6 MWBUILTINPREFIX_nano_MWBUILTINUNIT_mole;
  reaction_119: Ras_GDP => Ras_GTP; Vm53*Ras_GDP/(Km53 + Ras_GDP);
    Vm53 = 2.18 MWDERIVEDUNIT_nanomole__second; Km53 = 3.6 MWBUILTINPREFIX_nano_MWBUILTINUNIT_mole;
  reaction_120: Ras_GTP => Raf; Vm54*Ras_GTP/(Km54 + Ras_GTP);
    Vm54 = 0.61 MWDERIVEDUNIT_nanomole__second; Km54 = 3.4 MWBUILTINPREFIX_nano_MWBUILTINUNIT_mole;
  reaction_121: PLC_gamma => PIP2; Kf55*PLC_gamma;
    Kf55 = 0.41 MWDERIVEDUNIT_1__second;
  reaction_122: PIP2 => DAG; Vm56*PIP2/(Km56 + PIP2);
    Vm56 = 0.48 MWDERIVEDUNIT_nanomole__second; Km56 = 1.4 MWBUILTINPREFIX_nano_MWBUILTINUNIT_mole;
  reaction_123: DAG => PKC; Vm57*DAG/(Km57 + DAG);
    Vm57 = 1.2 MWDERIVEDUNIT_nanomole__second; Km57 = 4 MWBUILTINPREFIX_nano_MWBUILTINUNIT_mole;
  reaction_124: PKC => Raf; Vm58*PKC/(Km58 + PKC);
    Vm58 = 0.4 MWDERIVEDUNIT_nanomole__second; Km58 = 2 MWBUILTINPREFIX_nano_MWBUILTINUNIT_mole;
  reaction_125: Ras_GTP => MEKK1; Vm59*Ras_GTP/(Km59 + Ras_GTP);
    Vm59 = 0.12 MWDERIVEDUNIT_nanomole__second; Km59 = 3.2 MWBUILTINPREFIX_nano_MWBUILTINUNIT_mole;
  reaction_126: EGF_EGFR_EGF_EGFR => PI3K; Kf60*EGF_EGFR_EGF_EGFR;
    Kf60 = 0.135 MWDERIVEDUNIT_1__second;
  reaction_127: PI3K => PI3Ka; Vm61*PI3K/(Km61 + PI3K);
    Vm61 = 0.078 MWDERIVEDUNIT_nanomole__second; Km61 = 0.47 MWBUILTINPREFIX_nano_MWBUILTINUNIT_mole;
  reaction_128: PI3Ka => PIP2; Vm62*PI3Ka/(Km62 + PI3Ka);
    Vm62 = 2.9 MWDERIVEDUNIT_nanomole__second; Km62 = 0.487 MWBUILTINPREFIX_nano_MWBUILTINUNIT_mole;
  reaction_129: PIP2 => PIP3; Vm63*PIP2/(Km63 + PIP2);
    Vm63 = 1 MWDERIVEDUNIT_nanomole__second; Km63 = 2.2 MWBUILTINPREFIX_nano_MWBUILTINUNIT_mole;
  reaction_130: PIP3 => PDK1; Kf64*PIP3;
    Kf64 = 0.104 MWDERIVEDUNIT_1__second;
  reaction_131: PDK1 => MEK; Kf65*PDK1;
    Kf65 = 0.07 MWDERIVEDUNIT_1__second;
  reaction_132: PI3Ka => PAK_1_2; Vm66*PI3Ka/(Km66 + PI3Ka);
    Vm66 = 0.018 MWDERIVEDUNIT_nanomole__second; Km66 = 0.005 MWBUILTINPREFIX_nano_MWBUILTINUNIT_mole;
  reaction_133: PAK_1_2 => Raf; Vm67*PAK_1_2/(Km67 + PAK_1_2);
    Vm67 = 3.35 MWDERIVEDUNIT_nanomole__second; Km67 = 1.23 MWBUILTINPREFIX_nano_MWBUILTINUNIT_mole;
  reaction_134: Raf => MEK; Vm68*Raf/(Km68 + Raf);
    Vm68 = 1.09 MWDERIVEDUNIT_nanomole__second; Km68 = 3.6 MWBUILTINPREFIX_nano_MWBUILTINUNIT_mole;
  reaction_135: MEK => MEKp; Vm69*MEK/(Km69 + MEK);
    Vm69 = 2.964 MWDERIVEDUNIT_nanomole__second; Km69 = 9.8 MWBUILTINPREFIX_nano_MWBUILTINUNIT_mole;
  reaction_136: MEKp => MEKpp; Vm70*MEKp/(Km70 + MEKp);
    Vm70 = 0.25 MWDERIVEDUNIT_nanomole__second; Km70 = 0.2 MWBUILTINPREFIX_nano_MWBUILTINUNIT_mole;
  reaction_137: MEKpp => ERK1_2_cytoplasm; Vm71*MEKpp/(Km71 + MEKpp);
    Vm71 = 0.69 MWDERIVEDUNIT_nanomole__second; Km71 = 3.48 MWBUILTINPREFIX_nano_MWBUILTINUNIT_mole;
  reaction_138: ERK1_2_cytoplasm => ERK1_2_nucleus; Vm72*ERK1_2_cytoplasm/(Km72 + ERK1_2_cytoplasm);
    Vm72 = 0.077 MWDERIVEDUNIT_nanomole__second; Km72 = 2.8 MWBUILTINPREFIX_nano_MWBUILTINUNIT_mole;
  reaction_139: ERK1_2_nucleus => Elk; Kf73*ERK1_2_nucleus;
    Kf73 = 0.987 MWDERIVEDUNIT_1__second;
  reaction_140: Elk => SRF; Kf74*Elk;
    Kf74 = 0.072 MWDERIVEDUNIT_1__second;
  reaction_141: SRF => c_fos; Kf75*SRF;
    Kf75 = 0.018 MWDERIVEDUNIT_1__second;

  // Unit definitions:
  unit MWBUILTINPREFIX_nano_MWBUILTINUNIT_mole = 1e-9 mole; MWBUILTINPREFIX_nano_MWBUILTINUNIT_mole is "nanomole";
  unit MWDERIVEDUNIT_1__second = dimensionless / second; MWDERIVEDUNIT_1__second is "1/second";
  unit MWDERIVEDUNIT_nanomole__second = mole * 1e-9 dimensionless / second; MWDERIVEDUNIT_nanomole__second is "nanomole/second";
end
