// SBML level 2 version 1

model MODEL1208280001()
  // Geier2011 - Integrin activation
  // Rule based model that integrates the available data to test the biololical hypotheses regarding the role of talin, Dok1 and PIPKI in integrin activation.
  // This model is described in the article:
  // A computational analysis of the dynamic roles of talin, Dok1, and PIPKI for integrin activation.
  // Geier F, Fengos G, Iber D.
  // PLoS One. 2011;6(11):e24808.
  // Abstract:
  // Integrin signaling regulates cell migration and plays a pivotal role in developmental processes and cancer metastasis. Integrin signaling has been studied extensively and much data is available on pathway components and interactions. Yet the data is fragmented and an integrated model is missing. We use a rule-based modeling approach to integrate available data and test biological hypotheses regarding the role of talin, Dok1 and PIPKI in integrin activation. The detailed biochemical characterization of integrin signaling provides us with measured values for most of the kinetics parameters. However, measurements are not fully accurate and the cellular concentrations of signaling proteins are largely unknown and expected to vary substantially across different cellular conditions. By sampling model behaviors over the physiologically realistic parameter range we find that the model exhibits only two different qualitative behaviors and these depend mainly on the relative protein concentrations, which offers a powerful point of control to the cell. Our study highlights the necessity to characterize model behavior not for a single parameter optimum, but to identify parameter sets that characterize different signaling modes.
  // This model is hosted on BioModels Database and identified by: MODEL1208280001 .
  // To cite BioModels Database, please use: BioModels Database: An enhanced, curated and annotated resource for published quantitative kinetic models .
  // To the extent possible under law, all copyright and related or neighbouring rights to this encoded model have been dedicated to the public domain worldwide. Please refer to CC0 Public Domain Dedication for more information.
  // biomodels.db:MODEL1208280001
  // isDescribedBy pubmed:22110576
  // hasTaxon taxonomy:33208
  // isVersionOf GO:0033622

  // Compartments:
  compartment default;

  // Species:
  species x1 in default;
  species x10 in default;
  species x100 in default;
  species x101 in default;
  species x11 in default;
  species x12 in default;
  species x13 in default;
  species x14 in default;
  species x15 in default;
  species x16 in default;
  species x17 in default;
  species x18 in default;
  species x19 in default;
  species x20 in default;
  species x2 in default;
  species x21 in default;
  species x22 in default;
  species x23 in default;
  species x24 in default;
  species x25 in default;
  species x26 in default;
  species x27 in default;
  species x28 in default;
  species x29 in default;
  species x30 in default;
  species x3 in default;
  species x31 in default;
  species x32 in default;
  species x33 in default;
  species x34 in default;
  species x35 in default;
  species x36 in default;
  species x37 in default;
  species x38 in default;
  species x39 in default;
  species x40 in default;
  species x4 in default;
  species x41 in default;
  species x42 in default;
  species x43 in default;
  species x44 in default;
  species x45 in default;
  species x46 in default;
  species x47 in default;
  species x48 in default;
  species x49 in default;
  species x5 in default;
  species x50 in default;
  species x51 in default;
  species x52 in default;
  species x53 in default;
  species x54 in default;
  species x55 in default;
  species x56 in default;
  species x57 in default;
  species x58 in default;
  species x59 in default;
  species x6 in default;
  species x60 in default;
  species x61 in default;
  species x62 in default;
  species x63 in default;
  species x64 in default;
  species x65 in default;
  species x66 in default;
  species x67 in default;
  species x68 in default;
  species x69 in default;
  species x7 in default;
  species x70 in default;
  species x71 in default;
  species x72 in default;
  species x73 in default;
  species x74 in default;
  species x75 in default;
  species x76 in default;
  species x77 in default;
  species x78 in default;
  species x79 in default;
  species x8 in default;
  species x80 in default;
  species x81 in default;
  species x82 in default;
  species x83 in default;
  species x84 in default;
  species x85 in default;
  species x86 in default;
  species x87 in default;
  species x88 in default;
  species x89 in default;
  species x9 in default;
  species x90 in default;
  species x91 in default;
  species x92 in default;
  species x93 in default;
  species x94 in default;
  species x95 in default;
  species x96 in default;
  species x97 in default;
  species x98 in default;
  species x99 in default;
  species x102 in default;
  species x103 in default;
  species x104 in default;
  species x105 in default;
  species x106 in default;
  species x107 in default;
  species x108 in default;

  // Parameters:
  k10off = 0;
  k10on = 0;
  k11a = 0;
  k11b = 0;
  k12 = 0;
  k13 = 0;
  k14 = 0;
  k15 = 0;
  k16off = 0;
  k16on = 0;
  k17offA = 0;
  k17offB = 0;
  k1off = 0;
  k1on = 0;
  k2off = 0;
  k2on = 0;
  k3aoff = 0;
  k3aon = 0;
  k3boff = 0;
  k3bon = 0;
  k5off = 0;
  k5on = 0;
  k6off = 0;
  k6on = 0;
  k7 = 0;
  k8 = 0;
  k9 = 0;

  // Reactions:
  f1: x2 => x7; k1on*x2;
  f2: x3 => x8; k5on*x3;
  f3: x4 + x6 => ; k10on*x4*x6;
  f4: x4 => ; k16on*x4;
  f5: x5 => ; k16on*x5;
  f6: x6 => ; k16on*x6;
  f7: x7 => x2; k1off*x7;
  f8: x1 + x7 => x13; k2on*x7*x1;
  f9: x7 + x11 => x14; k3bon*x11*x7;
  f10: x8 => x3; k5off*x8;
  f11: x2 + x8 => x15; k6on*x8*x2;
  f12: x7 + x8 => x16; k6on*x8*x7;
  f13: x8 + x12 => x17; k6on*x8*x12;
  f14: x10 + x12 => ; k10on*x10*x12;
  f15: x9 => ; k10off*x9;
  f16: x9 + x4 => ; k10on*x4*x9;
  f17: x10 => ; k11b*x10;
  f18: x10 => ; k16off*x10;
  f19: x9 => ; k16on*x9;
  f20: x11 => ; k16off*x11;
  f21: x12 => ; k17offA*x12;
  f22: x15 => x16; k1on*x15;
  f23: x16 => x15; k1off*x16;
  f24: x14 => x2; k1off*x14;
  f25: x1 + x14 => x21; k2on*x14*x1;
  f26: x1 + x16 => x22; k2on*x16*x1;
  f27: x13 => x1 + x7; k2off*x13;
  f28: x7 + x20 => x23; k3aon*x20*x7;
  f29: x13 + x20 => x24; k3aon*x20*x13;
  f30: x16 + x20 => x25; k3aon*x20*x16;
  f31: x13 + x11 => x21; k3bon*x11*x13;
  f32: x16 + x11 => x26; k3bon*x11*x16;
  f33: x14 => x7; k3boff*x14;
  f34: x8 + x13 => x22; k6on*x8*x13;
  f35: x8 + x14 => x26; k6on*x8*x14;
  f36: x15 => x2 + x8; k6off*x15;
  f37: x16 => x7 + x8; k6off*x16;
  f38: x8 + x18 => x27; k6on*x8*x18;
  f39: x17 => x8; k6off*x17;
  f40: x17 + x10 => x27; k10on*x10*x17;
  f41: x12 + x20 => ; k10on*x20*x12;
  f42: x17 + x20 => x29; k10on*x20*x17;
  f43: x18 => ; k10off*x18;
  f44: x18 + x10 => ; k10on*x10*x18;
  f45: x18 + x20 => ; k10on*x20*x18;
  f46: x19 => ; k10off*x19;
  f47: x18 => ; k11b*x18;
  f48: x20 => ; k12*x20;
  f49: x20 => ; k16off*x20;
  f50: x18 => ; k16off*x18;
  f51: x19 => ; k16on*x19;
  f52: x26 => x15; k1off*x26;
  f53: x1 + x23 => x24; k2on*x23*x1;
  f54: x1 + x25 => x33; k2on*x25*x1;
  f55: x1 + x26 => x34; k2on*x26*x1;
  f56: x21 => x1 + x14; k2off*x21;
  f57: x22 => x1 + x16; k2off*x22;
  f58: x24 => x1 + x23; k2off*x24;
  f59: x22 + x20 => x33; k3aon*x20*x22;
  f60: x23 => x7; k3aoff*x23;
  f61: x24 => x13; k3aoff*x24;
  f62: x25 => x16; k3aoff*x25;
  f63: x22 + x11 => x34; k3bon*x11*x22;
  f64: x21 => x13; k3boff*x21;
  f65: x26 => x16; k3boff*x26;
  f66: x8 + x21 => x34; k6on*x8*x21;
  f67: x8 + x23 => x25; k6on*x8*x23;
  f68: x8 + x24 => x33; k6on*x8*x24;
  f69: x22 => x8 + x13; k6off*x22;
  f70: x25 => x8 + x23; k6off*x25;
  f71: x26 => x8 + x14; k6off*x26;
  f72: x8 + x28 => x29; k6on*x8*x28;
  f73: x8 + x30 => x35; k6on*x8*x30;
  f74: x8 + x31 => x36; k6on*x8*x31;
  f75: x27 => x8; k6off*x27;
  f76: x29 => x8; k6off*x29;
  f77: x22 => x37; k7*x22;
  f78: x27 => x17; k10off*x27;
  f79: x28 => ; k10off*x28;
  f80: x29 => x17; k10off*x29;
  f81: x27 + x10 => x35; k10on*x10*x27;
  f82: x10 + x28 => ; k10on*x10*x28;
  f83: x29 + x10 => x39; k10on*x10*x29;
  f84: x27 + x20 => x36; k10on*x20*x27;
  f85: x20 + x28 => ; k10on*x20*x28;
  f86: x29 + x20 => x41; k10on*x20*x29;
  f87: x30 => ; k10off*x30;
  f88: x31 => ; k10off*x31;
  f89: x32 + x6 => ; k10on*x32*x6;
  f90: x32 + x9 => ; k10on*x32*x9;
  f91: x27 => x29; k11b*x27;
  f92: x30 => ; k11b*x30;
  f93: x30 => ; k11b*x30;
  f94: x31 => ; k11b*x31;
  f95: x32 => ; k12*x32;
  f96: x32 => ; k16on*x32;
  f97: x28 => ; k16off*x28;
  f98: x30 => ; k17offB*x30;
  f99: x31 => ; k17offB*x31;
  f100: x33 => x1 + x25; k2off*x33;
  f101: x34 => x1 + x26; k2off*x34;
  f102: x37 => x1 + x44; k2off*x37;
  f103: x37 + x20 => x45; k3aon*x20*x37;
  f104: x33 => x22; k3aoff*x33;
  f105: x37 + x11 => x46; k3bon*x11*x37;
  f106: x34 => x22; k3boff*x34;
  f107: x33 => x8 + x24; k6off*x33;
  f108: x34 => x8 + x21; k6off*x34;
  f109: x37 => x13 + x47; k6off*x37;
  f110: x8 + x38 => x39; k6on*x8*x38;
  f111: x8 + x40 => x41; k6on*x8*x40;
  f112: x35 => x8; k6off*x35;
  f113: x36 => x8; k6off*x36;
  f114: x39 => x8; k6off*x39;
  f115: x41 => x8; k6off*x41;
  f116: x33 => x45; k7*x33;
  f117: x34 => x46; k7*x34;
  f118: x37 => x48; k9*x37;
  f119: x35 => x27; k10off*x35;
  f120: x36 => x27; k10off*x36;
  f121: x38 => ; k10off*x38;
  f122: x39 => x29; k10off*x39;
  f123: x40 => ; k10off*x40;
  f124: x41 => x29; k10off*x41;
  f125: x42 => ; k10off*x42;
  f126: x42 + x4 => ; k10on*x4*x42;
  f127: x42 + x32 => ; k10on*x32*x42;
  f128: x43 => ; k10off*x43;
  f129: x35 => x36; k11b*x35;
  f130: x35 => x39; k11b*x35;
  f131: x36 => x41; k11b*x36;
  f132: x38 => ; k11b*x38;
  f133: x39 => x41; k11b*x39;
  f134: x37 => x22; k13*x37;
  f135: x42 => ; k16on*x42;
  f136: x43 => ; k16on*x43;
  f137: x38 => ; k17offB*x38;
  f138: x40 => ; k17offB*x40;
  f139: x44 => x51; k1off*x44;
  f140: x1 + x44 => x37; k2on*x44*x1;
  f141: x45 => x1 + x52; k2off*x45;
  f142: x46 => x1 + x53; k2off*x46;
  f143: x48 => x1 + x54; k2off*x48;
  f144: x44 + x20 => x52; k3aon*x20*x44;
  f145: x45 => x37; k3aoff*x45;
  f146: x44 + x11 => x53; k3bon*x11*x44;
  f147: x46 => x37; k3boff*x46;
  f148: x48 + x20 => x55; k3aon*x20*x48;
  f149: x48 + x11 => x56; k3bon*x11*x48;
  f150: x2 + x47 => x51; k6on*x47*x2;
  f151: x7 + x47 => x44; k6on*x47*x7;
  f152: x13 + x47 => x37; k6on*x47*x13;
  f153: x14 + x47 => x53; k6on*x47*x14;
  f154: x21 + x47 => x46; k6on*x47*x21;
  f155: x23 + x47 => x52; k6on*x47*x23;
  f156: x24 + x47 => x45; k6on*x47*x24;
  f157: x44 => x7 + x47; k6off*x44;
  f158: x45 => x24 + x47; k6off*x45;
  f159: x46 => x21 + x47; k6off*x46;
  f160: x48 => x47 + x57; k6off*x48;
  f161: x47 + x12 => x58; k6on*x47*x12;
  f162: x47 + x18 => x59; k6on*x47*x18;
  f163: x47 + x28 => x60; k6on*x47*x28;
  f164: x47 + x30 => x61; k6on*x47*x30;
  f165: x47 + x31 => x62; k6on*x47*x31;
  f166: x47 + x38 => x63; k6on*x47*x38;
  f167: x47 + x40 => x64; k6on*x47*x40;
  f168: x44 => x54; k9*x44;
  f169: x49 => ; k10off*x49;
  f170: x50 => ; k10off*x50;
  f171: x44 => x16; k13*x44;
  f172: x45 => x33; k13*x45;
  f173: x46 => x34; k13*x46;
  f174: x47 => x8; k13*x47;
  f175: x48 => x65; k13*x48;
  f176: x49 => ; k16on*x49;
  f177: x50 => ; k16on*x50;
  f178: x51 => x44; k1on*x51;
  f179: x54 => x66; k1off*x54;
  f180: x53 => x51; k1off*x53;
  f181: x1 + x52 => x45; k2on*x52*x1;
  f182: x1 + x53 => x46; k2on*x53*x1;
  f183: x1 + x54 => x48; k2on*x54*x1;
  f184: x55 => x1 + x67; k2off*x55;
  f185: x56 => x1 + x68; k2off*x56;
  f186: x57 => x1 + x69; k2off*x57;
  f187: x65 => x1 + x70; k2off*x65;
  f188: x52 => x44; k3aoff*x52;
  f189: x53 => x44; k3boff*x53;
  f190: x54 + x20 => x67; k3aon*x20*x54;
  f191: x57 + x20 => x71; k3aon*x20*x57;
  f192: x65 + x20 => x72; k3aon*x20*x65;
  f193: x55 => x48; rateLaw1*x55;
  f194: x54 + x11 => x68; k3bon*x11*x54;
  f195: x57 + x11 => x73; k3bon*x11*x57;
  f196: x65 + x11 => x74; k3bon*x11*x65;
  f197: x56 => x48; rateLaw2*x56;
  f198: x8 + x57 => x65; k6on*x8*x57;
  f199: x47 + x57 => x48; k6on*x47*x57;
  f200: x51 => x2 + x47; k6off*x51;
  f201: x52 => x23 + x47; k6off*x52;
  f202: x53 => x14 + x47; k6off*x53;
  f203: x54 => x47 + x69; k6off*x54;
  f204: x55 => x47 + x71; k6off*x55;
  f205: x56 => x47 + x73; k6off*x56;
  f206: x65 => x8 + x57; k6off*x65;
  f207: x58 => x47; k6off*x58;
  f208: x59 => x47; k6off*x59;
  f209: x60 => x47; k6off*x60;
  f210: x61 => x47; k6off*x61;
  f211: x62 => x47; k6off*x62;
  f212: x63 => x47; k6off*x63;
  f213: x64 => x47; k6off*x64;
  f214: x65 => x48; k7*x65;
  f215: x58 => x75; k8*x58;
  f216: x59 => x76; k8*x59;
  f217: x60 => x77; k8*x60;
  f218: x61 => x78; k8*x61;
  f219: x62 => x79; k8*x62;
  f220: x63 => x80; k8*x63;
  f221: x64 => x81; k8*x64;
  f222: x51 => x66; k9*x51;
  f223: x58 + x10 => x59; k10on*x10*x58;
  f224: x58 + x20 => x60; k10on*x20*x58;
  f225: x59 => x58; k10off*x59;
  f226: x60 => x58; k10off*x60;
  f227: x59 + x10 => x61; k10on*x10*x59;
  f228: x60 + x10 => x63; k10on*x10*x60;
  f229: x59 + x20 => x62; k10on*x20*x59;
  f230: x60 + x20 => x64; k10on*x20*x60;
  f231: x61 => x59; k10off*x61;
  f232: x62 => x59; k10off*x62;
  f233: x63 => x60; k10off*x63;
  f234: x64 => x60; k10off*x64;
  f235: x59 => x60; k11b*x59;
  f236: x61 => x62; k11b*x61;
  f237: x61 => x63; k11b*x61;
  f238: x62 => x64; k11b*x62;
  f239: x63 => x64; k11b*x63;
  f240: x51 => x15; k13*x51;
  f241: x52 => x25; k13*x52;
  f242: x53 => x26; k13*x53;
  f243: x54 => x70; k13*x54;
  f244: x55 => x72; k13*x55;
  f245: x56 => x74; k13*x56;
  f246: x58 => x17; k13*x58;
  f247: x59 => x27; k13*x59;
  f248: x60 => x29; k13*x60;
  f249: x61 => x35; k13*x61;
  f250: x62 => x36; k13*x62;
  f251: x63 => x39; k13*x63;
  f252: x64 => x41; k13*x64;
  f253: x57 => x13; k15*x57;
  f254: x66 => x54; k1on*x66;
  f255: x69 => x82; k1off*x69;
  f256: x70 => x83; k1off*x70;
  f257: x68 => x66; k1off*x68;
  f258: x1 + x67 => x55; k2on*x67*x1;
  f259: x1 + x68 => x56; k2on*x68*x1;
  f260: x1 + x69 => x57; k2on*x69*x1;
  f261: x1 + x70 => x65; k2on*x70*x1;
  f262: x71 => x1 + x84; k2off*x71;
  f263: x72 => x1 + x85; k2off*x72;
  f264: x73 => x1 + x86; k2off*x73;
  f265: x74 => x1 + x87; k2off*x74;
  f266: x69 + x20 => x84; k3aon*x20*x69;
  f267: x70 + x20 => x85; k3aon*x20*x70;
  f268: x67 => x54; rateLaw1*x67;
  f269: x71 => x57; rateLaw1*x71;
  f270: x72 => x65; rateLaw1*x72;
  f271: x69 + x11 => x86; k3bon*x11*x69;
  f272: x70 + x11 => x87; k3bon*x11*x70;
  f273: x68 => x54; rateLaw2*x68;
  f274: x73 => x57; rateLaw2*x73;
  f275: x74 => x65; rateLaw2*x74;
  f276: x8 + x69 => x70; k6on*x8*x69;
  f277: x8 + x71 => x72; k6on*x8*x71;
  f278: x8 + x73 => x74; k6on*x8*x73;
  f279: x47 + x69 => x54; k6on*x47*x69;
  f280: x47 + x71 => x55; k6on*x47*x71;
  f281: x47 + x73 => x56; k6on*x47*x73;
  f282: x66 => x47 + x82; k6off*x66;
  f283: x67 => x47 + x84; k6off*x67;
  f284: x68 => x47 + x86; k6off*x68;
  f285: x70 => x8 + x69; k6off*x70;
  f286: x72 => x8 + x71; k6off*x72;
  f287: x74 => x8 + x73; k6off*x74;
  f288: x75 => x47; k6off*x75;
  f289: x76 => x47; k6off*x76;
  f290: x77 => x47; k6off*x77;
  f291: x78 => x47; k6off*x78;
  f292: x79 => x47; k6off*x79;
  f293: x80 => x47; k6off*x80;
  f294: x81 => x47; k6off*x81;
  f295: x72 => x55; k7*x72;
  f296: x74 => x56; k7*x74;
  f297: x75 + x10 => x76; k10on*x10*x75;
  f298: x75 + x20 => x77; k10on*x20*x75;
  f299: x76 => x75; k10off*x76;
  f300: x77 => x75; k10off*x77;
  f301: x76 + x10 => x78; k10on*x10*x76;
  f302: x77 + x10 => x80; k10on*x10*x77;
  f303: x76 + x20 => x79; k10on*x20*x76;
  f304: x77 + x20 => x81; k10on*x20*x77;
  f305: x78 => x76; k10off*x78;
  f306: x79 => x76; k10off*x79;
  f307: x80 => x77; k10off*x80;
  f308: x81 => x77; k10off*x81;
  f309: x76 => x77; k11a*x76;
  f310: x78 => x80; k11a*x78;
  f311: x79 => x81; k11a*x79;
  f312: x78 => x79; k11a*x78;
  f313: x80 => x81; k11a*x80;
  f314: x76 => x77; k11b*x76;
  f315: x78 => x79; k11b*x78;
  f316: x78 => x80; k11b*x78;
  f317: x79 => x81; k11b*x79;
  f318: x80 => x81; k11b*x80;
  f319: x66 => x83; k13*x66;
  f320: x67 => x85; k13*x67;
  f321: x68 => x87; k13*x68;
  f322: x75 => x95; k13*x75;
  f323: x76 => x96; k13*x76;
  f324: x77 => x97; k13*x77;
  f325: x78 => x98; k13*x78;
  f326: x79 => x99; k13*x79;
  f327: x80 => x100; k13*x80;
  f328: x81 => x101; k13*x81;
  f329: x69 => x7; k15*x69;
  f330: x82 => x69; k1on*x82;
  f331: x83 => x70; k1on*x83;
  f332: x86 => x82; k1off*x86;
  f333: x87 => x83; k1off*x87;
  f334: x1 + x84 => x71; k2on*x84*x1;
  f335: x1 + x85 => x72; k2on*x85*x1;
  f336: x1 + x86 => x73; k2on*x86*x1;
  f337: x1 + x87 => x74; k2on*x87*x1;
  f338: x84 => x69; rateLaw1*x84;
  f339: x85 => x70; rateLaw1*x85;
  f340: x86 => x69; rateLaw2*x86;
  f341: x87 => x70; rateLaw2*x87;
  f342: x8 + x82 => x83; k6on*x8*x82;
  f343: x8 + x84 => x85; k6on*x8*x84;
  f344: x8 + x86 => x87; k6on*x8*x86;
  f345: x47 + x82 => x66; k6on*x47*x82;
  f346: x47 + x84 => x67; k6on*x47*x84;
  f347: x47 + x86 => x68; k6on*x47*x86;
  f348: x83 => x8 + x82; k6off*x83;
  f349: x85 => x8 + x84; k6off*x85;
  f350: x87 => x8 + x86; k6off*x87;
  f351: x8 + x88 => x95; k6on*x8*x88;
  f352: x8 + x89 => x96; k6on*x8*x89;
  f353: x8 + x90 => x97; k6on*x8*x90;
  f354: x8 + x91 => x98; k6on*x8*x91;
  f355: x8 + x92 => x99; k6on*x8*x92;
  f356: x8 + x93 => x100; k6on*x8*x93;
  f357: x8 + x94 => x101; k6on*x8*x94;
  f358: x47 + x88 => x75; k6on*x47*x88;
  f359: x47 + x89 => x76; k6on*x47*x89;
  f360: x47 + x90 => x77; k6on*x47*x90;
  f361: x47 + x91 => x78; k6on*x47*x91;
  f362: x47 + x92 => x79; k6on*x47*x92;
  f363: x47 + x93 => x80; k6on*x47*x93;
  f364: x47 + x94 => x81; k6on*x47*x94;
  f365: x95 => x8; k6off*x95;
  f366: x96 => x8; k6off*x96;
  f367: x97 => x8; k6off*x97;
  f368: x98 => x8; k6off*x98;
  f369: x99 => x8; k6off*x99;
  f370: x100 => x8; k6off*x100;
  f371: x101 => x8; k6off*x101;
  f372: x10 + x88 => ; k10on*x10*x88;
  f373: x95 + x10 => x96; k10on*x10*x95;
  f374: x20 + x88 => ; k10on*x20*x88;
  f375: x95 + x20 => x97; k10on*x20*x95;
  f376: x89 => ; k10off*x89;
  f377: x90 => ; k10off*x90;
  f378: x96 => x95; k10off*x96;
  f379: x97 => x95; k10off*x97;
  f380: x89 + x10 => ; k10on*x10*x89;
  f381: x90 + x10 => ; k10on*x10*x90;
  f382: x96 + x10 => x98; k10on*x10*x96;
  f383: x97 + x10 => x100; k10on*x10*x97;
  f384: x20 + x89 => ; k10on*x20*x89;
  f385: x20 + x90 => ; k10on*x20*x90;
  f386: x96 + x20 => x99; k10on*x20*x96;
  f387: x97 + x20 => x101; k10on*x20*x97;
  f388: x91 => ; k10off*x91;
  f389: x92 => ; k10off*x92;
  f390: x93 => ; k10off*x93;
  f391: x94 => ; k10off*x94;
  f392: x98 => x96; k10off*x98;
  f393: x99 => x96; k10off*x99;
  f394: x100 => x97; k10off*x100;
  f395: x101 => x97; k10off*x101;
  f396: x89 => ; k11a*x89;
  f397: x91 => ; k11a*x91;
  f398: x92 => ; k11a*x92;
  f399: x96 => x97; k11a*x96;
  f400: x98 => x100; k11a*x98;
  f401: x99 => x101; k11a*x99;
  f402: x91 => ; k11a*x91;
  f403: x93 => ; k11a*x93;
  f404: x98 => x99; k11a*x98;
  f405: x100 => x101; k11a*x100;
  f406: x89 => ; k11b*x89;
  f407: x91 => ; k11b*x91;
  f408: x91 => ; k11b*x91;
  f409: x92 => ; k11b*x92;
  f410: x93 => ; k11b*x93;
  f411: x96 => x97; k11b*x96;
  f412: x98 => x99; k11b*x98;
  f413: x98 => x100; k11b*x98;
  f414: x99 => x101; k11b*x99;
  f415: x100 => x101; k11b*x100;
  f416: x88 => ; k14*x88;
  f417: x89 => ; k14*x89;
  f418: x90 => ; k14*x90;
  f419: x91 => ; k14*x91;
  f420: x92 => ; k14*x92;
  f421: x93 => ; k14*x93;
  f422: x94 => ; k14*x94;
  f423: x82 => x2; k15*x82;
  f424: x89 => ; k16off*x89;
  f425: x90 => ; k16off*x90;
  f426: x88 => ; k17offA*x88;
  f427: x91 => ; k17offB*x91;
  f428: x92 => ; k17offB*x92;
  f429: x93 => ; k17offB*x93;
  f430: x94 => ; k17offB*x94;
  f431: x4 + x104 => ; k10on*x4*x104;
  f432: x32 + x104 => ; k10on*x32*x104;
  f433: x102 => ; k10off*x102;
  f434: x103 => ; k10off*x103;
  f435: x4 + x102 => ; k10on*x4*x102;
  f436: x4 + x103 => ; k10on*x4*x103;
  f437: x32 + x102 => ; k10on*x32*x102;
  f438: x32 + x103 => ; k10on*x32*x103;
  f439: x105 => ; k10off*x105;
  f440: x106 => ; k10off*x106;
  f441: x107 => ; k10off*x107;
  f442: x108 => ; k10off*x108;
  f443: x102 => ; k14*x102;
  f444: x103 => ; k14*x103;
  f445: x104 => ; k14*x104;
  f446: x105 => ; k14*x105;
  f447: x106 => ; k14*x106;
  f448: x107 => ; k14*x107;
  f449: x108 => ; k14*x108;
  f450: x102 => ; k16on*x102;
  f451: x103 => ; k16on*x103;
  f452: x104 => ; k16on*x104;
  f453: x105 => ; k16on*x105;
  f454: x106 => ; k16on*x106;
  f455: x107 => ; k16on*x107;
  f456: x108 => ; k16on*x108;
end
