// SBML level 2 version 4

function fd(S, P, V, K, Ki)
  V*(S - P)/K/(1 + S/K + P/K + Ki*S/K*P/K);
end
fd is "facilitated diffusion: symmetrical carrier";

function rmm2(S1, S2, P1, P2, V, KS1, KS2, KP1, KP2, Keq)
  V*(S1*S2/(KS1*KS2) - P1*P2/(KS1*KS2*Keq))/((1 + S1/KS1 + P1/KP1)*(1 + S2/KS2 + P2/KP2));
end
rmm2 is "reversible michaelis-menten: two noncompeting couples";

function rmm1(S, P, V, KS, KP, Keq)
  V*(S/KS - P/(KS*Keq))/(1 + S/KS + P/KP);
end
rmm1 is "reversible michaelis-menten: one substrate, one product";

function rmm_ub(S, P1, P2, V, KS, KP1, KP2, KiP2, Keq)
  V*(S/KS - P1*P2/(KS*Keq))/(1 + S/KS + P1/KP1 + P2/KP2 + S*P2/(KS*KiP2) + P1*P2/(KP1*KP2));
end
rmm_ub is "reversible michaelis-menten: ordered uni-bi";

function rma(S, P, k, Keq)
  k*(S - P/Keq);
end
rma is "reversible mass action";

function hill(S, Vmax, KS, nH)
  Vmax*(S/KS)^nH/(1 + (S/KS)^nH);
end
hill is "Hill kinetics";

function rmm_bb(S1, S2, P1, P2, V, KS1, KiS1, KS2, KiS2, KP1, KiP1, KP2, KiP2, Keq)
  V*(S1*S2/(KS1*KiS2) - P1*P2/(KS1*KiS2*Keq))/(1 + S2/KiS2 + S1*KS2/(KiS2*KS1) + P1*KP2/(KiP2*KP1) + P2/KiP2 + S1*S2/(KiS2*KS1) + S2*P1*KP2/(KiS2*KiP2*KP1) + S1*P2*KS2/(KiS2*KiP2*KS1) + P1*P2/(KP1*KiP2) + S1*S2*P1/(KiS2*KiP1*KS1) + S1*P1*P2/(KiS1*KiP2*KP1));
end
rmm_bb is "reversible michaelis-menten: ordered bi-bi";

function ima(S, k)
  k*S;
end
ima is "irreversible mass action";

function pfk_keq(F6P, ATP, F16bP, ADP, AMP, F26bP, Vmax, gR, Kf6p, Katp, L0, Ciatp, Kiatp, Camp, Kamp, Cf26, Kf26, Cf16, Kf16, Catp, Kadp, Keq)
  Vmax*(gR*(F6P/Kf6p)*(ATP/Katp)*(1 - F16bP*ADP/(F6P*ATP)/Keq)*(1 + F6P/Kf6p + ATP/Katp + gR*F6P/Kf6p*ATP/Katp + F16bP/Kf16 + ADP/Kadp + gR*F16bP/Kf16*ADP/Kadp)/((1 + F6P/Kf6p + ATP/Katp + gR*F6P/Kf6p*ATP/Katp + F16bP/Kf16 + ADP/Kadp + gR*F16bP/Kf16*ADP/Kadp)^2 + L0*((1 + Ciatp*ATP/Kiatp)/(1 + ATP/Kiatp))^2*((1 + Camp*AMP/Kamp)/(1 + AMP/Kamp))^2*((1 + Cf26*F26bP/Kf26 + Cf16*F16bP/Kf16)/(1 + F26bP/Kf26 + F16bP/Kf16))^2*(1 + Catp*ATP/Katp)^2));
end
pfk_keq is "phosphofructokinase kinetics with Keq";

function max(a, b)
  (a + b + abs(a - b))/2;
end

function imm1_np(S, V, KS)
  V*S/KS/(1 + S/KS);
end
imm1_np is "irreversible michaelis-menten: one substrate, no product";

function rmm2_3i(S1, S2, P1, P2, i1, i2, i3, V, KS1, KS2, KP1, KP2, Ki1, Ki2, Ki3, Keq)
  V/(KS1*KS2)*(S1*S2 - P1*P2/Keq)/((1 + i1/Ki1 + i2/Ki2 + i3/Ki3)*(1 + S1/KS1 + P1/KP1)*(1 + S2/KS2 + P2/KP2));
end
rmm2_3i is "reversible michaelis-menten: two substrates, two products, three inhibitors, non-competitive inhibition";

function min(a, b)
  (a + b - abs(a - b))/2;
end

function imm2_np(S1, S2, V, KS1, KS2)
  V*S1*S2/(KS1*KS2)/((1 + S1/KS1)*(1 + S2/KS2));
end
imm2_np is "irreversible michaelis-menten: two substrates, no products";

function ugp_fun(UTP, G1P, UDG, Vmax, Kutp, Kiutp, Kg1p, Kiudg)
  Vmax*UTP*G1P/(Kutp*Kg1p)/(Kiutp/Kutp + UTP/Kutp + G1P/Kg1p + UTP*G1P/(Kutp*Kg1p) + Kiutp/Kutp*UDG/Kiudg + G1P*UDG/(Kg1p*Kiudg));
end
ugp_fun is "UGP kinetics";

function hxk_t6p(S1, S2, P1, P2, I, V, KS1, KS2, KP1, KP2, KI, Keq)
  V*(S1*S2/(KS1*KS2) - P1*P2/(KS1*KS2*Keq))/((1 + S1/KS1 + P1/KP1 + I/KI)*(1 + S2/KS2 + P2/KP2));
end
hxk_t6p is "HXK inhibition by T6P";

function pgk_fun(S1, S2, P1, P2, V, KS1, KS2, KP1, KP2, Keq, nS2)
  V*(S2/KS2)^(nS2 - 1)*(S1*S2/(KS1*KS2) - P1*P2/(KS1*KS2*Keq))/((1 + S1/KS1 + P1/KP1)*(1 + (S2/KS2)^nS2 + P2/KP2));
end
pgk_fun is "phosphoglycerate kinase kinetics";

function pyk_fun(PEP, ADP, PYR, ATP, F16bP, Vmax, Kpep, Kadp, Kpyr, Katp, Keq, Kiatp, Kf16p, L0)
  Vmax*(PEP*ADP - PYR*ATP/Keq)/(Kpep*Kadp)/((1 + PEP/Kpep + PYR/Kpyr + L0*((ATP/Kiatp + 1)/(F16bP/Kf16p + 1)))*(1 + ADP/Kadp + ATP/Katp));
end
pyk_fun is "pyruvate kinase kinetics with F16bP activation";

function tpi_fun(S, P, V, KS, KP, KiP, Keq)
  V/KS*(S - P/Keq)/(1 + S/KS + P/KP*(1 + (P/KiP)^4));
end
tpi_fun is "triose-phosphate isomerase kinetics";

model MODEL1303260017()
  // Smallbone2013 - Glycolysis in S.cerevisiae - Iteration 17
  // This model is described in the article:
  // A model of yeast glycolysis based on a consistent kinetic characterization of all its enzymes
  // Kieran Smallbone, Hanan L. Messiha, Kathleen M. Carroll, Catherine L. Winder, Naglis Malys, Warwick B. Dunn, Ettore Murabito, Neil Swainston, Joseph O. Dada, Farid Khan, Pınar Pir, Evangelos Simeonidis, Irena Spasić, Jill Wishart, Dieter Weichart, Neil W. Hayes, Daniel Jameson, David S. Broomhead, Stephen G. Oliver, Simon J. Gaskell, John E.G. McCarthy, Norman W. Paton, Hans V. Westerhoff, Douglas B. Kell, Pedro Mendes
  // FEBS Letters (in press)
  // Abstract:
  // We present an experimental and computational pipeline for the generation of kinetic models of metabolism, and demonstrate its application to glycolysis in Saccharomyces cerevisiae. Starting from an approximate mathematical model, we employ a “cycle of knowledge” strategy, identifying the steps with most control over flux. Kinetic parameters of the individual isoenzymes within these steps are measured experimentally under a standardised set of conditions. Experimental strategies are applied to establish a set of in vivo concentrations for isoenzymes and metabolites. The data are integrated into a mathematical model that is used to predict a new set of metabolite concentrations and reevaluate the control properties of the system. This bottom-up modelling study reveals that control over the metabolic network most directly involved in yeast glycolysis is more widely distributed than previously thought.
  // This model is hosted on BioModels Database and identified by: MODEL1303260017 .
  // To cite BioModels Database, please use: BioModels Database: An enhanced, curated and annotated resource for published quantitative kinetic models .
  // To the extent possible under law, all copyright and related or neighbouring rights to this encoded model have been dedicated to the public domain worldwide. Please refer to CC0 Public Domain Dedication for more information.
  // taxonomy:4932
  // biomodels.db:MODEL1303260017

  // Compartments:
  compartment cell = 1;  // GO:0005829
  compartment extracellular = 1;  // GO:0005576

  // Species:
  species ADP in cell = 1.29;  // CHEBI:16761 kegg.compound:C00008
  species ATP in cell = 4.29;  // CHEBI:15422 kegg.compound:C00002
  species AcAld in cell = 0.1781406; AcAld is "acetaldehyde";  // CHEBI:15343 kegg.compound:C00084
  species BPG in cell = 0.0007368735; BPG is "1,3-bisphosphoglycerate";  // CHEBI:16001 kegg.compound:C00236
  species DHAP in cell = 3496987/volume/NA; DHAP is "dihydroxyacetone phosphate";  // CHEBI:16108 kegg.compound:C00111
  species F16bP in cell = 13800392/volume/NA; F16bP is "fructose 1,6-bisphosphate";  // CHEBI:28013 kegg.compound:C05378
  species F6P in cell = 708930/volume/NA; F6P is "fructose 6-phosphate";  // CHEBI:16084 kegg.compound:C05345
  species G1P in cell = 1623715/volume/NA; G1P is "glucose 1-phosphate";  // CHEBI:16077
  species G3P in cell = 825042/volume/NA; G3P is "glycerol 3-phosphate";  // CHEBI:15978 kegg.compound:C00093
  species G6P in cell = 2326001/volume/NA; G6P is "glucose 6-phosphate";  // CHEBI:17665 kegg.compound:C00668
  species GAP in cell = 951170/volume/NA; GAP is "glyceraldehyde 3-phosphate";  // CHEBI:29052 kegg.compound:C00118
  species GLC in cell = 18909525/volume/NA; GLC is "glucose";  // CHEBI:4167 kegg.compound:C00031
  species NAD in cell = 1.50329;  // CHEBI:15846 kegg.compound:C00003
  species P2G in cell = 0.01693448; P2G is "2-phosphoglycerate";  // CHEBI:17835 kegg.compound:C00631
  species P3G in cell = 0.1174563; P3G is "3-phosphoglycerate";  // CHEBI:17794 kegg.compound:C00197
  species PEP in cell = 1836769/volume/NA; PEP is "phosphoenolpyruvate";  // CHEBI:18021 kegg.compound:C00074
  species PYR in cell = 6348755/volume/NA; PYR is "pyruvate";  // CHEBI:15361 kegg.compound:C00022
  species T6P in cell = 0.02; T6P is "trehalose 6-phosphate";  // CHEBI:18283
  species UDP in cell = 0.2815;  // CHEBI:17659
  species UTP in cell = 0.6491;  // CHEBI:46398
  species $AMP in cell;  // CHEBI:16027 kegg.compound:C00020
  species $NADH in cell;  // CHEBI:16908 kegg.compound:C00004
  species $UDG in cell; UDG is "UDP glucose";  // CHEBI:18066
  species $ACE in cell = 671469373/volume/NA; ACE is "acetate";  // CHEBI:30089
  species $EtOH in cell = 668127260/volume/NA; EtOH is "ethanol";  // CHEBI:16236 kegg.compound:C00469
  species $F26bP in cell = 0.003; F26bP is "fructose 2,6-bisphosphate";  // CHEBI:28602 kegg.compound:C00665
  species $GLCx in extracellular = 74; GLCx is "glucose";  // CHEBI:4167 kegg.compound:C00031
  species $GLY in cell = 0.15; GLY is "glycerol";  // CHEBI:17754 kegg.compound:C00116
  species $SUC in cell = 0; SUC is "succinate";  // CHEBI:30031 kegg.compound:C00042
  species $TRH in cell = 46334/volume/NA; TRH is "trehalose";  // CHEBI:16551 kegg.compound:C01083
  species $ADH1 in cell = 493540/volume/NA;
  species $ADH5 in cell = 12797/volume/NA;
  species $CDC19 in cell = 6167846/volume/NA;
  species $ENO1 in cell = 2066714/volume/NA;
  species $ENO2 in cell = 5945196/volume/NA;
  species $FBA1 in cell = 4030000/volume/NA;
  species $GLK1 in cell = 135760/volume/NA;
  species $GPD1 in cell = 20581/volume/NA;
  species $GPD2 in cell = 2389/volume/NA;
  species $GPM1 in cell = 2198082/volume/NA;
  species $HOR2 in cell = 16481/volume/NA;
  species $HXK1 in cell = 50528/volume/NA;
  species $HXK2 in cell = 184673/volume/NA;
  species $PDC1 in cell = 3215253/volume/NA;
  species $PDC5 in cell = 37201/volume/NA;
  species $PDC6 in cell = 19695/volume/NA;
  species $PFK1 in cell = 140873/volume/NA;
  species $PFK2 in cell = 117542/volume/NA;
  species $PGI1 in cell = 416403/volume/NA;
  species $PGK1 in cell = 775823/volume/NA;
  species $PGM1 in cell = 9823/volume/NA;  // isEncodedBy sgd:S000001610; uniprot:P33401
  species $PGM2 in cell = 3790/volume/NA;  // isEncodedBy sgd:S000004711; uniprot:P37012
  species $PYK2 in cell = 18277/volume/NA;
  species $RHR2 in cell = 154108/volume/NA;
  species $TDH1 in cell = 1056478/volume/NA;
  species $TDH2 in cell = 0;
  species $TDH3 in cell = 12659757/volume/NA;
  species $TPI1 in cell = 886332/volume/NA;
  species $TPS1 in cell = 10215/volume/NA;  // isEncodedBy sgd:S000000330; uniprot:Q00764
  species $TPS2 in cell = 8009/volume/NA;  // isEncodedBy sgd:S000002481; uniprot:P31688
  species $UGP1 in cell = 18675/volume/NA;  // isEncodedBy sgd:S000001518; uniprot:P32861

  // Parameters:
  Keq_ADH = 14492.75 dimensionless;
  Keq_ENO = 6.7 dimensionless;
  Keq_HXK = 2000 dimensionless;
  Keq_PYK = 6500 dimensionless;
  Keq_TDH = 0.005334127 dimensionless;
  NA = 6.02214e20 per_mmol; NA is "Avogadro constant";
  sum_AXP = 6.02 mM;
  sum_NAD = 1.59 mM;
  sum_UXP = 1.397846 mM;
  volume = 2e-14 litre;
  energy_charge has dimensionless;
  fit_conc has dimensionless;
  sum_PXG has mM; sum_PXG is "glycerate phosphates";

  // Assignment rules:
  AMP := max(sum_AXP - ATP - ADP, 0);
  NADH := max(sum_NAD - NAD, 0);
  UDG := max(sum_UXP - UTP - UDP, 0);
  energy_charge := (ATP + ADP/2)/sum_AXP;
  fit_conc := sqrt(((1 - DHAP*volume*NA/3496987)^2 + (1 - F16bP*volume*NA/13800392)^2 + (1 - F6P*volume*NA/708930)^2 + (1 - G6P*volume*NA/2326001)^2 + (1 - GAP*volume*NA/951170)^2 + (1 - GLC*volume*NA/18909525)^2 + (1 - PEP*volume*NA/1836769)^2 + (1 - PYR*volume*NA/6348755)^2 + (1 - sum_PXG*volume*NA/1618640)^2)/9);
  sum_PXG := P2G + P3G;

  // Reactions:
  ADH_ADH1: AcAld + $NADH -> $EtOH + NAD; cell*rmm_bb(AcAld, NADH, EtOH, NAD, ADH1*ADH_ADH1_kcat, ADH_ADH1_Kacald, ADH_ADH1_Kiacald, ADH_ADH1_Knadh, ADH_ADH1_Kinadh, ADH_ADH1_Ketoh, ADH_ADH1_Kietoh, ADH_ADH1_Knad, ADH_ADH1_Kinad, Keq_ADH); ADH_ADH1 is "alcohol dehydrogenase [ADH1]";  // modifiers: ADH1; kegg.reaction:R00754; isVersionOf ec-code:1.1.1.1 GO:0004022
    ADH_ADH1_kcat = 176 per_second; ADH_ADH1_Ketoh = 17 mM; ADH_ADH1_Kinad = 0.92 mM; ADH_ADH1_Knad = 0.17 mM; ADH_ADH1_Knadh = 0.11 mM; ADH_ADH1_Kinadh = 0.031 mM; ADH_ADH1_Kacald = 0.4622 mM; ADH_ADH1_Kiacald = 1.1 mM; ADH_ADH1_Kietoh = 90 mM;
  ADH_ADH5: AcAld + $NADH -> $EtOH + NAD; cell*rmm_bb(AcAld, NADH, EtOH, NAD, ADH5*ADH_ADH5_kcat, ADH_ADH5_Kacald, ADH_ADH5_Kiacald, ADH_ADH5_Knadh, ADH_ADH5_Kinadh, ADH_ADH5_Ketoh, ADH_ADH5_Kietoh, ADH_ADH5_Knad, ADH_ADH5_Kinad, Keq_ADH); ADH_ADH5 is "alcohol dehydrogenase [ADH5]";  // modifiers: ADH5; kegg.reaction:R00754; isVersionOf ec-code:1.1.1.1 GO:0004022
    ADH_ADH5_kcat = 0 per_second; ADH_ADH5_Ketoh = 17 mM; ADH_ADH5_Kinad = 0.92 mM; ADH_ADH5_Knad = 0.17 mM; ADH_ADH5_Knadh = 0.11 mM; ADH_ADH5_Kinadh = 0.031 mM; ADH_ADH5_Kacald = 1.11 mM; ADH_ADH5_Kiacald = 1.1 mM; ADH_ADH5_Kietoh = 90 mM;
  AK: 2 ADP -> ATP + $AMP; cell*rma(ADP*ADP, AMP*ATP, AK_k, AK_Keq); AK is "adenylate kinase";  // isVersionOf ec-code:2.7.4.3 GO:0004017; kegg.reaction:R00127
    AK_k = 0.75 per_mM_per_second; AK_Keq = 0.45 dimensionless;
  ATPase: ATP => ADP; cell*imm1_np(ATP, ATPase_Vmax, ATPase_Katp);  // isVersionOf GO:0016887
    ATPase_Vmax = 1.133333 mM_per_second; ATPase_Katp = 3 mM;
  ENO_ENO1: P2G -> PEP; cell*rmm1(P2G, PEP, ENO1*ENO_ENO1_kcat, ENO_ENO1_Kp2g, ENO_ENO1_Kpep, Keq_ENO); ENO_ENO1 is "enolase [ENO1]";  // modifiers: ENO1; kegg.reaction:R00658; isVersionOf ec-code:4.2.1.11 GO:0004634
    ENO_ENO1_kcat = 7.6 per_second; ENO_ENO1_Kp2g = 0.043 mM; ENO_ENO1_Kpep = 0.5 mM;
  ENO_ENO2: P2G -> PEP; cell*rmm1(P2G, PEP, ENO2*ENO_ENO2_kcat, ENO_ENO2_Kp2g, ENO_ENO2_Kpep, Keq_ENO); ENO_ENO2 is "enolase [ENO2]";  // modifiers: ENO2; kegg.reaction:R00658; isVersionOf ec-code:4.2.1.11 GO:0004634
    ENO_ENO2_kcat = 19.87 per_second; ENO_ENO2_Kp2g = 0.104 mM; ENO_ENO2_Kpep = 0.5 mM;
  FBA: F16bP -> DHAP + GAP; cell*rmm_ub(F16bP, DHAP, GAP, FBA1*FBA_kcat, Kf16bp, FBA_Kdhap, FBA_Kgap, FBA_Kigap, FBA_Keq); FBA is "fructosebisphosphate aldolase";  // modifiers: FBA1; kegg.reaction:R01068; isVersionOf ec-code:4.1.2.13 GO:0004332
    FBA_kcat = 4.139 per_second; Kf16bp = 0.4507 mM; FBA_Keq = 0.069 mM; FBA_Kdhap = 2 mM; FBA_Kgap = 2.4 mM; FBA_Kigap = 10 mM;
  GPD: DHAP + $NADH -> G3P + NAD; cell*rmm2_3i(DHAP, NADH, G3P, NAD, F16bP, ATP, ADP, GPD_Vmax, GPD_Kdhap, GPD_Knadh, GPD_Kg3p, GPD_Knad, Kfbp, GPD_Katp, GPD_Kadp, GPD_Keq); GPD is "glycerol 3-phosphate dehydrogenase";  // modifiers: ADP, ATP, F16bP, GPD1, GPD2; ec-code:1.1.1.94 kegg.reaction:R00842
    GPD_Vmax = 0.7833333 mM_per_second; GPD_Knadh = 0.023 mM; GPD_Kdhap = 0.54 mM; GPD_Keq = 10000 dimensionless; Kfbp = 4.8 mM; GPD_Katp = 0.73 mM; GPD_Kadp = 2 mM; GPD_Knad = 0.93 mM; GPD_Kg3p = 1.2 mM;
  GPM: P3G -> P2G; cell*rmm1(P3G, P2G, GPM1*GPM_kcat, GPM_Kp3g, GPM_Kp2g, GPM_Keq); GPM is "phosphoglyceromutase";  // modifiers: GPM1; isVersionOf ec-code:5.4.2.1 GO:0004619; kegg.reaction:R01518
    GPM_kcat = 400 per_second; GPM_Kp3g = 1.2 mM; GPM_Keq = 0.19 dimensionless; GPM_Kp2g = 1.41 mM;
  GPP: G3P => $GLY; cell*imm1_np(G3P, GPP_Vmax, GPP_Kg3p); GPP is "glycerol 3-phosphatase";  // modifiers: HOR2, RHR2; ec-code:3.1.3.21 kegg.reaction:R00841
    GPP_Vmax = 0.8833333 mM_per_second; GPP_Kg3p = 3.5 mM;
  HXK_GLK1: GLC + ATP -> G6P + ADP; cell*rmm2(GLC, ATP, G6P, ADP, GLK1*HXK_GLK1_kcat, HXK_GLK1_Kglc, HXK_GLK1_Katp, HXK_GLK1_Kg6p, HXK_GLK1_Kadp, Keq_HXK); HXK_GLK1 is "hexokinase [GLK1]";  // modifiers: GLK1; kegg.reaction:R02848; isVersionOf ec-code:2.7.1.1 GO:0004396
    HXK_GLK1_kcat = 0.0721 per_second; HXK_GLK1_Kglc = 0.0106 mM; HXK_GLK1_Katp = 0.865 mM; HXK_GLK1_Kg6p = 30 mM; HXK_GLK1_Kadp = 0.23 mM;
  HXK_HXK1: GLC + ATP -> G6P + ADP; cell*hxk_t6p(GLC, ATP, G6P, ADP, T6P, HXK1*HXK_HXK1_kcat, HXK_HXK1_Kglc, HXK_HXK1_Katp, HXK_HXK1_Kg6p, HXK_HXK1_Kadp, HXK_HXK1_Kit6p, Keq_HXK); HXK_HXK1 is "hexokinase [HXK1]";  // modifiers: HXK1, T6P; kegg.reaction:R02848; isVersionOf ec-code:2.7.1.1 GO:0004396
    HXK_HXK1_kcat = 10.2 per_second; HXK_HXK1_Kglc = 0.15 mM; HXK_HXK1_Katp = 0.293 mM; HXK_HXK1_Kg6p = 30 mM; HXK_HXK1_Kadp = 0.23 mM; HXK_HXK1_Kit6p = 0.2 mM;
  HXK_HXK2: GLC + ATP -> G6P + ADP; cell*hxk_t6p(GLC, ATP, G6P, ADP, T6P, HXK2*HXK_HXK2_kcat, HXK_HXK2_Kglc, HXK_HXK2_Katp, HXK_HXK2_Kg6p, HXK_HXK2_Kadp, HXK_HXK2_Kit6p, Keq_HXK); HXK_HXK2 is "hexokinase [HXK2]";  // modifiers: HXK2, T6P; kegg.reaction:R02848; isVersionOf ec-code:2.7.1.1 GO:0004396
    HXK_HXK2_kcat = 63.1 per_second; HXK_HXK2_Kglc = 0.2 mM; HXK_HXK2_Katp = 0.195 mM; HXK_HXK2_Kg6p = 30 mM; HXK_HXK2_Kadp = 0.23 mM; HXK_HXK2_Kit6p = 0.04 mM;
  PDC_PDC1: PYR => AcAld; cell*imm1_np(PYR, PDC1*PDC_PDC1_kcat, PDC_PDC1_Kpyr); PDC_PDC1 is "pyruvate decarboxylase [PDC1]";  // modifiers: PDC1; kegg.reaction:R00636; isVersionOf ec-code:4.1.1.1 GO:0004737
    PDC_PDC1_kcat = 12.14 per_second; PDC_PDC1_Kpyr = 8.5 mM;
  PDC_PDC5: PYR => AcAld; cell*imm1_np(PYR, PDC5*PDC_PDC5_kcat, PDC_PDC5_Kpyr); PDC_PDC5 is "pyruvate decarboxylase [PDC5]";  // modifiers: PDC5; kegg.reaction:R00636; isVersionOf ec-code:4.1.1.1 GO:0004737
    PDC_PDC5_kcat = 10.32 per_second; PDC_PDC5_Kpyr = 7.08 mM;
  PDC_PDC6: PYR => AcAld; cell*imm1_np(PYR, PDC6*PDC_PDC6_kcat, PDC_PDC6_Kpyr); PDC_PDC6 is "pyruvate decarboxylase [PDC6]";  // modifiers: PDC6; kegg.reaction:R00636; isVersionOf ec-code:4.1.1.1 GO:0004737
    PDC_PDC6_kcat = 9.21 per_second; PDC_PDC6_Kpyr = 2.92 mM;
  PFK: ATP + F6P => ADP + F16bP; cell*pfk_keq(F6P, ATP, F16bP, ADP, AMP, F26bP, min(PFK1, PFK2)*PFK_kcat, gR, PFK_Kf6p, PFK_Katp, PFK_L0, Ciatp, PFK_Kiatp, Camp, Kamp, Cf26, Kf26, Cf16, Kf16, Catp, PFK_Kadp, PFK_Keq); PFK is "phosphofructokinase";  // modifiers: AMP, F26bP, PFK1, PFK2; isVersionOf ec-code:2.7.1.11 GO:0003872; kegg.reaction:R00756
    PFK_kcat = 209.6 per_second; gR = 5.12 dimensionless; PFK_Kf6p = 0.1 mM; PFK_Katp = 0.71 mM; PFK_L0 = 0.66 dimensionless; Ciatp = 100 dimensionless; PFK_Kiatp = 0.65 mM; Camp = 0.0845 dimensionless; Kamp = 0.0995 mM; Cf26 = 0.0174 dimensionless; Kf26 = 0.000682 mM; Cf16 = 0.397 dimensionless; Kf16 = 0.111 mM; Catp = 3 dimensionless; PFK_Kadp = 1 mM; PFK_Keq = 800 dimensionless;
  PGI: G6P -> F6P; cell*rmm1(G6P, F6P, PGI1*PGI_kcat, PGI_Kg6p, PGI_Kf6p, PGI_Keq); PGI is "phosphoglucose isomerase";  // modifiers: PGI1; kegg.reaction:R00771; isVersionOf ec-code:5.3.1.9 GO:0004347
    PGI_kcat = 487.36 per_second; PGI_Kg6p = 1.0257 mM; PGI_Keq = 0.29 dimensionless; PGI_Kf6p = 0.307 mM;
  PGK: ADP + BPG -> ATP + P3G; cell*pgk_fun(BPG, ADP, P3G, ATP, PGK1*PGK_kcat, PGK_Kbpg, PGK_Kadp, PGK_Kp3g, PGK_Katp, PGK_Keq, nHadp); PGK is "3-phosphoglycerate kinase";  // modifiers: PGK1; kegg.reaction:R01512; isVersionOf ec-code:2.7.2.3 GO:0004618
    PGK_kcat = 58.6 per_second; PGK_Keq = 3200 dimensionless; PGK_Kp3g = 4.58 mM; PGK_Katp = 1.99 mM; PGK_Kbpg = 0.003 mM; PGK_Kadp = 0.2 mM; nHadp = 2 dimensionless;
  PGM: G6P -> G1P; cell*rmm1(G6P, G1P, PGM_Vmax, PGM_Kg6p, PGM_Kg1p, PGM_Keq); PGM is "phosphoglucomutase";  // modifiers: PGM1, PGM2; isVersionOf ec-code:5.4.2.2
    PGM_Vmax = 0.12762 mM_per_second; PGM_Kg6p = 0.05 mM; PGM_Kg1p = 0.023 mM; PGM_Keq = 0.1667 dimensionless;
  PYK_CDC19: ADP + PEP -> ATP + PYR; cell*pyk_fun(PEP, ADP, PYR, ATP, F16bP, CDC19*PYK_CDC19_kcat, PYK_CDC19_Kpep, PYK_CDC19_Kadp, PYK_CDC19_Kpyr, PYK_CDC19_Katp, Keq_PYK, PYK_CDC19_Kiatp, PYK_CDC19_Kf16p, PYK_CDC19_L0); PYK_CDC19 is "pyruvate kinase [CDC19]";  // modifiers: CDC19, F16bP; kegg.reaction:R00200; isVersionOf ec-code:2.7.1.40 GO:0004743
    PYK_CDC19_kcat = 20.146 per_second; PYK_CDC19_Kpep = 0.281 mM; PYK_CDC19_Kadp = 0.243 mM; PYK_CDC19_Kpyr = 21 mM; PYK_CDC19_Katp = 1.5 mM; PYK_CDC19_Kiatp = 9.3 mM; PYK_CDC19_Kf16p = 0.2 mM; PYK_CDC19_L0 = 100 dimensionless;
  PYK_PYK2: ADP + PEP -> ATP + PYR; cell*pyk_fun(PEP, ADP, PYR, ATP, F16bP, PYK2*PYK_PYK2_kcat, PYK_PYK2_Kpep, PYK_PYK2_Kadp, PYK_PYK2_Kpyr, PYK_PYK2_Katp, Keq_PYK, PYK_PYK2_Kiatp, PYK_PYK2_Kf16p, PYK_PYK2_L0); PYK_PYK2 is "pyruvate kinase [PYK2]";  // modifiers: PYK2, F16bP; kegg.reaction:R00200; isVersionOf ec-code:2.7.1.40 GO:0004743
    PYK_PYK2_kcat = 0 per_second; PYK_PYK2_Kpep = 0.19 mM; PYK_PYK2_Kadp = 0.3 mM; PYK_PYK2_Kpyr = 21 mM; PYK_PYK2_Katp = 1.5 mM; PYK_PYK2_Kiatp = 9.3 mM; PYK_PYK2_Kf16p = 0.2 mM; PYK_PYK2_L0 = 100 dimensionless;
  TDH_TDH1: GAP + NAD -> BPG + $NADH; cell*rmm2(GAP, NAD, BPG, NADH, TDH1*TDH_TDH1_kcat, TDH_TDH1_Kgap, TDH_TDH1_Knad, TDH_TDH1_Kbpg, TDH_TDH1_Knadh, Keq_TDH); TDH_TDH1 is "glyceraldehyde phosphate dehydrogenase [TDH1]";  // modifiers: TDH1; kegg.reaction:R01061; isVersionOf ec-code:1.2.1.12 GO:0004365
    TDH_TDH1_kcat = 19.12 per_second; TDH_TDH1_Kgap = 0.495 mM; TDH_TDH1_Knad = 0.09 mM; TDH_TDH1_Kbpg = 0.0098 mM; TDH_TDH1_Knadh = 0.06 mM;
  TDH_TDH2: GAP + NAD -> BPG + $NADH; cell*rmm2(GAP, NAD, BPG, NADH, TDH2*TDH_TDH2_kcat, TDH_TDH2_Kgap, TDH_TDH2_Knad, TDH_TDH2_Kbpg, TDH_TDH2_Knadh, Keq_TDH); TDH_TDH2 is "glyceraldehyde phosphate dehydrogenase [TDH2]";  // modifiers: TDH2; kegg.reaction:R01061; isVersionOf ec-code:1.2.1.12 GO:0004365
    TDH_TDH2_kcat = 8.633 per_second; TDH_TDH2_Kgap = 0.77 mM; TDH_TDH2_Knad = 0.09 mM; TDH_TDH2_Kbpg = 0.0098 mM; TDH_TDH2_Knadh = 0.06 mM;
  TDH_TDH3: GAP + NAD -> BPG + $NADH; cell*rmm2(GAP, NAD, BPG, NADH, TDH3*TDH_TDH3_kcat, TDH_TDH3_Kgap, TDH_TDH3_Knad, TDH_TDH3_Kbpg, TDH_TDH3_Knadh, Keq_TDH); TDH_TDH3 is "glyceraldehyde phosphate dehydrogenase [TDH3]";  // modifiers: TDH3; kegg.reaction:R01061; isVersionOf ec-code:1.2.1.12 GO:0004365
    TDH_TDH3_kcat = 18.162 per_second; TDH_TDH3_Kgap = 0.423 mM; TDH_TDH3_Knad = 0.09 mM; TDH_TDH3_Kbpg = 0.909 mM; TDH_TDH3_Knadh = 0.06 mM;
  TPI: DHAP -> GAP; cell*tpi_fun(DHAP, GAP, TPI1*TPI_kcat, TPI_Kdhap, TPI_Kgap, TPI_Kigap, TPI_Keq); TPI is "triosephosphate isomerase";  // modifiers: TPI1; kegg.reaction:R01015; isVersionOf ec-code:5.3.1.1 GO:0004807
    TPI_kcat = 564.38 per_second; TPI_Kdhap = 6.454 mM; TPI_Kgap = 5.25 mM; TPI_Kigap = 35.1 mM; TPI_Keq = 0.045 dimensionless;
  TPP: T6P => $TRH; cell*imm1_np(T6P, TPP_Vmax, Kt6p); TPP is "T6P phosphatase";  // modifiers: TPS1, TPS2; isVersionOf ec-code:3.1.3.12
    TPP_Vmax = 2.34 mM_per_second; Kt6p = 0.5 mM;
  TPS: G6P + $UDG => T6P + UDP; cell*imm2_np(G6P, UDG, TPS_Vmax, TPS_Kg6p, Kudg); TPS is "T6P synthase";  // modifiers: TPS1, TPS2; isVersionOf ec-code:2.4.1.15
    TPS_Vmax = 0.49356 mM_per_second; TPS_Kg6p = 3.8 mM; Kudg = 0.886 mM;
  UGP: G1P + UTP => $UDG; cell*ugp_fun(UTP, G1P, UDG, UGP_Vmax, Kutp, Kiutp, UGP_Kg1p, Kiudg); UGP is "UDP glucose phosphorylase";  // modifiers: UGP1; isVersionOf ec-code:2.7.7.9
    UGP_Vmax = 13.2552 mM_per_second; Kutp = 0.11 mM; Kiutp = 0.11 mM; UGP_Kg1p = 0.32 mM; Kiudg = 0.0035 mM;
  acetate_branch: AcAld + NAD => $ACE + $NADH; cell*ima(AcAld*NAD, acetate_branch_k);  // isVersionOf GO:0006105
    acetate_branch_k = 0.005543396 per_mM_per_second;
  succinate_branch: PYR + 3 NAD => 0.75 $SUC + 3 $NADH; cell*ima(PYR*NAD, succinate_branch_k);  // isVersionOf GO:0006105
    succinate_branch_k = 0.005496636 per_mM_per_second;
  udp_to_utp: UDP + ATP => UTP + ADP; cell*ima(UDP*ATP, udp_to_utp_k); udp_to_utp is "UDP to UTP pseudoreaction";
    udp_to_utp_k = 0.07452583 per_mM_per_second;
  HXT: $GLCx -> GLC; cell*fd(GLCx, GLC, HXT_Vmax, HXT_Kglc, Ki); HXT is "glucose transport";  // isVersionOf GO:0015758
    HXT_Vmax = 3.35 mM_per_second; HXT_Kglc = 0.9 mM; Ki = 0.91 dimensionless;

  // Unit definitions:
  unit substance = 1e-3 mole; substance is "mmol";
  unit mM = 1e-3 mole / litre;
  unit mM_per_second = 1e-3 mole / (litre * second);
  unit per_second = 1 / second;
  unit per_mM_per_second = litre / (1e-3 mole * second);
  unit per_mmol = 1 / (1e-3 mole);
end
