// SBML level 2 version 1

model MODEL1304120000()
  // Goyal2014 - Genome-scale metabolic model of M.maripaludis S2
  // Constraint-based genome-scale Metabolic Model of Methanococcus maripaludis S2
  // biomodels.db:MODEL1304120000
  // hasTaxon taxonomy:267377
  // isVersionOf GO:0044237

  // Compartments:
  compartment cell;

  // Species:
  species tthcudp in cell = 1/cell;
  species iasp in cell = 1/cell;
  species dna in cell = 1/cell;
  species phe in cell = 1/cell;
  species alac_S in cell = 1/cell;
  species aoxp in cell = 1/cell;
  species hybyr in cell = 1/cell;
  species $a_5mthg_e in cell = 1/cell;
  species a_4hlt in cell = 1/cell;
  species ade in cell = 1/cell;
  species s2mbcoa in cell = 1/cell;
  species trnaglnyl in cell = 1/cell;
  species ru5p in cell = 1/cell;
  species ahup in cell = 1/cell;
  species trnaile in cell = 1/cell;
  species aglu in cell = 1/cell;
  species hisal in cell = 1/cell;
  species trnatyr in cell = 1/cell;
  species mbcoa in cell = 1/cell;
  species fmn in cell = 1/cell;
  species cair in cell = 1/cell;
  species e4p in cell = 1/cell;
  species rib_D in cell = 1/cell;
  species pmcoa in cell = 1/cell;
  species trnaasn in cell = 1/cell;
  species cbasp in cell = 1/cell;
  species methmpt in cell = 1/cell;
  species dtdp in cell = 1/cell;
  species udp in cell = 1/cell;
  species idp in cell = 1/cell;
  species uppg1 in cell = 1/cell;
  species dpcoa in cell = 1/cell;
  species accoa in cell = 1/cell;
  species a_78hptab5p in cell = 1/cell;
  species adp in cell = 1/cell;
  species cdp in cell = 1/cell;
  species phosphoplipid in cell = 1/cell;
  species ditp in cell = 1/cell;
  species gdp in cell = 1/cell;
  species db4p in cell = 1/cell;
  species iacp in cell = 1/cell;
  species mcsn in cell = 1/cell;
  species man1p in cell = 1/cell;
  species a_3dhq in cell = 1/cell;
  species cd2 in cell = 1/cell;
  species emm in cell = 1/cell;
  species trnasec in cell = 1/cell;
  species formate in cell = 1/cell;
  species cit in cell = 1/cell;
  species gam1p in cell = 1/cell;
  species asptrna in cell = 1/cell;
  species gly in cell = 1/cell;
  species apoc in cell = 1/cell;
  species h in cell = 1/cell;
  species $cd2_e in cell = 1/cell;
  species lys in cell = 1/cell;
  species xan in cell = 1/cell;
  species $h2_e in cell = 1/cell;
  species trnaleu in cell = 1/cell;
  species copre3 in cell = 1/cell;
  species thmpt in cell = 1/cell;
  species $n2_e in cell = 1/cell;
  species a_4mpetz in cell = 1/cell;
  species napthm in cell = 1/cell;
  species a_13dpg in cell = 1/cell;
  species cof420_0 in cell = 1/cell;
  species $h2s_e in cell = 1/cell;
  species pyr5p in cell = 1/cell;
  species uacmau in cell = 1/cell;
  species rfab in cell = 1/cell;
  species $nh3_e in cell = 1/cell;
  species a_2mm in cell = 1/cell;
  species thpp in cell = 1/cell;
  species $urea_e in cell = 1/cell;
  species udpDgal in cell = 1/cell;
  species a_3slala in cell = 1/cell;
  species xmp in cell = 1/cell;
  species electron in cell = 1/cell;
  species trnacys in cell = 1/cell;
  species didp in cell = 1/cell;
  species gua in cell = 1/cell;
  species anth in cell = 1/cell;
  species ppi in cell = 1/cell;
  species co_2 in cell = 1/cell;
  species trnagly in cell = 1/cell;
  species ump in cell = 1/cell;
  species imp in cell = 1/cell;
  species dnptp in cell = 1/cell;
  species $lys_e in cell = 1/cell;
  species pi in cell = 1/cell;
  species amp in cell = 1/cell;
  species cmp in cell = 1/cell;
  species gmp in cell = 1/cell;
  species VitB12 in cell = 1/cell;
  species a_2ipmal in cell = 1/cell;
  species mlthf in cell = 1/cell;
  species $a_1hydtc_e in cell = 1/cell;
  species nicrns in cell = 1/cell;
  species hisl in cell = 1/cell;
  species actyn in cell = 1/cell;
  species s_lac in cell = 1/cell;
  species a_2oival in cell = 1/cell;
  species pre3b in cell = 1/cell;
  species semth in cell = 1/cell;
  species succoa in cell = 1/cell;
  species pre3a in cell = 1/cell;
  species agnt in cell = 1/cell;
  species ala in cell = 1/cell;
  species sertrna in cell = 1/cell;
  species fgam in cell = 1/cell;
  species ddhrb in cell = 1/cell;
  species scl in cell = 1/cell;
  species copre8 in cell = 1/cell;
  species mgdnt in cell = 1/cell;
  species ni2 in cell = 1/cell;
  species ACP in cell = 1/cell;
  species cysteate in cell = 1/cell;
  species spmd in cell = 1/cell;
  species nic in cell = 1/cell;
  species a_7oxhep in cell = 1/cell;
  species ambpt in cell = 1/cell;
  species $amob_e in cell = 1/cell;
  species a_2dhp in cell = 1/cell;
  species thf in cell = 1/cell;
  species mhdt in cell = 1/cell;
  species biomass in cell = 1/cell;
  species ahdt in cell = 1/cell;
  species dhmtpz in cell = 1/cell;
  species e4hglu in cell = 1/cell;
  species a_2hethpp in cell = 1/cell;
  species $btn_e in cell = 1/cell;
  species spermn in cell = 1/cell;
  species ldpg in cell = 1/cell;
  species a_4ppan in cell = 1/cell;
  species cof420h2 in cell = 1/cell;
  species rthio in cell = 1/cell;
  species ser in cell = 1/cell;
  species trnaselcys in cell = 1/cell;
  species $mobd_e in cell = 1/cell;
  species f6p in cell = 1/cell;
  species protein in cell = 1/cell;
  species dctp in cell = 1/cell;
  species skm in cell = 1/cell;
  species prnoate in cell = 1/cell;
  species h2o in cell = 1/cell;
  species $mtr1p_e in cell = 1/cell;
  species cof420_1 in cell = 1/cell;
  species agm in cell = 1/cell;
  species a_78dptf5p in cell = 1/cell;
  species air in cell = 1/cell;
  species pro in cell = 1/cell;
  species $ala_e in cell = 1/cell;
  species tyrtrna in cell = 1/cell;
  species dasn in cell = 1/cell;
  species argtrna in cell = 1/cell;
  species srhc in cell = 1/cell;
  species oaa in cell = 1/cell;
  species fthmpt in cell = 1/cell;
  species fc1p in cell = 1/cell;
  species $mg2_e in cell = 1/cell;
  species com_s_s_cob in cell = 1/cell;
  species apcad in cell = 1/cell;
  species dhmbn in cell = 1/cell;
  species histrna in cell = 1/cell;
  species ppbng in cell = 1/cell;
  species $a_2plac_e in cell = 1/cell;
  species s7p in cell = 1/cell;
  species trnatrp in cell = 1/cell;
  species Soluble_pools in cell = 1/cell;
  species afapdrp in cell = 1/cell;
  species asn in cell = 1/cell;
  species arg in cell = 1/cell;
  species valtrna in cell = 1/cell;
  species dcdp in cell = 1/cell;
  species shcys in cell = 1/cell;
  species csn in cell = 1/cell;
  species dmpp in cell = 1/cell;
  species a_2oxglu in cell = 1/cell;
  species napthah in cell = 1/cell;
  species gsn in cell = 1/cell;
  species fdxrd in cell = 1/cell;
  species cof420_3 in cell = 1/cell;
  species $w_e in cell = 1/cell;
  species cgmp in cell = 1/cell;
  species dgmp in cell = 1/cell;
  species igp in cell = 1/cell;
  species fmfr in cell = 1/cell;
  species asp_d in cell = 1/cell;
  species CDP_archaeol in cell = 1/cell;
  species npran in cell = 1/cell;
  species cacn in cell = 1/cell;
  species smtc in cell = 1/cell;
  species pardb in cell = 1/cell;
  species mg2 in cell = 1/cell;
  species tyrmn in cell = 1/cell;
  species a_5aprau in cell = 1/cell;
  species dc in cell = 1/cell;
  species indole in cell = 1/cell;
  species h2s in cell = 1/cell;
  species applp in cell = 1/cell;
  species a_5a4ic in cell = 1/cell;
  species Pimeloyl__acp_ in cell = 1/cell;
  species tcpl in cell = 1/cell;
  species grdp in cell = 1/cell;
  species dgly in cell = 1/cell;
  species copre6 in cell = 1/cell;
  species val in cell = 1/cell;
  species ccpl in cell = 1/cell;
  species mal in cell = 1/cell;
  species agsa in cell = 1/cell;
  species so3 in cell = 1/cell;
  species thrtrna in cell = 1/cell;
  species adn in cell = 1/cell;
  species mbecoa in cell = 1/cell;
  species a_8aonn in cell = 1/cell;
  species a_2dr1p in cell = 1/cell;
  species s26dap in cell = 1/cell;
  species $pi_e in cell = 1/cell;
  species ipdp in cell = 1/cell;
  species $ura_e in cell = 1/cell;
  species w in cell = 1/cell;
  species xtp in cell = 1/cell;
  species crtn in cell = 1/cell;
  species a_2r3sipmal in cell = 1/cell;
  species hmgcoa in cell = 1/cell;
  species nad in cell = 1/cell;
  species utp in cell = 1/cell;
  species pim in cell = 1/cell;
  species datp in cell = 1/cell;
  species itp in cell = 1/cell;
  species fad in cell = 1/cell;
  species hbtc in cell = 1/cell;
  species ophser in cell = 1/cell;
  species g3p in cell = 1/cell;
  species dutp in cell = 1/cell;
  species atp in cell = 1/cell;
  species ctp in cell = 1/cell;
  species ohcoa in cell = 1/cell;
  species dadsn in cell = 1/cell;
  species gtp in cell = 1/cell;
  species dhf in cell = 1/cell;
  species fe3 in cell = 1/cell;
  species $hpap_e in cell = 1/cell;
  species x5p in cell = 1/cell;
  species a_4pasp in cell = 1/cell;
  species rnam in cell = 1/cell;
  species dann in cell = 1/cell;
  species udp_glu in cell = 1/cell;
  species copre5b in cell = 1/cell;
  species pram in cell = 1/cell;
  species cpad5p in cell = 1/cell;
  species coa in cell = 1/cell;
  species dhamt in cell = 1/cell;
  species dtmp in cell = 1/cell;
  species pslac in cell = 1/cell;
  species dhmpt in cell = 1/cell;
  species COM in cell = 1/cell;
  species a_3h3mop in cell = 1/cell;
  species $formate_e in cell = 1/cell;
  species urea in cell = 1/cell;
  species uppg3 in cell = 1/cell;
  species hrdn in cell = 1/cell;
  species r5p in cell = 1/cell;
  species a_4ppncys in cell = 1/cell;
  species man6p in cell = 1/cell;
  species nadh in cell = 1/cell;
  species selp in cell = 1/cell;
  species $csn_e in cell = 1/cell;
  species nmn in cell = 1/cell;
  species trnaglu in cell = 1/cell;
  species gam6p in cell = 1/cell;
  species nadp in cell = 1/cell;
  species trnaglmn in cell = 1/cell;
  species trnaasnyl in cell = 1/cell;
  species mthsel in cell = 1/cell;
  species dadp in cell = 1/cell;
  species dnpt in cell = 1/cell;
  species nh3 in cell = 1/cell;
  species trp in cell = 1/cell;
  species aclact in cell = 1/cell;
  species thmmp in cell = 1/cell;
  species pramp in cell = 1/cell;
  species dudp in cell = 1/cell;
  species $co2_e in cell = 1/cell;
  species $rbz_e in cell = 1/cell;
  species acetate in cell = 1/cell;
  species thr3p in cell = 1/cell;
  species $ni2_e in cell = 1/cell;
  species lacald in cell = 1/cell;
  species cobya in cell = 1/cell;
  species agdpcbi in cell = 1/cell;
  species a_23dhmb in cell = 1/cell;
  species acobh in cell = 1/cell;
  species mev_R in cell = 1/cell;
  species na in cell = 1/cell;
  species fe2 in cell = 1/cell;
  species glycogen in cell = 1/cell;
  species ribflv in cell = 1/cell;
  species a_2oxbut in cell = 1/cell;
  species sahc in cell = 1/cell;
  species mthp in cell = 1/cell;
  species aicar in cell = 1/cell;
  species $biomass_e in cell = 1/cell;
  species $nh4_e in cell = 1/cell;
  species trnaseryl in cell = 1/cell;
  species a_2pg in cell = 1/cell;
  species a_3pg in cell = 1/cell;
  species a_4abz in cell = 1/cell;
  species trnamet in cell = 1/cell;
  species duri in cell = 1/cell;
  species $xan_e in cell = 1/cell;
  species prfica in cell = 1/cell;
  species chrs in cell = 1/cell;
  species copre4 in cell = 1/cell;
  species dmbz in cell = 1/cell;
  species ppcoa in cell = 1/cell;
  species iletrna in cell = 1/cell;
  species claald in cell = 1/cell;
  species dmlz in cell = 1/cell;
  species selt in cell = 1/cell;
  species maacoa in cell = 1/cell;
  species sheme in cell = 1/cell;
  species pptn in cell = 1/cell;
  species r2mm in cell = 1/cell;
  species acobda in cell = 1/cell;
  species dna5mc in cell = 1/cell;
  species cadv in cell = 1/cell;
  species mtthmpt in cell = 1/cell;
  species dgdp in cell = 1/cell;
  species sdaop in cell = 1/cell;
  species ggdp in cell = 1/cell;
  species dnad in cell = 1/cell;
  species copre5a in cell = 1/cell;
  species hoxglu in cell = 1/cell;
  species oxa in cell = 1/cell;
  species btamp in cell = 1/cell;
  species phaccoa in cell = 1/cell;
  species hcarb in cell = 1/cell;
  species pyr in cell = 1/cell;
  species fgar in cell = 1/cell;
  species addth in cell = 1/cell;
  species tyr in cell = 1/cell;
  species cPMP in cell = 1/cell;
  species a_23gglyc1p in cell = 1/cell;
  species gar in cell = 1/cell;
  species dhap in cell = 1/cell;
  species actn_R in cell = 1/cell;
  species $ch4_e in cell = 1/cell;
  species bcoa in cell = 1/cell;
  species dhptdn in cell = 1/cell;
  species a_5pmev in cell = 1/cell;
  species a_2plac in cell = 1/cell;
  species etoh in cell = 1/cell;
  species aacoa in cell = 1/cell;
  species ind3ac in cell = 1/cell;
  species a_78dptftp in cell = 1/cell;
  species dhphe in cell = 1/cell;
  species pratp in cell = 1/cell;
  species co1dam in cell = 1/cell;
  species doroa in cell = 1/cell;
  species prph in cell = 1/cell;
  species $hco3_e in cell = 1/cell;
  species his in cell = 1/cell;
  species $co_2_e in cell = 1/cell;
  species aglup in cell = 1/cell;
  species a_1hydtc in cell = 1/cell;
  species pre6a in cell = 1/cell;
  species prpp in cell = 1/cell;
  species a_78dnpt3p in cell = 1/cell;
  species amob in cell = 1/cell;
  species ccald in cell = 1/cell;
  species a_5mta in cell = 1/cell;
  species en6lip in cell = 1/cell;
  species glyclt in cell = 1/cell;
  species a_3pser in cell = 1/cell;
  species tcudp in cell = 1/cell;
  species glu in cell = 1/cell;
  species gdpman in cell = 1/cell;
  species dcmp in cell = 1/cell;
  species sama in cell = 1/cell;
  species a_4ampm in cell = 1/cell;
  species a_78dptr5p in cell = 1/cell;
  species $acetate_e in cell = 1/cell;
  species pc2 in cell = 1/cell;
  species mfr in cell = 1/cell;
  species ps in cell = 1/cell;
  species cytdn in cell = 1/cell;
  species hislp in cell = 1/cell;
  species mo in cell = 1/cell;
  species hmbil in cell = 1/cell;
  species $h2o_e in cell = 1/cell;
  species co in cell = 1/cell;
  species a_2hydoxglu in cell = 1/cell;
  species e6lip in cell = 1/cell;
  species daprap in cell = 1/cell;
  species a_5alev in cell = 1/cell;
  species thrds in cell = 1/cell;
  species a_3sfpyr in cell = 1/cell;
  species amy in cell = 1/cell;
  species hcys in cell = 1/cell;
  species succ in cell = 1/cell;
  species dcamp in cell = 1/cell;
  species cba in cell = 1/cell;
  species cystrna in cell = 1/cell;
  species a_3phpyr in cell = 1/cell;
  species nacorn in cell = 1/cell;
  species trptrna in cell = 1/cell;
  species naptal in cell = 1/cell;
  species ile in cell = 1/cell;
  species leu in cell = 1/cell;
  species icit in cell = 1/cell;
  species hmisc in cell = 1/cell;
  species saicar in cell = 1/cell;
  species trnaalanyl in cell = 1/cell;
  species glx in cell = 1/cell;
  species fmnh2 in cell = 1/cell;
  species codhpre6 in cell = 1/cell;
  species btn in cell = 1/cell;
  species c2h4 in cell = 1/cell;
  species $na_e in cell = 1/cell;
  species pstrna in cell = 1/cell;
  species padn in cell = 1/cell;
  species pythp in cell = 1/cell;
  species dkfp in cell = 1/cell;
  species fthf in cell = 1/cell;
  species $so4_e in cell = 1/cell;
  species trnaser in cell = 1/cell;
  species oxygen in cell = 1/cell;
  species tpp in cell = 1/cell;
  species disnp in cell = 1/cell;
  species Nmtyr in cell = 1/cell;
  species pant_R in cell = 1/cell;
  species nadph in cell = 1/cell;
  species trnapseryl in cell = 1/cell;
  species pan4p in cell = 1/cell;
  species hmoa in cell = 1/cell;
  species cpp in cell = 1/cell;
  species trnaleucyl in cell = 1/cell;
  species fpp in cell = 1/cell;
  species a_7mrhpt in cell = 1/cell;
  species hser in cell = 1/cell;
  species pep in cell = 1/cell;
  species fum in cell = 1/cell;
  species $dasn_e in cell = 1/cell;
  species dlglu in cell = 1/cell;
  species nagn1p in cell = 1/cell;
  species a_3slac in cell = 1/cell;
  species quln in cell = 1/cell;
  species slac in cell = 1/cell;
  species gln in cell = 1/cell;
  species ig3p in cell = 1/cell;
  species dm78dhmpt in cell = 1/cell;
  species copre7 in cell = 1/cell;
  species $oxygen_e in cell = 1/cell;
  species protrna in cell = 1/cell;
  species a_7merhthr in cell = 1/cell;
  species glyc1p in cell = 1/cell;
  species orot5p in cell = 1/cell;
  species r1p in cell = 1/cell;
  species $Glycald_e in cell = 1/cell;
  species $pro_e in cell = 1/cell;
  species trnaala in cell = 1/cell;
  species trnahis in cell = 1/cell;
  species trnaval in cell = 1/cell;
  species dtbt in cell = 1/cell;
  species ttfdp in cell = 1/cell;
  species pht in cell = 1/cell;
  species cbp in cell = 1/cell;
  species pre6b in cell = 1/cell;
  species f1p in cell = 1/cell;
  species g1p in cell = 1/cell;
  species coshrdn in cell = 1/cell;
  species so4 in cell = 1/cell;
  species sam in cell = 1/cell;
  species $ind3ac_e in cell = 1/cell;
  species $mo_e in cell = 1/cell;
  species phetrna in cell = 1/cell;
  species mglyx in cell = 1/cell;
  species cob in cell = 1/cell;
  species trnathr in cell = 1/cell;
  species camp in cell = 1/cell;
  species damp in cell = 1/cell;
  species acald in cell = 1/cell;
  species insn in cell = 1/cell;
  species prfa in cell = 1/cell;
  species ptrc in cell = 1/cell;
  species xtsn in cell = 1/cell;
  species dump in cell = 1/cell;
  species lprtn in cell = 1/cell;
  species citr in cell = 1/cell;
  species orot in cell = 1/cell;
  species trnalysyl in cell = 1/cell;
  species ggrglyc1p in cell = 1/cell;
  species thr in cell = 1/cell;
  species lct in cell = 1/cell;
  species asp in cell = 1/cell;
  species thym in cell = 1/cell;
  species btc in cell = 1/cell;
  species fdox in cell = 1/cell;
  species trnaasp in cell = 1/cell;
  species mocof in cell = 1/cell;
  species trnaarg in cell = 1/cell;
  species $mthg_e in cell = 1/cell;
  species itcn in cell = 1/cell;
  species glyald in cell = 1/cell;
  species copp1 in cell = 1/cell;
  species mthmpt in cell = 1/cell;
  species ch4 in cell = 1/cell;
  species actn in cell = 1/cell;
  species a_5dpmev in cell = 1/cell;
  species mpcoa in cell = 1/cell;
  species a_23dpa in cell = 1/cell;
  species mobd in cell = 1/cell;
  species a_23h3mop in cell = 1/cell;
  species adocbi in cell = 1/cell;
  species trnapro in cell = 1/cell;
  species a_2secys in cell = 1/cell;
  species pre5 in cell = 1/cell;
  species a_36dahx in cell = 1/cell;
  species metsela in cell = 1/cell;
  species h2 in cell = 1/cell;
  species orn in cell = 1/cell;
  species g6p in cell = 1/cell;
  species n2 in cell = 1/cell;
  species a_5cpsk in cell = 1/cell;
  species hmnapth in cell = 1/cell;
  species a_3spyr in cell = 1/cell;
  species a_2sipmal in cell = 1/cell;
  species ppyr in cell = 1/cell;
  species a_26dap in cell = 1/cell;
  species adocbip in cell = 1/cell;
  species sald in cell = 1/cell;
  species nh4 in cell = 1/cell;
  species mbpt in cell = 1/cell;
  species a_2mahmp in cell = 1/cell;
  species hpyr in cell = 1/cell;
  species thymd in cell = 1/cell;
  species dgtp in cell = 1/cell;
  species mpyr in cell = 1/cell;
  species dplr in cell = 1/cell;
  species a_2oxsub in cell = 1/cell;
  species asntrna in cell = 1/cell;
  species a_25adrpn in cell = 1/cell;
  species fald in cell = 1/cell;
  species cdpdg in cell = 1/cell;
  species seld in cell = 1/cell;
  species $so3_e in cell = 1/cell;
  species shk3p in cell = 1/cell;
  species fadh2 in cell = 1/cell;
  species trnalys in cell = 1/cell;
  species dhma in cell = 1/cell;
  species uacmam in cell = 1/cell;
  species $selnt_e in cell = 1/cell;
  species a_4ahmmp in cell = 1/cell;
  species a_3dsk in cell = 1/cell;
  species Glycald in cell = 1/cell;
  species cof3 in cell = 1/cell;
  species hco3 in cell = 1/cell;
  species aribau in cell = 1/cell;
  species a_2ip3os in cell = 1/cell;
  species cof430 in cell = 1/cell;
  species cof420 in cell = 1/cell;
  species a_2a4h78dnpt in cell = 1/cell;
  species trnaphe in cell = 1/cell;
  species prufa in cell = 1/cell;
  species nicrnt in cell = 1/cell;
  species glc in cell = 1/cell;
  species rbz in cell = 1/cell;
  species uacgam in cell = 1/cell;
  species a_3mop in cell = 1/cell;
  species a_4mop in cell = 1/cell;
  species a_78dptapr in cell = 1/cell;
  species asp4sa in cell = 1/cell;
  species dhpeg in cell = 1/cell;
  species $cys_e in cell = 1/cell;
  species hemt in cell = 1/cell;
  species $h_e in cell = 1/cell;
  species a_2ahbut in cell = 1/cell;
  species trnametyl in cell = 1/cell;
  species cys in cell = 1/cell;
  species dpmn in cell = 1/cell;
  species tdpa in cell = 1/cell;
  species trnagln in cell = 1/cell;
  species M26daP in cell = 1/cell;
  species uri in cell = 1/cell;
  species apol in cell = 1/cell;
  species hgbam in cell = 1/cell;
  species glytrna in cell = 1/cell;
  species itcncoa in cell = 1/cell;
  species $Fe3_e in cell = 1/cell;
  species co2dam in cell = 1/cell;
  species glutrna in cell = 1/cell;
  species acmana in cell = 1/cell;
  species dttp in cell = 1/cell;
  species capri in cell = 1/cell;
  species a_34hpp in cell = 1/cell;
  species dg in cell = 1/cell;
  species pre4 in cell = 1/cell;
  species met in cell = 1/cell;
  species args5p in cell = 1/cell;
  species rna in cell = 1/cell;
  species $pim_e in cell = 1/cell;
  species $fe2_e in cell = 1/cell;
  species mteths in cell = 1/cell;
  species co2 in cell = 1/cell;
  species trnaselmet in cell = 1/cell;
  species pac in cell = 1/cell;
  species a_3h2mbcoa in cell = 1/cell;
  species a_24dnt in cell = 1/cell;
  species ura in cell = 1/cell;
  species mtr1p in cell = 1/cell;

  // Reactions:
  R1: g1p -> g6p; v_1();
    v_1 = 1;
  R2: adp + glc => amp + g6p; v_2();
    v_2 = 1;
  R3: g3p + nadp + h2o => a_3pg + nadph + h; v_3();
    v_3 = 1;
  R4: atp + a_3pg -> adp + a_13dpg; v_4();
    v_4 = 1;
  R5: a_2pg -> a_3pg; v_5();
    v_5 = 1;
  R6: a_2pg -> pep + h2o; v_6();
    v_6 = 1;
  R7: atp + pyr -> adp + pep; v_7();
    v_7 = 1;
  R8: 2 fdox + coa + pyr -> 2 fdxrd + accoa + co2 + 2 h; v_8();
    v_8 = 1;
  R9: en6lip + nad -> e6lip + nadh + h; v_9();
    v_9 = 1;
  R10: etoh + nad -> acald + nadh + h; v_10();
    v_10 = 1;
  R11: g6p -> f6p; v_11();
    v_11 = 1;
  R12: fpp + h2o => f6p + pi; v_12();
    v_12 = 1;
  R13: fpp -> dhap + g3p; v_13();
    v_13 = 1;
  R14: g3p -> dhap; v_14();
    v_14 = 1;
  R15: g3p + pi + nad -> a_13dpg + nadh + h; v_15();
    v_15 = 1;
  R16: g3p + pi + nadp -> a_13dpg + nadph + h; v_16();
    v_16 = 1;
  R17: g3p + h2o + 2 fdox => a_3pg + 2 h + 2 fdxrd; v_17();
    v_17 = 1;
  R18: mal + nadp => nadph + pyr + co2 + h; v_18();
    v_18 = 1;
  R19: mal + nad => nadh + pyr + h + co2; v_19();
    v_19 = 1;
  R20: 2 fdxrd + co2 + 2 h + ppcoa => 2 fdox + 2 a_2oxbut + coa; v_20();
    v_20 = 1;
  R21: oaa + atp => adp + co2 + pep; v_21();
    v_21 = 1;
  R22: oaa + pi -> h2o + co2 + pep; v_22();
    v_22 = 1;
  R23: atp + acetate + coa => accoa + amp + ppi; v_23();
    v_23 = 1;
  R24: accoa + adp + pi => acetate + atp + coa; v_24();
    v_24 = 1;
  R25: atp + pyr + hco3 + h => adp + pi + oaa; v_25();
    v_25 = 1;
  R26: mal + nad -> oaa + nadh + h; v_26();
    v_26 = 1;
  R27: mal -> fum + h2o; v_27();
    v_27 = 1;
  R28: atp + succ + coa -> adp + pi + succoa; v_28();
    v_28 = 1;
  R29: 2 fdxrd + succoa + co2 + 2 h => 2 fdox + a_2oxglu + coa; v_29();
    v_29 = 1;
  R30: adp + f6p => amp + fpp; v_30();
    v_30 = 1;
  R31: ru5p -> x5p; v_31();
    v_31 = 1;
  R32: atp + rib_D -> adp + r5p; v_32();
    v_32 = 1;
  R33: r5p -> ru5p; v_33();
    v_33 = 1;
  R34: atp + r5p -> amp + prpp; v_34();
    v_34 = 1;
  R35: ahup -> f6p; v_35();
    v_35 = 1;
  R36: s7p + g3p -> r5p + x5p; v_36();
    v_36 = 1;
  R37: s7p + g3p -> e4p + f6p; v_37();
    v_37 = 1;
  R38: f6p + g3p -> e4p + x5p; v_38();
    v_38 = 1;
  R39: ru5p + fald -> ahup; v_39();
    v_39 = 1;
  R40: r1p -> r5p; v_40();
    v_40 = 1;
  R41: 2 fdox + h2 -> 2 fdxrd + 2 h; v_41();
    v_41 = 1;
  R42: fmfr + h2o => formate + mfr; v_42();
    v_42 = 1;
  R43: fmfr + thmpt -> mfr + fthmpt; v_43();
    v_43 = 1;
  R44: methmpt + h2 => mtthmpt + h; v_44();
    v_44 = 1;
  R45: fthmpt + h => methmpt + h2o; v_45();
    v_45 = 1;
  R46: mtthmpt + cof420h2 -> cof420 + methmpt; v_46();
    v_46 = 1;
  R47: a_34hpp + aribau + 2 sam + h2o => ddhrb + 2 met + 2 dasn + oxa + nh3; v_47();
    v_47 = 1;
  R48: ddhrb + ldpg => cof420_0 + gmp; v_48();
    v_48 = 1;
  R49: cof420_0 + gtp + glu => cof420_1 + gdp + pi; v_49();
    v_49 = 1;
  R50: cof420_1 + gtp + glu => cof420 + gdp + pi; v_50();
    v_50 = 1;
  R51: a_2plac + gtp => ldpg + ppi; v_51();
    v_51 = 1;
  R52: atp + cof420 + glu => adp + cof420_3 + pi; v_52();
    v_52 = 1;
  R53: mtthmpt + cof420h2 -> mthmpt + cof420; v_53();
    v_53 = 1;
  R54: accoa + thmpt + h -> mthmpt + co + coa; v_54();
    v_54 = 1;
  R55: mthmpt + COM + na -> thmpt + mteths + $na_e; v_55();
    v_55 = 1;
  R56: cob + mteths => com_s_s_cob + ch4; v_56();
    v_56 = 1;
  R57: com_s_s_cob + dhmtpz => COM + cob + mthp; v_57();
    v_57 = 1;
  R58: so3 + pep => pslac; v_58();
    v_58 = 1;
  R59: pslac + h2o => slac + pi; v_59();
    v_59 = 1;
  R60: slac + nad => a_3spyr + nadh + h; v_60();
    v_60 = 1;
  R61: slac + nadp => a_3spyr + nadph + h; v_61();
    v_61 = 1;
  R62: a_3spyr => sald + co2; v_62();
    v_62 = 1;
  R63: co2 + h2o -> hco3 + h; v_63();
    v_63 = 1;
  R64: thf + fald => mlthf + h2o; v_64();
    v_64 = 1;
  R65: ser + thmpt => mtthmpt + gly + h2o; v_65();
    v_65 = 1;
  R66: co2 + fdxrd -> co + h2o + fdox; v_66();
    v_66 = 1;
  R67: co2 + mfr + nadh + h -> fmfr + h2o + nad; v_67();
    v_67 = 1;
  R68: h2 -> 2 h + 2 electron; v_68();
    v_68 = 1;
  R69: atp + dnad + nh3 => amp + ppi + nad; v_69();
    v_69 = 1;
  R70: gln + h2o => glu + nh3; v_70();
    v_70 = 1;
  R71: atp + glu + nh3 => adp + pi + gln; v_71();
    v_71 = 1;
  R72: 16 atp + n2 + 8 fdxrd + 8 h + 16 h2o => 16 pi + 16 adp + 8 fdox + 2 nh3 + h2; v_72();
    v_72 = 1;
  R73: cba -> co2 + h2o; v_73();
    v_73 = 1;
  R74: nh4 => h + nh3; v_74();
    v_74 = 1;
  R75: succ + fad -> fadh2 + fum; v_75();
    v_75 = 1;
  R76: adp + pi + 3 $h_e -> atp + h2o + 3 h; v_76();
    v_76 = 1;
  R77: ppi + h2o => 2 pi; v_77();
    v_77 = 1;
  R78: atp + h2o => adp + pi; v_78();
    v_78 = 1;
  R79: atp + prpp -> pratp + ppi; v_79();
    v_79 = 1;
  R80: pratp + h2o => pramp + ppi; v_80();
    v_80 = 1;
  R81: pramp + h2o => prfa; v_81();
    v_81 = 1;
  R82: prfa => prufa; v_82();
    v_82 = 1;
  R83: ig3p => iacp + h2o; v_83();
    v_83 = 1;
  R84: iacp + glu => hislp + a_2oxglu; v_84();
    v_84 = 1;
  R85: hisl + nad => hisal + nadh + h; v_85();
    v_85 = 1;
  R86: hisal + h2o + nad => his + nadh + h; v_86();
    v_86 = 1;
  R87: hislp + h2o => hisl + pi; v_87();
    v_87 = 1;
  R88: prufa + gln => ig3p + glu + aicar; v_88();
    v_88 = 1;
  R89: a_4mop + coa + 2 fdox => mbcoa + co2 + 2 fdxrd + h; v_89();
    v_89 = 1;
  R90: leu + a_2oxglu -> a_4mop + glu; v_90();
    v_90 = 1;
  R91: val + a_2oxglu -> a_2oival + glu; v_91();
    v_91 = 1;
  R92: a_2oival + coa + 2 fdox => mpcoa + co2 + 2 fdxrd + h; v_92();
    v_92 = 1;
  R93: ile + a_2oxglu -> a_3mop + glu; v_93();
    v_93 = 1;
  R94: a_3mop + coa + 2 fdox => s2mbcoa + co2 + 2 fdxrd + h; v_94();
    v_94 = 1;
  R95: emm + nad => a_2oxbut + co2 + nadh + h; v_95();
    v_95 = 1;
  R96: a_2oxbut + a_2hethpp => a_2ahbut + thpp; v_96();
    v_96 = 1;
  R97: a_2ahbut -> a_3h3mop; v_97();
    v_97 = 1;
  R98: a_23h3mop + nadp -> a_3h3mop + nadph + h; v_98();
    v_98 = 1;
  R99: a_23h3mop => a_3mop + h2o; v_99();
    v_99 = 1;
  R100: alac_S -> hmoa; v_100();
    v_100 = 1;
  R101: a_23dhmb + nadp -> hmoa + nadph + h; v_101();
    v_101 = 1;
  R102: a_23dhmb => a_2oival + h2o; v_102();
    v_102 = 1;
  R103: accoa + pyr + h2o => r2mm + coa; v_103();
    v_103 = 1;
  R104: a_2sipmal -> a_2ipmal + h2o; v_104();
    v_104 = 1;
  R105: a_2r3sipmal -> a_2ipmal + h2o; v_105();
    v_105 = 1;
  R106: a_2r3sipmal + nad -> a_2ip3os + nadh + h; v_106();
    v_106 = 1;
  R107: pyr + thpp => a_2hethpp + co2; v_107();
    v_107 = 1;
  R108: accoa + a_2oival + h2o => a_2sipmal + coa; v_108();
    v_108 = 1;
  R109: a_2ip3os => a_4mop + co2; v_109();
    v_109 = 1;
  R110: a_2mm + h2o => emm; v_110();
    v_110 = 1;
  R111: s2mbcoa + fad => fadh2 + mbecoa; v_111();
    v_111 = 1;
  R112: mbecoa + h2o => a_3h2mbcoa; v_112();
    v_112 = 1;
  R113: a_3h2mbcoa + nad => nadh + h + maacoa; v_113();
    v_113 = 1;
  R114: maacoa + coa => accoa + ppcoa; v_114();
    v_114 = 1;
  R115: pyr + nh3 + nadh + h -> ala + nad + h2o; v_115();
    v_115 = 1;
  R116: gln + prpp + h2o => pram + ppi + glu; v_116();
    v_116 = 1;
  R117: atp + citr + asp => amp + ppi + args5p; v_117();
    v_117 = 1;
  R118: args5p => fum + arg; v_118();
    v_118 = 1;
  R119: asp => asp_d; v_119();
    v_119 = 1;
  R120: atp + asp + nh3 -> amp + ppi + asn; v_120();
    v_120 = 1;
  R121: oaa + glu -> asp + a_2oxglu; v_121();
    v_121 = 1;
  R122: gln + a_2oxglu + nadph + h => 2 glu + nadp; v_122();
    v_122 = 1;
  R123: atp + asp + h2o + glu -> amp + ppi + asn + glu; v_123();
    v_123 = 1;
  R124: gln + nadph + a_2oxglu + h => nadp + 2 glu; v_124();
    v_124 = 1;
  R125: nh3 + nadph + a_2oxglu + h => nadp + glu + h2o; v_125();
    v_125 = 1;
  R126: cdpdg + ser => cmp + ps; v_126();
    v_126 = 1;
  R127: ophser + h2o => thr + pi; v_127();
    v_127 = 1;
  R128: atp + hser => adp + ophser; v_128();
    v_128 = 1;
  R129: hser + nad -> asp4sa + nadh + h; v_129();
    v_129 = 1;
  R130: hser + nadp -> asp4sa + nadph + h; v_130();
    v_130 = 1;
  R131: atp + asp => adp + a_4pasp; v_131();
    v_131 = 1;
  R132: ser + igp -> trp + g3p + h2o; v_132();
    v_132 = 1;
  R133: dplr + nad => lprtn + nadh + h; v_133();
    v_133 = 1;
  R134: glu + a_3phpyr => a_3pser + a_2oxglu; v_134();
    v_134 = 1;
  R135: a_3pser + h2o => ser + pi; v_135();
    v_135 = 1;
  R136: a_3pg + nad -> a_3phpyr + nadh + h; v_136();
    v_136 = 1;
  R137: a_4pasp + nadph + h => asp4sa + pi + nadp; v_137();
    v_137 = 1;
  R138: cys + a_2oxglu -> mpyr + glu; v_138();
    v_138 = 1;
  R139: cys + a_2oxglu -> mpyr + dlglu; v_139();
    v_139 = 1;
  R140: cysteate + a_2oxglu -> a_3spyr + glu; v_140();
    v_140 = 1;
  R141: a_3slala + a_2oxglu => a_3sfpyr + glu; v_141();
    v_141 = 1;
  R142: a_3spyr + nadh + h -> a_3slac + nad; v_142();
    v_142 = 1;
  R143: sahc + h2o => adn + hcys; v_143();
    v_143 = 1;
  R144: $a_5mthg_e + hcys => $mthg_e + met; v_144();
    v_144 = 1;
  R145: dna + sam => dna5mc + sahc; v_145();
    v_145 = 1;
  R146: atp + met + h2o => pi + ppi + sam; v_146();
    v_146 = 1;
  R147: sam + h => sama + co2; v_147();
    v_147 = 1;
  R148: a_5mta + pi => ade + mtr1p; v_148();
    v_148 = 1;
  R149: lct + h2o -> cys + nh3 + a_2oxbut; v_149();
    v_149 = 1;
  R150: lct + h2o => hcys + nh3 + pyr; v_150();
    v_150 = 1;
  R151: a_5mta + pi -> mtr1p + ade; v_151();
    v_151 = 1;
  R152: sahc + h2o => srhc + ade; v_152();
    v_152 = 1;
  R153: srhc => hcys + dhptdn; v_153();
    v_153 = 1;
  R154: asp4sa + pyr => a_23dpa + 2 h2o; v_154();
    v_154 = 1;
  R155: tdpa + nadp -> a_23dpa + nadph + h; v_155();
    v_155 = 1;
  R156: tdpa + nadp => a_23dpa + nadph + h; v_156();
    v_156 = 1;
  R157: s26dap + a_2oxglu -> sdaop + glu; v_157();
    v_157 = 1;
  R158: s26dap + h2o => succ + a_26dap; v_158();
    v_158 = 1;
  R159: a_26dap + a_2oxglu -> tdpa + glu + h2o; v_159();
    v_159 = 1;
  R160: a_26dap -> M26daP; v_160();
    v_160 = 1;
  R161: M26daP => lys + co2; v_161();
    v_161 = 1;
  R162: hmisc -> btc + h2o; v_162();
    v_162 = 1;
  R163: lys => a_36dahx; v_163();
    v_163 = 1;
  R164: tdpa + nad -> a_23dpa + nadh + h; v_164();
    v_164 = 1;
  R165: accoa + h2o + a_2oxglu => hbtc + coa; v_165();
    v_165 = 1;
  R166: sama + spmd => a_5mta + spermn + h; v_166();
    v_166 = 1;
  R167: cbp + orn -> pi + citr; v_167();
    v_167 = 1;
  R168: crtn + h2o => mhdt + nh3; v_168();
    v_168 = 1;
  R169: arg => agm + co2; v_169();
    v_169 = 1;
  R170: accoa + glu => coa + aglu; v_170();
    v_170 = 1;
  R171: atp + aglu => adp + aglup; v_171();
    v_171 = 1;
  R172: aglup + nadph + h => agsa + pi + nadp; v_172();
    v_172 = 1;
  R173: agsa + glu => nacorn + a_2oxglu; v_173();
    v_173 = 1;
  R174: nacorn + glu -> orn + aglu; v_174();
    v_174 = 1;
  R175: e4hglu + a_2oxglu => hoxglu + glu; v_175();
    v_175 = 1;
  R176: agm + h2o => ptrc + urea; v_176();
    v_176 = 1;
  R177: sama + ptrc => a_5mta + spmd + h; v_177();
    v_177 = 1;
  R178: cbp + adp => nh3 + co2 + atp; v_178();
    v_178 = 1;
  R179: orn => pro + nh3; v_179();
    v_179 = 1;
  R180: a_34hpp + glu => a_2oxglu + tyr; v_180();
    v_180 = 1;
  R181: tyr => tyrmn + co2; v_181();
    v_181 = 1;
  R182: tyr + a_2oxglu -> a_34hpp + glu; v_182();
    v_182 = 1;
  R183: dhphe => dpmn + co2; v_183();
    v_183 = 1;
  R184: dhpeg + nad -> dhma + nadh + h; v_184();
    v_184 = 1;
  R185: Nmtyr + sam => hrdn + sahc; v_185();
    v_185 = 1;
  R186: phe + a_2oxglu -> ppyr + glu; v_186();
    v_186 = 1;
  R187: atp + pac + coa -> amp + ppi + phaccoa; v_187();
    v_187 = 1;
  R188: a_3dhq -> a_3dsk + h2o; v_188();
    v_188 = 1;
  R189: skm + nadp -> a_3dsk + nadph + h; v_189();
    v_189 = 1;
  R190: atp + skm => adp + shk3p; v_190();
    v_190 = 1;
  R191: pep + shk3p -> pi + a_5cpsk; v_191();
    v_191 = 1;
  R192: a_5cpsk => chrs + pi; v_192();
    v_192 = 1;
  R193: chrs + gln => anth + pyr + glu; v_193();
    v_193 = 1;
  R194: chrs + nh3 => anth + pyr + h2o; v_194();
    v_194 = 1;
  R195: npran + ppi -> anth + prpp; v_195();
    v_195 = 1;
  R196: npran -> cpad5p; v_196();
    v_196 = 1;
  R197: cpad5p -> igp + co2 + h2o; v_197();
    v_197 = 1;
  R198: ser + indole => trp + h2o; v_198();
    v_198 = 1;
  R199: igp -> indole + g3p; v_199();
    v_199 = 1;
  R200: chrs -> prph; v_200();
    v_200 = 1;
  R201: prph + nad -> a_34hpp + co2 + nadh + h; v_201();
    v_201 = 1;
  R202: prph -> ppyr + h2o + co2; v_202();
    v_202 = 1;
  R203: agnt => phe + h2o + co2; v_203();
    v_203 = 1;
  R204: prph + nad => a_34hpp + co2 + nadh + h; v_204();
    v_204 = 1;
  R205: asp4sa + dkfp => addth + $hpap_e; v_205();
    v_205 = 1;
  R206: addth + h2o + nad => a_3dhq + nh3 + nadh + h; v_206();
    v_206 = 1;
  R207: mglyx + f1p => dkfp + glyald; v_207();
    v_207 = 1;
  R208: asp + atp + nh3 => ppi + amp + asn; v_208();
    v_208 = 1;
  R209: trnaasnyl + h2o => asn + 2 h + trnaasn; v_209();
    v_209 = 1;
  R210: ade + prpp => amp + ppi; v_210();
    v_210 = 1;
  R211: aicar + ppi -> a_5a4ic + prpp; v_211();
    v_211 = 1;
  R212: gmp + ppi -> gua + prpp; v_212();
    v_212 = 1;
  R213: capri -> cair; v_213();
    v_213 = 1;
  R214: ditp + h2o => disnp + ppi; v_214();
    v_214 = 1;
  R215: imp + h2o -> prfica; v_215();
    v_215 = 1;
  R216: itp + h2o -> imp + ppi; v_216();
    v_216 = 1;
  R217: gtp + h2o => gmp + ppi; v_217();
    v_217 = 1;
  R218: dgtp + h2o => dgmp + ppi; v_218();
    v_218 = 1;
  R219: xtp + h2o => xmp + ppi; v_219();
    v_219 = 1;
  R220: atp + idp -> adp + itp; v_220();
    v_220 = 1;
  R221: atp + gdp -> adp + gtp; v_221();
    v_221 = 1;
  R222: atp + dgdp -> adp + dgtp; v_222();
    v_222 = 1;
  R223: atp + dadp -> adp + datp; v_223();
    v_223 = 1;
  R224: atp + didp -> adp + ditp; v_224();
    v_224 = 1;
  R225: gtp + imp + asp => gdp + pi + dcamp; v_225();
    v_225 = 1;
  R226: dcamp => fum + amp; v_226();
    v_226 = 1;
  R227: atp => camp + ppi; v_227();
    v_227 = 1;
  R228: gtp => cgmp + ppi; v_228();
    v_228 = 1;
  R229: atp + pram + gly => adp + pi + gar; v_229();
    v_229 = 1;
  R230: gtp + pyr -> gdp + pep; v_230();
    v_230 = 1;
  R231: dgdp + pep => dgtp + pyr; v_231();
    v_231 = 1;
  R232: datp + pyr -> dadp + pep; v_232();
    v_232 = 1;
  R233: gtp + rthio => dgtp + thrds + h2o; v_233();
    v_233 = 1;
  R234: dgmp + h2o -> dg + pi; v_234();
    v_234 = 1;
  R235: fthf + gar -> thf + fgar; v_235();
    v_235 = 1;
  R236: gmp + h2o => gsn + pi; v_236();
    v_236 = 1;
  R237: xmp + h2o => xtsn + pi; v_237();
    v_237 = 1;
  R238: imp + h2o => insn + pi; v_238();
    v_238 = 1;
  R239: amp + h2o => adn + pi; v_239();
    v_239 = 1;
  R240: damp + h2o -> dadsn + pi; v_240();
    v_240 = 1;
  R241: atp + xmp + gln + h2o => amp + ppi + gmp + glu; v_241();
    v_241 = 1;
  R242: imp + nad + h2o => xmp + nadh + h; v_242();
    v_242 = 1;
  R243: atp + amp -> 2 adp; v_243();
    v_243 = 1;
  R244: atp + rthio => datp + thrds + h2o; v_244();
    v_244 = 1;
  R245: atp + fgar + gln + h2o => adp + pi + fgam + glu; v_245();
    v_245 = 1;
  R246: atp + fgam => adp + pi + air; v_246();
    v_246 = 1;
  R247: atp + cair + asp -> adp + pi + saicar; v_247();
    v_247 = 1;
  R248: saicar -> fum + aicar; v_248();
    v_248 = 1;
  R249: atp + hco3 + air + h => adp + pi + capri; v_249();
    v_249 = 1;
  R250: formate + atp + aicar => prfica + adp + pi; v_250();
    v_250 = 1;
  R251: gdp + adp -> atp + gmp; v_251();
    v_251 = 1;
  R252: atp + h2o => adp + pi; v_252();
    v_252 = 1;
  R253: gtp + h2o => gdp + pi; v_253();
    v_253 = 1;
  R254: tpp + h2o -> ppi + pi; v_254();
    v_254 = 1;
  R255: cbp + asp => pi + cbasp; v_255();
    v_255 = 1;
  R256: ctp + h2o -> utp + nh3; v_256();
    v_256 = 1;
  R257: atp + utp + nh3 => adp + pi + ctp; v_257();
    v_257 = 1;
  R258: atp + utp + gln + h2o => adp + pi + ctp + glu; v_258();
    v_258 = 1;
  R259: dctp + h2o => dutp + nh3; v_259();
    v_259 = 1;
  R260: orot5p + ppi -> orot + prpp; v_260();
    v_260 = 1;
  R261: atp + udp -> adp + utp; v_261();
    v_261 = 1;
  R262: atp + cdp -> adp + ctp; v_262();
    v_262 = 1;
  R263: 2 atp + gln + hco3 + h2o -> 2 adp + pi + glu + cbp; v_263();
    v_263 = 1;
  R264: atp + dcdp -> adp + dctp; v_264();
    v_264 = 1;
  R265: atp + dudp -> adp + dutp; v_265();
    v_265 = 1;
  R266: atp + dtdp -> adp + dttp; v_266();
    v_266 = 1;
  R267: utp + h2o => ump + ppi; v_267();
    v_267 = 1;
  R268: dutp + h2o => dump + ppi; v_268();
    v_268 = 1;
  R269: orot5p => ump + co2; v_269();
    v_269 = 1;
  R270: atp + cmp -> adp + cdp; v_270();
    v_270 = 1;
  R271: atp + dcmp -> adp + dcdp; v_271();
    v_271 = 1;
  R272: atp + ump -> adp + udp; v_272();
    v_272 = 1;
  R273: thrds + nadph + h => rthio + nadp; v_273();
    v_273 = 1;
  R274: atp + dtmp -> adp + dtdp; v_274();
    v_274 = 1;
  R275: atp + dump -> adp + dudp; v_275();
    v_275 = 1;
  R276: dump + mlthf => dhf + dtmp; v_276();
    v_276 = 1;
  R277: ump + h2o => uri + pi; v_277();
    v_277 = 1;
  R278: cmp + h2o => cytdn + pi; v_278();
    v_278 = 1;
  R279: dcmp + h2o => dc + pi; v_279();
    v_279 = 1;
  R280: dtmp + h2o => thymd + pi; v_280();
    v_280 = 1;
  R281: ump + ppi -> ura + prpp; v_281();
    v_281 = 1;
  R282: thymd + pi => thym + a_2dr1p; v_282();
    v_282 = 1;
  R283: duri + pi => ura + a_2dr1p; v_283();
    v_283 = 1;
  R284: csn + h2o => ura + nh3; v_284();
    v_284 = 1;
  R285: mcsn + h2o -> thym + nh3; v_285();
    v_285 = 1;
  R286: doroa + h2o -> cbasp; v_286();
    v_286 = 1;
  R287: utp + rthio => dutp + thrds + h2o; v_287();
    v_287 = 1;
  R288: doroa + fum -> orot + succ; v_288();
    v_288 = 1;
  R289: ctp + rthio => dctp + thrds + h2o; v_289();
    v_289 = 1;
  R290: atp + cmp => adp + cdp; v_290();
    v_290 = 1;
  R291: cytdn + gtp => cmp + gdp; v_291();
    v_291 = 1;
  R292: gtp + 3 h2o => afapdrp + 2 pi; v_292();
    v_292 = 1;
  R293: afapdrp + h2o => daprap + formate; v_293();
    v_293 = 1;
  R294: daprap + nadh + h => a_25adrpn + nad; v_294();
    v_294 = 1;
  R295: daprap + nadph + h => a_25adrpn + nadp; v_295();
    v_295 = 1;
  R296: fmnh2 + nad -> fmn + h + nadh; v_296();
    v_296 = 1;
  R297: pht + h2o => a_4hlt + pi; v_297();
    v_297 = 1;
  R298: 2 pyr => aclact + co2; v_298();
    v_298 = 1;
  R299: aclact + nadph + h => dhmbn + nadp; v_299();
    v_299 = 1;
  R300: dhmbn => a_2oival + h2o; v_300();
    v_300 = 1;
  R301: pant_R + nadp -> a_2dhp + nadph + h; v_301();
    v_301 = 1;
  R302: atp + pant_R => adp + pptn; v_302();
    v_302 = 1;
  R303: atp + pptn + ala => amp + ppi + a_4ppan; v_303();
    v_303 = 1;
  R304: ctp + a_4ppan + cys => cmp + ppi + a_4ppncys; v_304();
    v_304 = 1;
  R305: atp + a_4ppan + cys => amp + ppi + a_4ppncys; v_305();
    v_305 = 1;
  R306: a_4ppncys => pan4p + co2; v_306();
    v_306 = 1;
  R307: atp + pan4p -> ppi + dpcoa; v_307();
    v_307 = 1;
  R308: atp + pim + coa => amp + ppi + pmcoa; v_308();
    v_308 = 1;
  R309: pmcoa + ala => a_8aonn + coa + co2; v_309();
    v_309 = 1;
  R310: sam + a_8aonn -> amob + dann; v_310();
    v_310 = 1;
  R311: atp + dann + co2 => adp + pi + dtbt; v_311();
    v_311 = 1;
  R312: dtbt + 2 sam + 2 electron + h2s -> btn + 2 met + 2 dasn; v_312();
    v_312 = 1;
  R313: atp + btn => ppi + btamp; v_313();
    v_313 = 1;
  R314: btamp + apoc -> amp + hcarb; v_314();
    v_314 = 1;
  R315: ahdt => pythp + tpp; v_315();
    v_315 = 1;
  R316: uppg1 => copp1 + 4 co2; v_316();
    v_316 = 1;
  R317: oxygen + 4 fe2 + 4 h => 4 fe3 + 2 h2o; v_317();
    v_317 = 1;
  R318: 2 a_5alev => ppbng + 2 h2o; v_318();
    v_318 = 1;
  R319: 4 ppbng + h2o => hmbil + 4 nh3; v_319();
    v_319 = 1;
  R320: hmbil => uppg3 + h2o; v_320();
    v_320 = 1;
  R321: uppg3 => cpp + 4 co2; v_321();
    v_321 = 1;
  R322: 2 sam + uppg3 => 2 sahc + pc2; v_322();
    v_322 = 1;
  R323: trnaglu + glu + atp -> glutrna + ppi + amp; v_323();
    v_323 = 1;
  R324: glutrna + nadph + h => aoxp + trnaglu + nadp; v_324();
    v_324 = 1;
  R325: aoxp => a_5alev; v_325();
    v_325 = 1;
  R326: pc2 + nad => scl + nadh + h; v_326();
    v_326 = 1;
  R327: fe2 + scl => sheme + 2 h; v_327();
    v_327 = 1;
  R328: co_2 + scl => 2 h + coshrdn; v_328();
    v_328 = 1;
  R329: sam + coshrdn => sahc + cof3; v_329();
    v_329 = 1;
  R330: ru5p => db4p + formate; v_330();
    v_330 = 1;
  R331: copre3 + sam => copre4 + sahc; v_331();
    v_331 = 1;
  R332: copre4 + sam => copre5a + sahc; v_332();
    v_332 = 1;
  R333: copre5a + h2o => copre5b + acald; v_333();
    v_333 = 1;
  R334: copre5b + sam + h => sahc + copre6; v_334();
    v_334 = 1;
  R335: copre6 + nadph + h => codhpre6 + nadp; v_335();
    v_335 = 1;
  R336: codhpre6 + sam => copre7 + sahc; v_336();
    v_336 = 1;
  R337: copre7 + sam => copre8 + sahc + co2; v_337();
    v_337 = 1;
  R338: copre8 => cobya; v_338();
    v_338 = 1;
  R339: cobya + 2 gln + 2 atp + 2 h2o => co2dam + 2 glu + 2 adp + 2 pi; v_339();
    v_339 = 1;
  R340: sam + pc2 => sahc + pre3a + h; v_340();
    v_340 = 1;
  R341: aribau + db4p => dmlz + 2 h2o + pi; v_341();
    v_341 = 1;
  R342: sam + pre3b => sahc + pre4; v_342();
    v_342 = 1;
  R343: sam + pre4 => sahc + pre5; v_343();
    v_343 = 1;
  R344: pre6a + nadph + h => pre6b + nadp; v_344();
    v_344 = 1;
  R345: hybyr + 2 gln + 2 atp + 2 h2o => hgbam + 2 pi + 2 glu + 2 adp; v_345();
    v_345 = 1;
  R346: hgbam + co_2 + atp + h2o => co2dam + pi + adp + h; v_346();
    v_346 = 1;
  R347: acobda + 4 gln + 4 atp + 4 h2o => acobh + 4 glu + 4 pi + 4 adp; v_347();
    v_347 = 1;
  R348: atp + acobh + apol -> adp + pi + adocbi; v_348();
    v_348 = 1;
  R349: acobh + applp + atp => adocbip + adp + pi; v_349();
    v_349 = 1;
  R350: agdpcbi + rbz => VitB12 + gmp; v_350();
    v_350 = 1;
  R351: 2 dmlz => ribflv + aribau; v_351();
    v_351 = 1;
  R352: ctp + ribflv => cdp + fmn; v_352();
    v_352 = 1;
  R353: sald + cys => smtc + h2o + 2 h; v_353();
    v_353 = 1;
  R354: nadh + h + smtc => a_2secys + nad; v_354();
    v_354 = 1;
  R355: a_2secys + h2o + h => nh3 + pyr + COM; v_355();
    v_355 = 1;
  R356: a_3dhq + 2 h + nh3 => 4 h2o + a_4abz; v_356();
    v_356 = 1;
  R357: a_4abz + prpp => rfab + co2 + ppi + h; v_357();
    v_357 = 1;
  R358: adn + pi => ade + r1p; v_358();
    v_358 = 1;
  R359: dpcoa + atp => adp + coa; v_359();
    v_359 = 1;
  R360: mthp + h2 => dhmtpz; v_360();
    v_360 = 1;
  R361: s_lac + gtp => a_2plac + gdp; v_361();
    v_361 = 1;
  R362: fmn + atp => ppi + fad; v_362();
    v_362 = 1;
  R363: a_5aprau + h2o => aribau + pi; v_363();
    v_363 = 1;
  R364: nmn + dmbz => pardb + h + nic; v_364();
    v_364 = 1;
  R365: pardb + h2o => rbz + pi; v_365();
    v_365 = 1;
  R366: 2 co2dam + fmnh2 => 2 co1dam + fmn + 2 h; v_366();
    v_366 = 1;
  R367: co1dam + atp -> acobda + tpp; v_367();
    v_367 = 1;
  R368: adocbip + gtp => agdpcbi + ppi; v_368();
    v_368 = 1;
  R369: a_25adrpn + h2o => a_5aprau + nh3; v_369();
    v_369 = 1;
  R370: r5p + g3p + gln -> glu + 3 h2o + pi + pyr5p; v_370();
    v_370 = 1;
  R371: dadp + thrds + h2o => rthio + adp; v_371();
    v_371 = 1;
  R372: cof3 + 2 h -> copre3; v_372();
    v_372 = 1;
  R373: pc2 + ni2 + 2 gln + 3 h => cof430 + 2 glu + h2o; v_373();
    v_373 = 1;
  R374: nad + a_1hydtc -> a_2oxsub + co2 + nadh + h; v_374();
    v_374 = 1;
  R375: a_2oxsub => a_7oxhep + co2; v_375();
    v_375 = 1;
  R376: a_7mrhpt + thr + atp => a_7merhthr + adp + pi; v_376();
    v_376 = 1;
  R377: a_7oxhep + 2 h + h2s => a_7mrhpt + h2o; v_377();
    v_377 = 1;
  R378: a_7merhthr + atp => cob + adp; v_378();
    v_378 = 1;
  R379: Pimeloyl__acp_ + ala -> a_8aonn + ACP + co2; v_379();
    v_379 = 1;
  R380: gtp + h2o => a_78dnpt3p + formate; v_380();
    v_380 = 1;
  R381: a_78dnpt3p + h2o => dnptp + ppi; v_381();
    v_381 = 1;
  R382: dnptp + h2o => dnpt + pi; v_382();
    v_382 = 1;
  R383: dnpt => Glycald + a_2a4h78dnpt; v_383();
    v_383 = 1;
  R384: rfab + a_2a4h78dnpt => a_78hptab5p + ppi + 2 h; v_384();
    v_384 = 1;
  R385: a_78hptab5p + 2 h => a_78dptr5p; v_385();
    v_385 = 1;
  R386: a_78dptr5p + h2o => a_78dptapr + pi; v_386();
    v_386 = 1;
  R387: a_78dptapr + prpp => a_78dptf5p + ppi; v_387();
    v_387 = 1;
  R388: a_78dptf5p + atp => a_78dptftp + amp; v_388();
    v_388 = 1;
  R389: a_78dptftp + a_2hydoxglu => dm78dhmpt + ppi; v_389();
    v_389 = 1;
  R390: a_2hydoxglu + fad -> a_2oxglu + fadh2; v_390();
    v_390 = 1;
  R391: dm78dhmpt + 2 sam => dhmpt + 2 sahc; v_391();
    v_391 = 1;
  R392: dhmpt + h + nadph => thmpt + nadp; v_392();
    v_392 = 1;
  R393: thr + atp => adp + thr3p; v_393();
    v_393 = 1;
  R394: thr3p => applp + co2; v_394();
    v_394 = 1;
  R395: gtp + h2o => cPMP + ppi; v_395();
    v_395 = 1;
  R396: cPMP + 2 h2s => mbpt + 2 h2o; v_396();
    v_396 = 1;
  R397: ambpt + mobd -> mocof + amp + h2o; v_397();
    v_397 = 1;
  R398: atp + mbpt -> ppi + ambpt; v_398();
    v_398 = 1;
  R399: atp + nad -> adp + nadp; v_399();
    v_399 = 1;
  R400: atp + nmn + h -> ppi + nad; v_400();
    v_400 = 1;
  R401: atp + nicrnt -> ppi + dnad; v_401();
    v_401 = 1;
  R402: nmn + h2o + h => rnam + pi; v_402();
    v_402 = 1;
  R403: nicrnt + h2o => nicrns + pi; v_403();
    v_403 = 1;
  R404: quln + prpp + h => nicrnt + ppi + co2; v_404();
    v_404 = 1;
  R405: iasp + dhap => quln + 2 h2o + pi; v_405();
    v_405 = 1;
  R406: asp + nadp => iasp + nadph + h; v_406();
    v_406 = 1;
  R407: asp + nad => iasp + nadh + h; v_407();
    v_407 = 1;
  R408: dhf + nadph + h -> thf + nadp; v_408();
    v_408 = 1;
  R409: formate + thf + atp => fthf + adp + pi; v_409();
    v_409 = 1;
  R410: atp + a_4ahmmp => adp + a_4ampm; v_410();
    v_410 = 1;
  R411: a_4ampm + atp => a_2mahmp + adp; v_411();
    v_411 = 1;
  R412: atp + hemt => adp + a_4mpetz; v_412();
    v_412 = 1;
  R413: a_2mahmp + a_4mpetz => ppi + thmmp; v_413();
    v_413 = 1;
  R414: atp + thmmp => adp + thpp; v_414();
    v_414 = 1;
  R415: air + sam => a_4ahmmp + dasn + met + formate + co; v_415();
    v_415 = 1;
  R416: g3p + pyr => hemt; v_416();
    v_416 = 1;
  R417: mocof + gtp => ppi + mgdnt + h; v_417();
    v_417 = 1;
  R418: a_2oival + fald => a_2dhp; v_418();
    v_418 = 1;
  R419: a_3pser + trnacys + atp => pstrna + ppi + amp; v_419();
    v_419 = 1;
  R420: pstrna + h2s => cystrna + pi; v_420();
    v_420 = 1;
  R421: atp + cys + trnacys -> amp + ppi + cystrna; v_421();
    v_421 = 1;
  R422: atp + met + trnamet => amp + ppi + trnametyl; v_422();
    v_422 = 1;
  R423: atp + val + trnaval => amp + ppi + valtrna; v_423();
    v_423 = 1;
  R424: atp + leu + trnaleu => amp + ppi + trnaleucyl; v_424();
    v_424 = 1;
  R425: atp + ile + trnaile => amp + ppi + iletrna; v_425();
    v_425 = 1;
  R426: trnaglnyl + gln + atp + h2o => trnaglmn + glu + adp + pi; v_426();
    v_426 = 1;
  R427: atp + lys + trnalys => amp + ppi + trnalysyl; v_427();
    v_427 = 1;
  R428: atp + arg + trnaarg => amp + ppi + argtrna; v_428();
    v_428 = 1;
  R429: atp + trnapro + pro => amp + ppi + protrna; v_429();
    v_429 = 1;
  R430: atp + his + trnahis => amp + ppi + histrna; v_430();
    v_430 = 1;
  R431: atp + phe + trnaphe => amp + ppi + phetrna; v_431();
    v_431 = 1;
  R432: atp + tyr + trnatyr => amp + ppi + tyrtrna; v_432();
    v_432 = 1;
  R433: atp + trp + trnatrp => amp + ppi + trptrna; v_433();
    v_433 = 1;
  R434: atp + ala + trnaala => amp + ppi + trnaalanyl; v_434();
    v_434 = 1;
  R435: trnaasp + asp + atp => asptrna + ppi + amp; v_435();
    v_435 = 1;
  R436: asntrna + gln + atp + h2o => trnaasnyl + glu + adp + pi; v_436();
    v_436 = 1;
  R437: atp + gly + trnagly => amp + ppi + glytrna; v_437();
    v_437 = 1;
  R438: atp + thr + trnathr => amp + ppi + thrtrna; v_438();
    v_438 = 1;
  R439: atp + ser + trnaser => amp + ppi + sertrna; v_439();
    v_439 = 1;
  R440: atp + ser + trnasec => amp + ppi + trnaseryl; v_440();
    v_440 = 1;
  R441: alac_S => actn_R + co2; v_441();
    v_441 = 1;
  R442: cof420 + h2 -> cof420h2; v_442();
    v_442 = 1;
  R443: atp + gln + trnagln -> amp + ppi + trnaglnyl; v_443();
    v_443 = 1;
  R444: trnaasn + atp + asn -> trnaasnyl + ppi + amp; v_444();
    v_444 = 1;
  R445: 2 nadph + 2 h + metsela => 2 nadp + 2 h2o + mthsel; v_445();
    v_445 = 1;
  R446: selt + 3 nadph + 5 h => seld + 3 nadp + 3 h2o; v_446();
    v_446 = 1;
  R447: shcys + $a_5mthg_e => semth + $mthg_e; v_447();
    v_447 = 1;
  R448: atp + seld + h2o -> amp + pi + selp; v_448();
    v_448 = 1;
  R449: trnapseryl + selp + h2o -> trnaselcys + pi; v_449();
    v_449 = 1;
  R450: sama + cadv => a_5mta + apcad + h; v_450();
    v_450 = 1;
  R451: trnaseryl + atp => trnapseryl + adp; v_451();
    v_451 = 1;
  R452: trnaseryl + selp => trnaselcys + pi; v_452();
    v_452 = 1;
  R453: atp + semth + trnamet => amp + ppi + trnaselmet; v_453();
    v_453 = 1;
  R454: hmgcoa + 2 nadph + 2 h => mev_R + coa + 2 nadp; v_454();
    v_454 = 1;
  R455: atp + mev_R => adp + a_5pmev; v_455();
    v_455 = 1;
  R456: ipdp -> dmpp; v_456();
    v_456 = 1;
  R457: dmpp + ipdp => ppi + grdp; v_457();
    v_457 = 1;
  R458: ttfdp + ipdp => ppi + ggdp; v_458();
    v_458 = 1;
  R459: grdp + ipdp => ppi + ttfdp; v_459();
    v_459 = 1;
  R460: ttfdp + 8 ipdp => tcudp + 8 ppi; v_460();
    v_460 = 1;
  R461: atp + a_5pmev => adp + a_5dpmev; v_461();
    v_461 = 1;
  R462: a_5dpmev + atp => adp + pi + ipdp + co2; v_462();
    v_462 = 1;
  R463: tcpl + nad => claald + nadh + h; v_463();
    v_463 = 1;
  R464: ccpl + nad => ccald + nadh + h; v_464();
    v_464 = 1;
  R465: actyn + fdxrd + 2 h + atp + h2o => c2h4 + fdox + adp + pi; v_465();
    v_465 = 1;
  R466: a_24dnt => dhamt; v_466();
    v_466 = 1;
  R467: hmnapth + nad => napthah + nadh + h; v_467();
    v_467 = 1;
  R468: napthm + nad => naptal + nadh + h; v_468();
    v_468 = 1;
  R469: dhap => pi + mglyx; v_469();
    v_469 = 1;
  R470: mglyx + fpp => dkfp + g3p; v_470();
    v_470 = 1;
  R471: atp + pyr + h2o => amp + pep + pi; v_471();
    v_471 = 1;
  R472: 2 accoa -> coa + aacoa; v_472();
    v_472 = 1;
  R473: actn + coa -> amp + accoa; v_473();
    v_473 = 1;
  R474: pyr + coa => accoa + formate; v_474();
    v_474 = 1;
  R475: gln + f6p => glu + gam6p; v_475();
    v_475 = 1;
  R476: gam6p => gam1p; v_476();
    v_476 = 1;
  R477: utp + nagn1p => ppi + uacgam; v_477();
    v_477 = 1;
  R478: accoa + gam1p => coa + nagn1p; v_478();
    v_478 = 1;
  R479: uacgam + h2o => acmana + udp; v_479();
    v_479 = 1;
  R480: uacmam + 2 nad + h2o => uacmau + 2 nadh + 2 h; v_480();
    v_480 = 1;
  R481: aclact -> actn_R + co2; v_481();
    v_481 = 1;
  R482: a_2hethpp + pyr => aclact + thpp; v_482();
    v_482 = 1;
  R483: 2 pyr => alac_S + co2; v_483();
    v_483 = 1;
  R484: atp + itcn + coa -> adp + pi + itcncoa; v_484();
    v_484 = 1;
  R485: r2mm => a_2mm + h2o; v_485();
    v_485 = 1;
  R486: man6p -> man1p; v_486();
    v_486 = 1;
  R487: fc1p => dhap + lacald; v_487();
    v_487 = 1;
  R488: udp_glu -> udpDgal; v_488();
    v_488 = 1;
  R489: formate + nad => h + co2 + nadh; v_489();
    v_489 = 1;
  R490: dgly + nad -> hpyr + nadh + h; v_490();
    v_490 = 1;
  R491: glyclt + nad -> glx + nadh + h; v_491();
    v_491 = 1;
  R492: utp + g1p -> ppi + udp_glu; v_492();
    v_492 = 1;
  R493: padn + coa -> amp + ppcoa; v_493();
    v_493 = 1;
  R494: ppi + padn => atp + prnoate; v_494();
    v_494 = 1;
  R495: atp + prnoate + coa -> adp + pi + ppcoa; v_495();
    v_495 = 1;
  R496: uacgam => uacmam; v_496();
    v_496 = 1;
  R497: f6p => man1p; v_497();
    v_497 = 1;
  R498: man1p + gtp => gdpman + ppi; v_498();
    v_498 = 1;
  R499: accoa + h2o + aacoa => coa + hmgcoa; v_499();
    v_499 = 1;
  R500: oxa => co2 + formate; v_500();
    v_500 = 1;
  R501: acald + nad + coa => nadh + h + accoa; v_501();
    v_501 = 1;
  R502: accoa + h2o + oaa => coa + cit; v_502();
    v_502 = 1;
  R503: cacn + h2o => icit; v_503();
    v_503 = 1;
  R504: icit + 2 nadp => co2 + 2 nadph + a_2oxglu; v_504();
    v_504 = 1;
  R505: amy + pi -> amy + g1p; v_505();
    v_505 = 1;
  R506: amy + g1p => glycogen + pi; v_506();
    v_506 = 1;
  R507: udp_glu => glycogen + udp; v_507();
    v_507 = 1;
  R508: glycogen + h2o => glc; v_508();
    v_508 = 1;
  R509: accoa + bcoa -> coa + ohcoa; v_509();
    v_509 = 1;
  R510: dhap + nadh + h => glyc1p + nad; v_510();
    v_510 = 1;
  R511: dhap + nadph + h => nadp + glyc1p; v_511();
    v_511 = 1;
  R512: glyc1p + ggdp => ppi + ggrglyc1p; v_512();
    v_512 = 1;
  R513: ggdp + 7 ipdp => 7 ppi + tthcudp; v_513();
    v_513 = 1;
  R514: ggrglyc1p + ggdp => ppi + a_23gglyc1p; v_514();
    v_514 = 1;
  R515: ctp + a_23gglyc1p => ppi + CDP_archaeol; v_515();
    v_515 = 1;
  R516: $co2_e -> co2; v_516();
    v_516 = 1;
  R517: $co_2_e + atp + h2o -> co_2 + adp + pi; v_517();
    v_517 = 1;
  R518: $cys_e + $h_e -> cys + h; v_518();
    v_518 = 1;
  R519: $h2s_e -> h2s; v_519();
    v_519 = 1;
  R520: $h2_e -> h2; v_520();
    v_520 = 1;
  R521: ind3ac + h => $ind3ac_e + $h_e; v_521();
    v_521 = 1;
  R522: $Fe3_e + atp + h2o => fe3 + adp + pi; v_522();
    v_522 = 1;
  R524: $Fe3_e -> fe3; v_523();
    v_523 = 1;
  R526: h2o + atp + $mg2_e => adp + mg2 + pi; v_524();
    v_524 = 1;
  R527: $nh4_e -> nh4; v_525();
    v_525 = 1;
  R528: ch4 => $ch4_e; v_526();
    v_526 = 1;
  R529: $mo_e + atp + h2o => mo + adp + pi; v_527();
    v_527 = 1;
  R530: atp + $mobd_e + h2o => adp + pi + mobd; v_528();
    v_528 = 1;
  R531: $ni2_e -> ni2; v_529();
    v_529 = 1;
  R532: $n2_e => n2; v_530();
    v_530 = 1;
  R533: $na_e + $pro_e => na + pro; v_531();
    v_531 = 1;
  R534: $selnt_e => selt; v_532();
    v_532 = 1;
  R535: $na_e + $h_e => na + h; v_533();
    v_533 = 1;
  R536: $h_e + $so3_e => h + so3; v_534();
    v_534 = 1;
  R537: h2o + atp + $so4_e => adp + so4 + pi; v_535();
    v_535 = 1;
  R538: $h2o_e -> h2o; v_536();
    v_536 = 1;
  R539: $pi_e -> pi; v_537();
    v_537 = 1;
  R540: urea -> $urea_e; v_538();
    v_538 = 1;
  R541: mtr1p => $mtr1p_e; v_539();
    v_539 = 1;
  R542: $oxygen_e -> oxygen; v_540();
    v_540 = 1;
  R543: $acetate_e + $h_e => acetate + h; v_541();
    v_541 = 1;
  R544: $ala_e + $na_e => ala + na; v_542();
    v_542 = 1;
  R545: $fe2_e => fe2; v_543();
    v_543 = 1;
  R546: $so4_e => so4; v_544();
    v_544 = 1;
  R547: $hco3_e + atp + h2o => hco3 + adp + pi; v_545();
    v_545 = 1;
  R548: $csn_e + $h_e => csn + h; v_546();
    v_546 = 1;
  R549: $pro_e => pro; v_547();
    v_547 = 1;
  R550: $w_e => w; v_548();
    v_548 = 1;
  R551: $xan_e + $ura_e => xan + ura; v_549();
    v_549 = 1;
  R552: dasn => $dasn_e; v_550();
    v_550 = 1;
  R553: $a_2plac_e => a_2plac; v_551();
    v_551 = 1;
  R554: $btn_e + $h_e => btn + h; v_552();
    v_552 = 1;
  R555: $a_1hydtc_e => a_1hydtc; v_553();
    v_553 = 1;
  R556: amob => $amob_e; v_554();
    v_554 = 1;
  R557: rbz -> $rbz_e; v_555();
    v_555 = 1;
  R558: Glycald => $Glycald_e; v_556();
    v_556 = 1;
  R559: lys => $lys_e; v_557();
    v_557 = 1;
  R560: $nh3_e -> nh3; v_558();
    v_558 = 1;
  R561: $formate_e -> formate; v_559();
    v_559 = 1;
  R562: $ala_e -> ala; v_560();
    v_560 = 1;
  R563: cd2 + atp + h2o => $cd2_e + adp + pi; v_561();
    v_561 = 1;
  R564: $pim_e -> pim; v_562();
    v_562 = 1;
  R565: 0.22 rna + 0.0344 dna + 0.6097 protein + 0.0034 glycogen + 30 atp + 0.0243 Soluble_pools + 0.1009 phosphoplipid => biomass + 30 adp + 30 pi; v_563();
    v_563 = 1;
  R566: 0.504 dgtp + 1.075 datp + 0.571 dctp + 1.093 dttp => dna + 3.242 ppi; v_564();
    v_564 = 1;
  R567: 20.8 accoa + 1.95 g3p + 0.65 ser + 44.2 atp + 38.35 nadh + 0.8 CDP_archaeol => 20.8 coa + 44.2 adp + 0.65 co2 + phosphoplipid + 38.35 nad; v_565();
    v_565 = 1;
  R568: 0.77 gly + 0.96 ala + 0.67 val + 0.85 leu + 0.44 ile + 0.46 ser + 0.48 thr + 0.3 phe + 0.01 trp + 0.26 tyr + 0.15 cys + 0.22 met + 0.54 lys + 0.46 arg + 0.16 his + 0.46 asp + 0.52 glu + 0.46 asn + 0.52 gln + 0.34 pro => protein; v_566();
    v_566 = 1;
  R569: 0.789 utp + 0.708 ctp + 0.82 atp + 0.783 gtp => rna + 3.107 ppi; v_567();
    v_567 = 1;
  R570: 0.0012 cof430 + 0.0126 ptrc + 0.0055 spermn + 0.0014 cof420 + 0.0022 cof420_0 + 0.0017 cof420_1 + 0.0012 cof420_3 + 0.0032 amp + 0.0034 cob + 0.0012 sheme + 0.0007 VitB12 + 0.0014 coa + 0.0017 nad + 0.0017 nadh + 0.0015 nadp + 0.0015 nadph + 0.0045 btn + 0.0029 ribflv + 0.0072 COM + 0.001 thmpt => Soluble_pools; v_568();
    v_568 = 1;
  R571: biomass => $biomass_e; v_569();
    v_569 = 1;
end
