// SBML level 2 version 4

model MODEL1308080003()
  // Cao2010 - Epigenetic state of lysogeny in phage lambda
  // References: 1. Xiaomei Zhu, Lan Yin, Leroy Hood, David Galas and Ping Ao, Efficiency, Robustness and Stochasticity of Gene Regulatory networks in Systems biology: Lambda switch as a working example, 2006. 2. Adam Arkin, John Ross and Harley H. McAdams, Stochastic kinetic analysis of developmental pathway bifurcation in phage lambda-infected Escherichia coli cells, 1998, Genetics, 149: 1633-1648. 3. GenBank sequence: NC_001416 is the whole genome sequence of phage lambda.
  // biomodels.db:MODEL1308080003
  // hasTaxon taxonomy:562

  // Compartments:
  compartment default = 1;

  // Species:
  species OR1 in default = 1/default;
  species OR2 in default = 1/default;
  species OR3 in default = 1/default;
  species CI in default = 0; CI is "pCI";
  species Cro in default = 0; Cro is "pCro";
  species CI2 in default = 0; CI2 is "R2";
  species Cro2 in default = 0; Cro2 is "C2";
  species ROR1 in default = 0;
  species ROR2 in default = 0;
  species ROR3 in default = 0;
  species COR1 in default = 0;
  species COR2 in default = 0;
  species COR3 in default = 0;
  species EmptySet in default = 0;

  // Parameters:
  kb_DimerDNA = 0.021; kb_DimerDNA is "binding rate of protein to DNA";
  ku_CI2OR1 = 0.03998; ku_CI2OR1 is "unbinding rate of CI2 from OR1";
  ku_CI2OR1c1 = 0.0005; ku_CI2OR1c1 is "unbinding rate of CI2 from OR1 with coop 1";
  ku_CI2OR1c2 = 0.05531; ku_CI2OR1c2 is "unbinding rate of CI2 from OR1 with coop 2";
  ku_CI2OR2 = 1.026; ku_CI2OR2 is "unbinding rate of CI2 from OR2";
  ku_CI2OR2c1 = 0.01284; ku_CI2OR2c1 is "unbinding rate of CI2 from OR2 with coop 1";
  ku_CI2OR2c2 = 0.00928; ku_CI2OR2c2 is "unbinding rate of CI2 from OR2 with coop 2";
  ku_CI2OR2c3 = 0.01284; ku_CI2OR2c3 is "unbinding rate of CI2 from OR2 with coop 3";
  ku_CI2OR3 = 5.19753; ku_CI2OR3 is "unbinding rate of CI2 from OR3";
  ku_CI2OR3c1 = 0.04702; ku_CI2OR3c1 is "unbinding rate of CI2 from OR3 with coop 1";
  ku_CI2OR3c2 = 5.19753; ku_CI2OR3c2 is "unbinding rate of CI2 from OR3 with coop 2";
  ku_Cro2OR1 = 0.08999; ku_Cro2OR1 is "unbinding rate of Cro2 from OR1";
  ku_Cro2OR1c1 = 0.01776; ku_Cro2OR1c1 is "unbinding rate of Cro2 from OR1 with coop 1";
  ku_Cro2OR1c2 = 0.05531; ku_Cro2OR1c2 is "unbinding rate of Cro2 from OR1 with coop 2";
  ku_Cro2OR2 = 0.6306; ku_Cro2OR2 is "unbinding rate of Cro2 from OR2";
  ku_Cro2OR2c1 = 0.12448; ku_Cro2OR2c1 is "unbinding rate of Cro2 from OR2 with coop 1";
  ku_Cro2OR2c2 = 0.23822; ku_Cro2OR2c2 is "unbinding rate of Cro2 from OR2 with coop 2";
  ku_Cro2OR2c3 = 0.14641; ku_Cro2OR2c3 is "unbinding rate of Cro2 from OR2 with coop 3";
  ku_Cro2OR3 = 0.00928; ku_Cro2OR3 is "unbinding rate of Cro2 from OR3";
  ku_Cro2OR3c1 = 0.00351; ku_Cro2OR3c1 is "unbinding rate of Cro2 from OR3 with coop 1";
  ku_Cro2OR3c2 = 0.01092; ku_Cro2OR3c2 is "unbinding rate of Cro2 from OR3 with coop 2";
  kb_DimerCI = 0.05; kb_DimerCI is "association rate of CI monomer to dimer";
  kb_DimerCro = 0.0307; kb_DimerCro is "association rate of Cro monomer to dimer";
  ku_Dimer = 0.5; ku_Dimer is "disassociation rate of dimer";
  kd_CI = 0.0007; kd_CI is "degradation rate of CI";
  kd_Cro = 0.0025; kd_Cro is "degradation rate of Cro";
  ks_CI = 0.0069; ks_CI is "synthesis rate of CI";
  ks_CIcoop = 0.066; ks_CIcoop is "synthesis rate of CI with cooperativity";
  ks_Cro = 0.0929; ks_Cro is "synthesis rate of Cro";
  default1 = 1;

  // Reactions:
  SynReaction1: EmptySet => CI; default*ks_CI;  // modifiers: OR3, OR2
  SynReaction2: EmptySet => CI; default*ks_CI;  // modifiers: OR3, COR2
  SynReaction3: EmptySet => CI; default*ks_CIcoop;  // modifiers: OR3, ROR2
  SynReaction4: EmptySet => Cro; default*ks_Cro;  // modifiers: OR1, OR2
  DegReaction1: CI => EmptySet; default*CI*kd_CI;
  DegReaction2: Cro => EmptySet; default*Cro*kd_Cro;
  DimReaction1: 2 CI -> CI2; default*(kb_DimerCI*0.5*CI*(CI - 1) - CI2*ku_Dimer);
  DimReaction2: 2 Cro -> Cro2; default*(kb_DimerCro*0.5*Cro*(Cro - 1) - Cro2*ku_Dimer);
  BindReaction1: OR1 + CI2 => ROR1; default*OR1*CI2*kb_DimerDNA;
  BindReaction2: OR2 + CI2 => ROR2; default*OR2*CI2*kb_DimerDNA;
  BindReaction3: OR3 + CI2 => ROR3; default*OR3*CI2*kb_DimerDNA;
  BindReaction4: OR1 + Cro2 => COR1; default*OR1*Cro2*kb_DimerDNA;
  BindReaction5: OR2 + Cro2 => COR2; default*OR2*Cro2*kb_DimerDNA;
  BindReaction6: OR3 + Cro2 => COR3; default*OR3*Cro2*kb_DimerDNA;
  UnbindReaction1: ROR1 => OR1 + CI2; default*ROR1*ku_CI2OR1;  // modifiers: OR2
  UnbindReaction2: ROR1 => OR1 + CI2; default*ROR1*ku_CI2OR1c1;  // modifiers: ROR2, OR3
  UnbindReaction3: ROR1 => OR1 + CI2; default*ROR1*ku_CI2OR1c2;  // modifiers: ROR2, ROR3
  UnbindReaction4: ROR1 => OR1 + CI2; default*ROR1*ku_CI2OR1c1;  // modifiers: ROR2, COR3
  UnbindReaction5: ROR1 => OR1 + CI2; default*ROR1*ku_CI2OR1;  // modifiers: COR2
  UnbindReaction6: ROR2 => CI2 + OR2; default*ROR2*ku_CI2OR2;  // modifiers: OR1, OR3
  UnbindReaction7: ROR2 => CI2 + OR2; default*ROR2*ku_CI2OR2c1;  // modifiers: ROR1, OR3
  UnbindReaction8: ROR2 => CI2 + OR2; default*ROR2*ku_CI2OR2c2;  // modifiers: OR1, ROR3
  UnbindReaction9: ROR2 => CI2 + OR2; default*ROR2*ku_CI2OR2c3;  // modifiers: ROR1, ROR3
  UnbindReaction10: ROR2 => CI2 + OR2; default*ROR2*ku_CI2OR2;  // modifiers: COR1, OR3
  UnbindReaction11: ROR2 => CI2 + OR2; default*ROR2*ku_CI2OR2;  // modifiers: OR1, COR3
  UnbindReaction12: ROR2 => CI2 + OR2; default*ROR2*ku_CI2OR2;  // modifiers: COR1, COR3
  UnbindReaction13: ROR2 => CI2 + OR2; default*ROR2*ku_CI2OR2c1;  // modifiers: ROR1, COR3
  UnbindReaction14: ROR2 => CI2 + OR2; default*ROR2*ku_CI2OR2c2;  // modifiers: COR1, ROR3
  UnbindReaction15: ROR3 => CI2 + OR3; default*ROR3*ku_CI2OR3;  // modifiers: OR2
  UnbindReaction16: ROR3 => CI2 + OR3; default*ROR3*ku_CI2OR3c1;  // modifiers: ROR2, OR1
  UnbindReaction17: ROR3 => CI2 + OR3; default*ROR3*ku_CI2OR3c2;  // modifiers: ROR2, ROR1
  UnbindReaction18: ROR3 => CI2 + OR3; default*ROR3*ku_CI2OR3c1;  // modifiers: ROR2, COR1
  UnbindReaction19: ROR3 => CI2 + OR3; default*ROR3*ku_CI2OR3;  // modifiers: COR2
  UnbindReaction20: COR1 => Cro2 + OR1; default*COR1*ku_Cro2OR1;  // modifiers: OR2
  UnbindReaction21: COR1 => Cro2 + OR1; default*COR1*ku_Cro2OR1;  // modifiers: ROR2
  UnbindReaction22: COR1 => Cro2 + OR1; default*COR1*ku_Cro2OR1c1;  // modifiers: COR2, OR3
  UnbindReaction23: COR1 => Cro2 + OR1; default*COR1*ku_Cro2OR1c1;  // modifiers: COR2, ROR3
  UnbindReaction24: COR1 => Cro2 + OR1; default*COR1*ku_Cro2OR1c2;  // modifiers: COR2, COR3
  UnbindReaction25: COR2 => Cro2 + OR2; default*COR2*ku_Cro2OR2;  // modifiers: OR1, OR3
  UnbindReaction26: COR2 => Cro2 + OR2; default*COR2*ku_Cro2OR2;  // modifiers: ROR1, OR3
  UnbindReaction27: COR2 => Cro2 + OR2; default*COR2*ku_Cro2OR2;  // modifiers: OR1, ROR3
  UnbindReaction28: COR2 => Cro2 + OR2; default*COR2*ku_Cro2OR2;  // modifiers: ROR1, ROR3
  UnbindReaction29: COR2 => Cro2 + OR2; default*COR2*ku_Cro2OR2c1;  // modifiers: COR1, OR3
  UnbindReaction30: COR2 => Cro2 + OR2; default*COR2*ku_Cro2OR2c2;  // modifiers: OR1, COR3
  UnbindReaction31: COR2 => Cro2 + OR2; default*COR2*ku_Cro2OR2c3;  // modifiers: COR1, COR3
  UnbindReaction32: COR2 => Cro2 + OR2; default*COR2*ku_Cro2OR2c2;  // modifiers: ROR1, COR3
  UnbindReaction33: COR2 => Cro2 + OR2; default*COR2*ku_Cro2OR2c1;  // modifiers: COR1, ROR3
  UnbindReaction34: COR3 => Cro2 + OR3; default*COR3*ku_Cro2OR3;  // modifiers: OR2
  UnbindReaction35: COR3 => Cro2 + OR3; default*COR3*ku_Cro2OR3;  // modifiers: ROR2
  UnbindReaction36: COR3 => Cro2 + OR3; default*COR3*ku_Cro2OR3c1;  // modifiers: COR2, OR1
  UnbindReaction37: COR3 => Cro2 + OR3; default*COR3*ku_Cro2OR3c1;  // modifiers: COR2, ROR1
  UnbindReaction38: COR3 => Cro2 + OR3; default*COR3*ku_Cro2OR3c2;  // modifiers: COR2, COR1
end
