// SBML level 2 version 4

function Henri_Michaelis_Menten__irreversible(substrate, Km, V)
  V*substrate/(Km + substrate);
end
Henri_Michaelis_Menten__irreversible is "Henri-Michaelis-Menten (irreversible)";

function Degradation(CL, Ccell)
  CL*Ccell;
end

model MODEL1409240002()
  // Qosa2014 - Mechanistic modeling that describes Aβ clearance across BBB
  // Qosa2014 - Mechanistic modeling that describes Aβ clearance across BBB.
  // Encoded non-curated model. Issues:
  // - Confusing equation 6
  // - Missing initial values for spices
  // This model is described in the article:
  // Differences in amyloid-? clearance across mouse and human blood-brain barrier models: kinetic analysis and mechanistic modeling.
  // Qosa H, Abuasal BS, Romero IA, Weksler B, Couraud PO, Keller JN, Kaddoumi A.
  // Neuropharmacology 2014 Apr; 79: 668-678
  // Abstract:
  // Alzheimer's disease (AD) has a characteristic hallmark of amyloid-? (A?) accumulation in the brain. This accumulation of A? has been related to its faulty cerebral clearance. Indeed, preclinical studies that used mice to investigate A? clearance showed that efflux across blood-brain barrier (BBB) and brain degradation mediate efficient A? clearance. However, the contribution of each process to A? clearance remains unclear. Moreover, it is still uncertain how species differences between mouse and human could affect A? clearance. Here, a modified form of the brain efflux index method was used to estimate the contribution of BBB and brain degradation to A? clearance from the brain of wild type mice. We estimated that 62% of intracerebrally injected (125)I-A?40 is cleared across BBB while 38% is cleared by brain degradation. Furthermore, in vitro and in silico studies were performed to compare A? clearance between mouse and human BBB models. Kinetic studies for A?40 disposition in bEnd3 and hCMEC/D3 cells, representative in vitro mouse and human BBB models, respectively, demonstrated 30-fold higher rate of (125)I-A?40 uptake and 15-fold higher rate of degradation by bEnd3 compared to hCMEC/D3 cells. Expression studies showed both cells to express different levels of P-glycoprotein and RAGE, while LRP1 levels were comparable. Finally, we established a mechanistic model, which could successfully predict cellular levels of (125)I-A?40 and the rate of each process. Established mechanistic model suggested significantly higher rates of A? uptake and degradation in bEnd3 cells as rationale for the observed differences in (125)I-A?40 disposition between mouse and human BBB models. In conclusion, current study demonstrates the important role of BBB in the clearance of A? from the brain. Moreover, it provides insight into the differences between mouse and human BBB with regards to A? clearance and offer, for the first time, a mathematical model that describes A? clearance across BBB.
  // This model is hosted on BioModels Database and identified by: MODEL1409240002.
  // To cite BioModels Database, please use: BioModels Database: An enhanced, curated and annotated resource for published quantitative kinetic models.
  // To the extent possible under law, all copyright and related or neighbouring rights to this encoded model have been dedicated to the public domain worldwide. Please refer to CC0 Public Domain Dedication for more information.
  // isDescribedBy pubmed:24467845
  // biomodels.db:MODEL1409240002
  // isVersionOf GO:0097242
  // hasProperty DOID:10652
  // hasTaxon taxonomy:9606 taxonomy:10090

  // Compartments:
  compartment cell = 1;
  compartment media = 1;

  // Species:
  species CcellhCMEC_D3 in cell = 0; CcellhCMEC_D3 is "CcellhCMEC/D3";  // isVersionOf uniprot:P05067
  species DcellhCMEC_D3 in cell = 0; DcellhCMEC_D3 is "DcellhCMEC/D3";  // isVersionOf uniprot:P05067
  species $IntactAbetahCMEC_D3 in cell; IntactAbetahCMEC_D3 is "IntactAbetahCMEC/D3";  // isVersionOf uniprot:P05067
  species CcellbEnd3 in cell = 0;  // isVersionOf uniprot:P05067
  species $IntactAbetabEnd3 in cell;  // isVersionOf uniprot:P05067
  species DcellbEnd3 in cell = 0;  // isVersionOf uniprot:P05067
  species CmediahCMEC_D3 in media = 3; CmediahCMEC_D3 is "CmediahCMEC/D3";  // isVersionOf uniprot:P05067
  species CmediabEnd3 in media = 3;  // isVersionOf uniprot:P05067

  // Parameters:
  // Km, uptake for hCMEC/D3 cells (nM)
  Kmuh = 49.1;
  // Km, uptake for bEnd3 cells (nM)
  Kmub = 19.8;
  // Vmax, uptake for hCMEC/D3 cells (fmole/min)
  Vmuh = 4;
  // Vmax, uptake for bEnd3 cells (fmole/min)
  Vmub = 56.4;
  // Intrinsic upake for hCMEC/D3 cells (nl/min)
  Intuh = 81;
  // Intrinsic uptake for bEnd3 cells (nl/min)
  Intub = 2848;
  // Km, efflux for hCMEC/D3 cells (nM)
  Kmeh = 7.5;
  // Km, efflux for bEnd3 cells (nM)
  Kmeb = 7.6;
  // Vmax, efflux for hCMEC/D3 cells (fmole/min)
  Vmeh = 0.12;
  // Vmax, efflux for bEnd3 cells (fmole/min)
  Vmeb = 0.14;
  // Intrinsic efflux for hCMEC/D3 cells (nl/min)
  Inteh = 16;
  // Intrinsic efflux for bEnd3 cells (nl/min)
  Inteb = 18;
  // CL for hCMEC/D3 cells (nl/min)
  CLh = 17;
  // CL for bEnd3 cells (nl/min)
  CLb = 260;

  // Assignment rules:
  IntactAbetahCMEC_D3 := CcellhCMEC_D3 + CmediahCMEC_D3;
  IntactAbetabEnd3 := CcellbEnd3 + CmediabEnd3;

  // Reactions:
  Uptake_hCMEC_D3: CmediahCMEC_D3 => CcellhCMEC_D3; Henri_Michaelis_Menten__irreversible(CmediahCMEC_D3, Kmuh, Vmuh); Uptake_hCMEC_D3 is "Uptake hCMEC/D3";
  Efflux_hCMEC_D3: CcellhCMEC_D3 => CmediahCMEC_D3; Henri_Michaelis_Menten__irreversible(CcellhCMEC_D3, Kmeh, Vmeh); Efflux_hCMEC_D3 is "Efflux hCMEC/D3";
  Degradation_hCMEC_D3: CcellhCMEC_D3 => DcellhCMEC_D3; cell*Degradation(CLh, CcellhCMEC_D3); Degradation_hCMEC_D3 is "Degradation hCMEC/D3";
  Uptake_bEnd3: CmediabEnd3 => CcellbEnd3; Henri_Michaelis_Menten__irreversible(CmediabEnd3, Kmub, Vmub);
  Efflux_bEnd3: CcellbEnd3 => CmediabEnd3; Henri_Michaelis_Menten__irreversible(CcellbEnd3, Kmeb, Vmeb);
  Degradation_bEnd3: CcellbEnd3 => DcellbEnd3; cell*Degradation(CLb, CcellbEnd3);

  // Unit definitions:
  unit volume = 1e-3 litre;
  unit time = 60 second;
  unit substance = 1e-9 mole;
end
