// SBML level 2 version 4

function Constant_flux__irreversible(v)
  v;
end
Constant_flux__irreversible is "Constant flux (irreversible)";

function Henri_Michaelis_Menten__irreversible(substrate, Km, V)
  V*substrate/(Km + substrate);
end
Henri_Michaelis_Menten__irreversible is "Henri-Michaelis-Menten (irreversible)";

// Michaelis-Menten kinetics for transmembrane transport
function TMM(Vm, Si, Km, Se)
  Vm*(Si/(Si + Km) - Se/(Se + Km));
end

// Reversible Michaelis-Menten kinetics
function RMM(Vmf, Sf1, Kmf1, Sf2, Kmf2, Sf3, Kmf3, Vmr, Sr1, Kmr1, Sr2, Kmr2, Sr3, Kmr3)
  Vmf*(Sf1/(Sf1 + Kmf1))*(Sf2/(Sf2 + Kmf2))*(Sf3/(Sf3 + Kmf3)) - Vmr*(Sr1/(Sr1 + Kmr1))*(Sr2/(Sr2 + Kmr2))*(Sr3/(Sr3 + Kmr3));
end

function EVAP(Kevap, Se, V)
  Kevap*Se/V;
end

function To2_0(K, Se, Si)
  K*(Se - Si);
end

function To2e_0(unitpulseSB, A, p1, a1, t, t1, p2, a2, t2)
  1 - (1 + unitpulseSB*A*(1/(1 + (1 - p1)/p1*exp(-a1*(t - t1))) - 1/(1 + (1 - p2)/p2*exp(-a2*(t - t2)))));
end

function _12__30(V, S, K, unitpulseSB, A, p1, a1, t, t1, p2, a2, t2)
  V*(S/(K + S))*(1 + unitpulseSB*A*(1/(1 + (1 - p1)/p1*exp(-a1*(t - t1))) - 1/(1 + (1 - p2)/p2*exp(-a2*(t - t2)))));
end
_12__30 is "12, 30";

function _13__15__21__31__34__37__38__40(V, S, K, S2, K2)
  V*(S/(K + S))*(S2/(K2 + S2));
end
_13__15__21__31__34__37__38__40 is "13, 15, 21, 31, 34, 37, 38, 40";

function _25__26(V, S, K, S2, K2, a, S3, St)
  V*(S/(K + S))*(S2/(K2 + S2))*(1 - 1/(1 + exp(-a*(S3 - St))));
end
_25__26 is "25, 26";

function _28__35(V, S, K, S2, K2, S3, K3)
  V*(S/(K + S))*(S2/(K2 + S2))*(S3/(K3 + S3));
end
_28__35 is "28, 35";

function Vop_0(V, S, K, S2, K2, S3, K3, UP, LOW)
  V*(S/(K + S))*(S2/(K2 + S2))*(S3/(K3 + S3))*(UP/LOW);
end

function Vos_0(E, V, unitpulseSB, A, p1, a1, t, t1, p2, a2, t2)
  V*(1 - E)*(1 + unitpulseSB*A*(1/(1 + (1 - p1)/p1*exp(-a1*(t - t1))) - 1/(1 + (1 - p2)/p2*exp(-a2*(t - t2)))));
end

function Vpfk_0(V, S, K, S2, K2, S3, Ki, n)
  V*(S/(K + S))*(S2/(K2 + S2))*(1/(1 + (S3/Ki)^n));
end

function Vstress_0(V, S, K, a, St, unitpulseSB, A, p1, a1, t, t1, p2, a2, t2)
  V*(S/(K + S))*(1 - (1 - 1/(1 + exp(-a*(S - St)))))*(-1 + 1 + unitpulseSB*A*(1/(1 + (1 - p1)/p1*exp(-a1*(t - t1))) - 1/(1 + (1 - p2)/p2*exp(-a2*(t - t2)))));
end

model Poliquin2013()
  // Poliquin2013 - Energy Deregulations in Parkinson's Disease
  // Encoded non-curated model. Issues:
  // - Fluxes, reactions, parameters and species properly encoded but Figure 2 not successfully simulated.
  // - Unpaired values in Table 5 and Matlab Code (S5 and S6 Supplementary Material): Vm_ldh_r, Vm_t_lac, Km_ldh_nadh, Vm_cdh, Vm_cd, Vm_fh, Cm_ldh_f,Vm_sdh and Vm_pdh
  // - Confusing parameter t2 on unitpulseSB; is it T_p_off or (T_p_off + T_p_on)?
  // This model is described in the article:
  // Metabolomics and in-silico analysis reveal critical energy deregulations in animal models of Parkinson's disease.
  // Poliquin PO, Chen J, Cloutier M, Trudeau LÉ, Jolicoeur M.
  // PLoS ONE 2013; 8(7): e69146
  // Abstract:
  // Parkinson's disease (PD) is a multifactorial disease known to result from a variety of factors. Although age is the principal risk factor, other etiological mechanisms have been identified, including gene mutations and exposure to toxins. Deregulation of energy metabolism, mostly through the loss of complex I efficiency, is involved in disease progression in both the genetic and sporadic forms of the disease. In this study, we investigated energy deregulation in the cerebral tissue of animal models (genetic and toxin induced) of PD using an approach that combines metabolomics and mathematical modelling. In a first step, quantitative measurements of energy-related metabolites in mouse brain slices revealed most affected pathways. A genetic model of PD, the Park2 knockout, was compared to the effect of CCCP, a complex I blocker. Model simulated and experimental results revealed a significant and sustained decrease in ATP after CCCP exposure, but not in the genetic mice model. In support to data analysis, a mathematical model of the relevant metabolic pathways was developed and calibrated onto experimental data. In this work, we show that a short-term stress response in nucleotide scavenging is most probably induced by the toxin exposure. In turn, the robustness of energy-related pathways in the model explains how genetic perturbations, at least in young animals, are not sufficient to induce significant changes at the metabolite level.
  // This model is hosted on BioModels Database and identified by: MODEL1410060000.
  // To cite BioModels Database, please use: BioModels Database: An enhanced, curated and annotated resource for published quantitative kinetic models.
  // To the extent possible under law, all copyright and related or neighbouring rights to this encoded model have been dedicated to the public domain worldwide. Please refer to CC0 Public Domain Dedication for more information.
  // biomodels.db:MODEL1410060000
  // isDescribedBy pubmed:23935941
  // isVersionOf GO:2000505
  // hasProperty DOID:14330
  // hasTaxon taxonomy:10090

  // Compartments:
  // Cytosol and mitochondria
  compartment Intracellular = 1;  // GO:0005829 GO:0005739
  // Medium
  compartment Extracellular = 1;  // GO:0005615

  // Species:
  // Acetyl-CoezymeA
  species ACA in Intracellular = 74.5;  // isVersionOf CHEBI:15351
  // α-Ketoglutarate
  species AKG in Intracellular = 596;  // isVersionOf CHEBI:30915
  // Adenosine Monophosphate
  species AMP in Intracellular = 254;  // isVersionOf CHEBI:16027
  // Stressed Adenosine N-phosphated
  species ANPs in Intracellular = 0;  // isVersionOf CHEBI:25608
  // Adenosine Triphosphate
  species $ATP in Intracellular = 872;  // isVersionOf CHEBI:15422
  // Citrate
  species CIT in Intracellular = 290;  // isVersionOf CHEBI:16947
  // Fructose 6-Phosphate
  species $F6P in Intracellular = 130;  // isVersionOf CHEBI:15946
  // Fructose Bi-Phosphate
  species FBP in Intracellular = 18.65;  // isVersionOf CHEBI:40595
  // Fumarate
  species FUM in Intracellular = 11.36;  // isVersionOf CHEBI:18012
  // Glyceraldehyde 3-Phosphate
  species $G3P in Intracellular = 14.89;  // isVersionOf CHEBI:17138
  // Glucose 6-Phosphate
  species $G6P in Intracellular = 644.95;  // isVersionOf CHEBI:4170
  // Glucose
  species GLC in Intracellular = 1000;  // isVersionOf CHEBI:17234
  // Glutamine
  species GLN in Intracellular = 20;  // isVersionOf CHEBI:28300
  // Glutamate
  species GLT in Intracellular = 200;  // isVersionOf CHEBI:18237
  // Glycogen
  species GLY in Intracellular = 2635.5;  // isVersionOf CHEBI:28087
  // Lactate
  species LAC in Intracellular = 400;  // isVersionOf CHEBI:422
  // Malate
  species MAL in Intracellular = 596;  // isVersionOf CHEBI:6650
  // Nicotinamide adenine dinucleotide (reduced)
  species $NADH in Intracellular = 230;  // isVersionOf CHEBI:16908
  // Nicotinamide adenine dinucleotide phosphate (reduced)
  species $NADPH in Intracellular = 65.08;  // isVersionOf CHEBI:16474
  // Oxygen
  species $O2 in Intracellular = 1234.1;  // isVersionOf CHEBI:26689
  // Oxaloacetate
  species OAA in Intracellular = 5.39;  // isVersionOf CHEBI:30744
  // PhosphoCreatine
  species PCr in Intracellular = 1826.3;  // isVersionOf CHEBI:17287
  // Phosphoenolpyruvate
  species PEP in Intracellular = 6.3;  // isVersionOf CHEBI:18021
  // Pyruvate
  species PYR in Intracellular = 49;  // isVersionOf CHEBI:15361
  // Ribose 5-phosphate
  species R5P in Intracellular = 21.5;  // isVersionOf CHEBI:58273
  // Succinate
  species SUC in Intracellular = 500;  // isVersionOf CHEBI:15741
  // Sum of Phosphorylated Adenosine nucleotide
  species $ANP_T in Intracellular = 1300.76;  // isVersionOf CHEBI:25608
  // Sum of CoA and ACA
  species $CoA_T in Intracellular;  // isVersionOf CHEBI:15351 CHEBI:15346
  // Sum of Creatine (standalone and phosphorylated)
  species $Cr_T in Intracellular;  // isVersionOf CHEBI:16919
  // Sum of Nicotinamide adenine dinucleotide (reduced and oxidized)
  species $NAD_T in Intracellular;  // isVersionOf CHEBI:13389
  // Sum of Nicotinamide adenine dinucleoide phosphate (reduced and oxidized)
  species $NADP_T in Intracellular;  // isVersionOf CHEBI:25523
  // Adenosine Diphosphate
  species $ADP in Intracellular;  // isVersionOf CHEBI:16761
  // Tissue slice
  species $Cells in Intracellular = 0.000548;  // isVersionOf FMA:9637
  // CoenzymeA
  species CoA in Intracellular = 1.8;  // isVersionOf CHEBI:15346
  // Creatine
  species Cr in Intracellular = 673.7;  // isVersionOf CHEBI:16919
  // Nicotinamide adenine dinucleotide (oxidized)
  species NAD in Intracellular = 840;  // isVersionOf CHEBI:15846
  // Nicotinamide adenine dinucleotide phosphate (oxdized)
  species NADP in Intracellular = 0.92;  // isVersionOf CHEBI:18009
  // Standard species required for RMM reactions
  species $u in Intracellular = 1;  // isVersionOf PATO:0000438
  // Adenosine N-Phosphate
  species $ANP in Intracellular;  // isVersionOf CHEBI:25608
  // Extracellular Glucose
  species $GLCe in Extracellular = 9237;  // isVersionOf CHEBI:17234
  // Extracellular Glutamine
  species $GLNe in Extracellular = 4;  // isVersionOf CHEBI:28300
  // Extracellular Glutamate
  species $GLTe in Extracellular = 18;  // isVersionOf CHEBI:18237
  // Extracellular Lactate
  species $LACe in Extracellular = 120;  // isVersionOf CHEBI:422
  // Extracellular Oxygen
  species $O2e in Extracellular = 1235;  // isVersionOf CHEBI:26689
  // Extracellular Volume
  species $V in Extracellular = 0.04;  // isVersionOf PATO:0000918

  // Parameters:
  // Adenylate kinase – forward reaction
  Vmakf = 1300;
  // Adenylate kinase – reverse reaction
  Vmakr = 1000;
  // ATP consumption reactions
  Vmatpase = 23500;
  // Citrate dehydrogenase
  Vmcdh = 1824;
  // Creatine kinase – forward reaction
  Vmckf = 6000;
  // Creatine kinase – reverse reaction
  Vmckr = 450;
  // Citrate synthase
  Vmcs = 2636;
  // Energetic metabolism stress recovery
  Vmdestress = 0.5;
  // Fructose-6-phosphate aldolase and isomerase – forward reaction
  Vmfaif = 900;
  // Fructose-6-phosphate aldolase and isomerase – reverse reaction
  Vmfair = 100;
  // Fructose bi-phosphatase
  Vmfbp = 0;
  // Fumarate hydrogenase
  Vmfh = 2404;
  // Glucose-6-phosphate dehydrogenase
  Vmg6d = 300;
  // Glutamine synthase – forward reaction
  Vmgnsf = 10;
  // Glutamine synthase – reverse reaction
  Vmgnsr = 20;
  // Glutamate dehydronenase – forward reaction
  Vm_df = 20; Vm_df is "Vm?df";
  // Glutamate dehydronenase – reverse reaction
  Vm_dr = 41; Vm_dr is "Vm?dr";
  // Glycogene phosphorylase
  Vmgyp = 2.337;
  // Glycogene synthase
  Vmgys = 3.27;
  // Glucose hexokinase
  Vmhk = 3000;
  // Glucose-6-phosphate isomerase – forward reaction
  Vmisof = 2500;
  // Glucose-6-phosphate isomerase – reverse reaction
  Vmisor = 1000;
  // α-ketoglutarate dehydrogenase
  Vmkdh = 7549;
  // Lactate dehydrogenase - forward reaction
  Vmldhf = 2000;
  // Lactate dehydrogenase - reverse reaction
  Vmldhr = 5000;
  // Mitochondrial proton leak
  Vmleak = 1200;
  // Malate dehydrogenase
  Vmmdh = 2890;
  // Oxydative phosphorylation
  Vmop = 20000;
  // Pyruvate carboxylase
  Vmpc = 28;
  // Pyruvate dehydrogenase
  Vmpdh = 2700;
  // Phosphofructokinase
  Vmpfk = 3000;
  // Phosphoglyceraldehyde kinase
  Vmpgk = 3000;
  // Pyruvate kinase
  Vmpk = 10000;
  // Pentose phosphate pathway
  Vmppp = 250;
  // Succinate dehydrogenase
  Vmsdh = 2000;
  // Energetic metabolism stress
  Vmstress = 100;
  // Transmembrane transport of glucose
  Vmtglc = 1050;
  // Transmembrane transport of glutamine
  Vmtgln = 40;
  // Transmembrane transport of glutamate
  Vmtglt = 22;
  // Transmembrane transport of lactate
  Vmtlac = 120;
  // Adenylate kinase for ADP
  Kmakadp = 153;
  // Adenylate kinase for AMP
  Kmakamp = 276;
  // Adenylate kinase for ATP
  Kmakatp = 148;
  // ATPase for ATP
  Kmatpaseatp = 500;
  // Citrate dehydrogenase for citrate
  Kmcdhcit = 275;
  // Citrate dehydrogenase for NAD
  Kmcdhnad = 74.33333;
  // Creatine kinase for ADP
  Kmckadp = 40;
  // Creatine kinase for ATP
  Kmckatp = 635;
  // Creatine kinase for creatine
  Kmckcr = 7500;
  // Creatine kinase for P-creatine
  Kmckpcr = 510;
  // Citrate synthase for acetyl CoA
  Kmcsaca = 220;
  // Citrate synthase for oxaloacetate
  Kmcsoaa = 5.9;
  // Energetic metabolism affinity for adenosine-Ps under stress
  Kmdestressanps = 300;
  // Fructose-6-phosphate aldolase and isomerase for fructose-biphosphate (fbp)
  Kmfaifbp = 13.25;
  // Fructose-6-phosphate aldolase and isomerase for glyceraldehyde-3-phosphate
  Kmfaig3p = 383.33;
  // Fructose bi-phosphatase for fbp
  Kmfbpfbp = 1.67;
  // Fumarate hydrogenase for fumarate
  Kmfhfum = 13;
  // Glucose-6-phosphate dehydrogenase for glucose-6-phosphate
  Kmg6dg6p = 168.8;
  // Glucose-6-phosphate dehydrogenase for NADP
  Kmg6dnadp = 10.035;
  // Glutamine synthase for ADP
  Kmgnsadp = 612.3125;
  // Glutamine synthase for ATP
  Kmgnsatp = 2000;
  // Glutamine synthase for glutamine
  Kmgnsgln = 2.277273e4;
  // Glutamine synthase for glutamate
  Kmgnsglt = 1200;
  // Glutamate dehydronenase for α-ketoglutarate
  Km_dakg = 1416.154; Km_dakg is "Km?dakg";
  // Glutamate dehydronenase for glutamate
  Km_dglt = 5298.333; Km_dglt is "Km?dglt";
  // Glutamate dehydronenase for NAD
  Km_dnad = 502.5; Km_dnad is "Km?dnad";
  // Glutamate dehydronenase for NADH
  Km_dnadh = 75.36364; Km_dnadh is "Km?dnadh";
  // Glycogene phosphorylase for glycogen
  Kmgypgly = 1003.242;
  // Glycogene synthase for ATP
  Kmgysatp = 74;
  // Glycogene synthase for glucose-6-phosphate
  Kmgysg6p = 500;
  // Glucose hexokinase for ATP
  Kmhkatp = 592;
  // Glucose hexokinase for glucose
  Kmhkglc = 0.0775;
  // Glucose-6-phosphate isomerase for fructose-6-phosphate
  Kmisof6p = 0.06078;
  // Glucose-6-phosphate isomerase for glucose-6-phosphate
  Kmisog6p = 423.75;
  // α-ketoglutarate dehydrogenase for ADP
  Kmkdhadp = 125.9;
  // α-ketoglutarate dehydrogenase for α-ketoglutarate
  Kmkdhakg = 13;
  // α-ketoglutarate dehydrogenase for NAD
  Kmkdhnad = 280;
  // α-ketoglutarate dehydrogenase for NADH
  Kmkdhnadh = 61;
  // Lactate dehydrogenase for lactate
  Kmldhlac = 1790;
  // Lactate dehydrogenase for NAD
  Kmldhnad = 1100;
  // Lactate dehydrogenase for NADH
  Kmldhnadh = 6;
  // Lactate dehydrogenase for pyruvate
  Kmldhpyr = 214;
  // Mitochondrial proton leak for NADH
  Kmleaknadh = 200;
  // Malate dehydrogenase for malate
  Kmmdhmal = 500;
  // Malate dehydrogenase for NAD
  Kmmdhnad = 140;
  // Oxydative phosphorylation for ADP
  Kmopadp = 1.0735;
  // Oxydative phosphorylation for NADH
  Kmopnadh = 2.75;
  // Oxydative phosphorylation for O2
  Kmopo2 = 2.9658;
  // Pyruvate carboxylase for ATP
  Kmpcatp = 235;
  // Pyruvate carboxylase for pyruvate
  Kmpcpyr = 162.5;
  // Pyruvate dehydrogenase for coenzyme A
  Kmpdhcoa = 1;
  // Pyruvate dehydrogenase for NAD
  Kmpdhnad = 280;
  // Pyruvate dehydrogenase for pyruvate
  Kmpdhpyr = 36.9;
  // Phosphofructokinase for ATP
  Kmpfkatp = 120;
  // Phosphofructokinase for fructose-6-phosphate
  Kmpfkf6p = 113.5;
  // Phosphoglyceraldehyde kinase for ADP
  Kmpgkadp = 142;
  // Phosphoglyceraldehyde kinase for glyceraldehyde-3-phosphate
  Kmpgkg3p = 70;
  // Pyruvate kinase for ADP
  Kmpkadp = 340;
  // Pyruvate kinase for phosphoenolpyruvate
  Kmpkpep = 20;
  // Pentose Phosphate Pathway for ribulose-5-phosphate
  Kmpppr5p = 250;
  // Succinate dehydrogenase for NAD
  Kmsdhnad = 193.583;
  // Succinate dehydrogenase for succinate
  Kmsdhsuc = 371.13;
  // Energetic metabolism stress for ATP
  Kmstressatp = 300;
  // Glucose transmembrane transporter
  Kmtglc = 4340.485;
  // Glutamine transmembrane transporter
  Kmtgln = 434;
  // Glutamate transmembrane transporter
  Kmtglt = 12;
  // Lactate transmembrane transporter
  Kmtlac = 439.348;
  // Inhibition constant of ATP on phosphofructokinase
  Kipfkatp = 759.49;
  // Inhibition of glycogen on the glycogen buffer pathway
  TRHigysgly = 4200;
  // Inhibition of G6P on hexokinase
  TRHihkg6p = 600;
  // Inhibition of a stress on ATP production
  TRHistressatp = 300;
  // Oxygen concentration in extracellular medium
  O2e0 = 1235;
  // Initial brain slices volume in a Petri plate
  Cells0 = 0.000548;
  // Brain slices volume in a sample
  Cellsmin = 6.9e-5;
  // Oxidative phosphorylation capacity (0.90 for Parkin KO mice)
  Etaop = 0.99;
  // Stoichiometric coefficient from FAI to G3P
  nfaig3p = 2;
  // Stoichiometric coefficient form G6PD and 6PGnD
  ng6dnadph = 2;
  // Stoichiometric coefficient of H+ leak: 1 NADH per O2 consumed
  nleakO2 = 0.5;
  // Stoichiometric coefficient of respiration: ATP per NADH
  nopatp = 3.33;
  // Stoichiometric coefficient of respiration: O2 per NADH
  nopO2 = 0.5;
  // Stoichiometric flux ratio from F6P to PPP
  npppf6p = 0.666667;
  // Stoichiometric flux ratio from PPP to G3P
  npppg3p = 0.333333;
  // Stoichiometric flux ratio: NADH from succinate dehydrogenase
  nsdhnadh = 0.666667;
  // Stoichiometric flux ratio: NADH on phosphofructokinase
  nHpfk = 4;
  // Volumetric rate of evaporation with time
  Kevap = 3.2e-5;
  // Volumetric rate of sampling with time
  Ksampling = 7e-6;
  // Specific mass transfer coefficient of O2 in the brain slice
  Kto2 = 2644;
  Figysgly = 0.02;
  Fihkg6p = 0.02;
  Fistressatp = 0.02;
  Fpoffatpase = 1;
  Fpoffleak = 1;
  Fpoffo2 = 1;
  Fpoffos = 1;
  Fponatpase = 1;
  Fponleak = 1;
  Fpono2 = 1;
  Fponos = 1;
  _0 = 0;
  _1 = 1;
  A_p_atpase = 0;
  A_p_leak = 0;
  A_p_o2 = 0;
  A_p_os = 0;
  K_L_o2 = 500;
  K_os = 0.08;
  K_sampling = 7e-6;
  K_t_o2 = 2644;
  Km_t_o2 = 0.351513;
  P_p_off_atpase = 0.01;
  P_p_off_leak = 0.01;
  P_p_off_o2 = 0.01;
  P_p_off_os = 0.01;
  P_p_on_atpase = 0.01;
  P_p_on_leak = 0.01;
  P_p_on_o2 = 0.01;
  P_p_on_os = 0.01;
  T_p_off_atpase = 35;
  T_p_off_leak = 35;
  T_p_off_o2 = 35;
  T_p_off_os = 35;
  T_p_on_atpase = 15;
  T_p_on_leak = 15;
  T_p_on_o2 = 15;
  T_p_on_os = 15;

  // Assignment rules:
  unitpulseSB_To2 := piecewise(1, (time >= T_p_on_o2) && (time <= T_p_off_o2 + T_p_on_o2), 0);
  unitpulseSB_Vleak := piecewise(1, (time >= T_p_on_leak) && (time <= T_p_off_leak + T_p_on_leak), 0);
  unitpulseSB_Vatpase := piecewise(1, (time >= T_p_on_atpase) && (time <= T_p_off_atpase + T_p_on_atpase), 0);
  unitpulseSB_Vos := piecewise(1, (time >= T_p_on_os) && (time <= T_p_off_os + T_p_on_os), 0);
  CoA_T := ACA + CoA;
  Cr_T := Cr + PCr;
  NAD_T := NAD + NADH;
  NADP_T := NADP + NADPH;
  ADP := ANP_T - ATP - AMP - ANPs;
  ANP := ANP_T - ANPs;
  Rvolume := Cells/V;
  Vop1 := Vmop*(NADH/(Kmopnadh + NADH))*(ADP/(Kmopadp + ADP))*(O2/(Kmopo2 + O2e))*(ADP/ATP);

  // Rate rules:
  ATP' = -Vhk - Vpfk + Vpgk + Vpk - Vpc + Vkdh - Vgns - Vgys - Vck + Etaop*nopatp*Vop - Vatpase - Vak - Vstress;
  F6P' = Viso - Vpfk + npppf6p*Vppp + Vfbp;
  G3P' = nfaig3p*Vfai - Vpgk + Vppp;
  G6P' = Vhk - Viso - npppg3p*Vg6d - Vgys + Vgyp;
  NADH' = Vpgk + Vldh + Vpdh + Vcdh + Vkdh + nsdhnadh*Vsdh + Vmdh + Vgtd - Vleak - Vop;
  NADPH' = ng6dnadph*Vg6d - Vos;
  O2' = To2 - nopO2*Vop - nleakO2*Vleak;
  GLCe' = -Rvolume*Tglc + Cglc;
  GLNe' = Rvolume*Tgln + Cgln;
  GLTe' = Rvolume*Tglt + Cglt;
  LACe' = Rvolume*Tlac + Clac;
  O2e' = To2e;
  V' = -Vevap;

  // Reactions:
  Cglc: => $GLCe; Extracellular*EVAP(Kevap, GLCe, V);  // modifiers: V
  Cgln: => $GLNe; Extracellular*EVAP(Kevap, GLNe, V);  // modifiers: V
  Cglt: => $GLTe; Extracellular*EVAP(Kevap, GLTe, V);  // modifiers: V
  Clac: => $LACe; Extracellular*EVAP(Kevap, LACe, V);  // modifiers: V
  Tglc: $GLCe => GLC; TMM(Vmtglc, GLCe, Kmtglc, GLC);
  Tgln: GLN => $GLNe; TMM(Vmtgln, GLN, Kmtgln, GLNe);
  Tglt: GLT => $GLTe; TMM(Vmtglt, GLT, Kmtglt, GLTe);
  Tlac: LAC => $LACe; TMM(Vmtlac, LAC, Kmtlac, LACe);
  To2: $O2e => $O2; To2_0(Kto2, O2e, O2);
  To2e: => $O2e; Extracellular*To2e_0(unitpulseSB_To2, A_p_o2, P_p_on_o2, Fpono2, time, T_p_on_o2, P_p_off_o2, Fpoffo2, T_p_off_o2);
  Vak: $ATP + AMP + $u => $ADP + 2 $u; Intracellular*RMM(Vmakf, ATP, Kmakatp, AMP, Kmakamp, u, _0, Vmakr, ADP, Kmakadp, u, _0, u, _0);
  Vatpase: $ATP => $ADP; Intracellular*_12__30(Vmatpase, ATP, Kmatpaseatp, unitpulseSB_Vatpase, A_p_atpase, P_p_on_atpase, Fponatpase, time, T_p_on_atpase, P_p_on_atpase, Fpoffatpase, T_p_off_atpase);
  Vcdh: CIT + NAD => AKG + $NADH; Intracellular*_13__15__21__31__34__37__38__40(Vmcdh, CIT, Kmcdhcit, NAD, Kmcdhnad);
  Vck: Cr + $ATP + $u => PCr + $ADP + $u; Intracellular*RMM(Vmckf, Cr, Kmckcr, ATP, Kmckatp, u, _0, Vmckr, PCr, Kmckpcr, ADP, Kmckadp, u, _0);
  Vcs: ACA + OAA => CIT; Intracellular*_13__15__21__31__34__37__38__40(Vmcs, ACA, Kmcsaca, OAA, Kmcsoaa);
  Vdestress: ANPs => AMP; Intracellular*Henri_Michaelis_Menten__irreversible(ANPs, Kmdestressanps, Vmdestress);
  Vevap: $V => ; Extracellular*Constant_flux__irreversible(Kevap);
  Vfai: FBP + 2 $u => $G3P + 2 $u; Intracellular*RMM(Vmfaif, FBP, Kmfaifbp, u, _0, u, _0, Vmfair, G3P, Kmfaig3p, u, _0, u, _0);
  Vfbp: FBP => $F6P; Intracellular*Henri_Michaelis_Menten__irreversible(FBP, Kmfbpfbp, Vmfbp);
  Vfh: FUM => MAL; Intracellular*Henri_Michaelis_Menten__irreversible(FUM, Kmfhfum, Vmfh);
  Vg6d: $G6P + NADP => R5P + $NADPH; Intracellular*_13__15__21__31__34__37__38__40(Vmg6d, G6P, Kmg6dg6p, NADP, Kmg6dnadp);
  Vgns: GLT + 2 $u => GLN + 2 $u; Intracellular*RMM(Vmgnsf, GLT, Kmgnsglt, u, _0, u, _0, Vmgnsr, GLN, Kmgnsgln, u, _0, u, _0);
  Vgtd: GLT + NAD + $u => AKG + $NADH + $u; Intracellular*RMM(Vm_df, GLT, Km_dglt, NAD, Km_dnad, u, _0, Vm_dr, AKG, Km_dakg, NADH, Km_dnadh, u, _0);
  Vgyp: GLY => $G6P; Intracellular*Henri_Michaelis_Menten__irreversible(GLY, Kmgypgly, Vmgyp);
  Vgys: $G6P + $ATP => GLY; Intracellular*_25__26(Vmgys, G6P, Kmgysg6p, ATP, Kmgysatp, Figysgly, GLY, TRHigysgly);
  Vhk: GLC + $ATP => $G6P; Intracellular*_25__26(Vmhk, GLC, Kmhkglc, ATP, Kmhkatp, Fihkg6p, G6P, TRHihkg6p);
  Viso: $G6P + 2 $u => $F6P + 2 $u; Intracellular*RMM(Vmisof, G6P, Kmisog6p, u, _0, u, _0, Vmisor, F6P, Kmisof6p, u, _0, u, _0);
  Vkdh: AKG + $ADP + NAD => SUC + $ATP + $NADH; Intracellular*_28__35(Vmkdh, AKG, Kmkdhakg, ADP, Kmkdhadp, NAD, Kmkdhnad);
  Vldh: LAC + NAD + $u => PYR + $NADH + $u; Intracellular*RMM(Vmldhf, LAC, Kmldhlac, NAD, Kmldhnad, u, _0, Vmldhr, PYR, Kmldhpyr, NADH, Kmldhnadh, u, _0);
  Vleak: $NADH + $O2 => NAD; Intracellular*_12__30(Vmleak, NADH, Kmleaknadh, unitpulseSB_Vleak, A_p_leak, P_p_on_leak, Fponleak, time, T_p_on_leak, P_p_off_leak, Fpoffleak, T_p_off_leak);
  Vmdh: MAL + NAD => OAA + $NADH; Intracellular*_13__15__21__31__34__37__38__40(Vmmdh, MAL, Kmmdhmal, NAD, Kmmdhnad);
  Vop: $NADH + $ADP + $O2 => NAD + $ATP; Intracellular*Vop_0(Vmop, NADH, Kmopnadh, ADP, Kmopadp, O2, Kmopo2, ADP, ATP);
  Vos: $NADPH + $O2 => NADP; Intracellular*Vos_0(Etaop, Vop1, unitpulseSB_Vos, A_p_os, P_p_on_os, Fponos, time, T_p_on_os, P_p_off_os, Fpoffos, T_p_off_os);
  Vpc: PYR + $ATP => OAA + $ADP; Intracellular*_13__15__21__31__34__37__38__40(Vmpc, PYR, Kmpcpyr, ATP, Kmpcatp);
  Vpdh: PYR + NAD + CoA => ACA + $NADH; Intracellular*_28__35(Vmpdh, PYR, Kmpdhpyr, NAD, Kmpdhnad, CoA, Kmpdhcoa);
  Vpfk: $F6P + $ATP => FBP + $ADP; Intracellular*Vpfk_0(Vmpfk, F6P, Kmpfkf6p, ATP, Kmpfkatp, ATP, Kipfkatp, nHpfk);
  Vpgk: $G3P + $ADP + NAD => PEP + $ATP + $NADH; Intracellular*_13__15__21__31__34__37__38__40(Vmpgk, G3P, Kmpgkg3p, ADP, Kmpgkadp);
  Vpk: PEP + $ADP => PYR + $ATP; Intracellular*_13__15__21__31__34__37__38__40(Vmpk, PEP, Kmpkpep, ADP, Kmpkadp);
  Vppp: R5P => $F6P + $G3P; Intracellular*Henri_Michaelis_Menten__irreversible(R5P, Kmpppr5p, Vmppp);
  Vsdh: SUC + NAD => FUM + $NADH; Intracellular*_13__15__21__31__34__37__38__40(Vmsdh, SUC, Kmsdhsuc, NAD, Kmsdhnad);
  Vstress: $ATP => ANPs; Intracellular*Vstress_0(Vmstress, ATP, Kmstressatp, Fistressatp, TRHistressatp, unitpulseSB_Vleak, A_p_leak, P_p_on_leak, Fponleak, time, T_p_on_leak, P_p_off_leak, Fpoffleak, T_p_off_leak);

  // Unit definitions:
  unit time = 60 second;
  unit substance = 1e-6 mole;
end
