// SBML level 2 version 4

model MODEL1503050000()
  // Smallbone2015 - Multi-scale model of E. coli metabolism
  // isDerivedFrom biomodels.db:BIOMD0000000051 biomodels.db:MODEL1501300000
  // biomodels.db:MODEL1503050000

  // Compartments:
  compartment E = 65;  // GO:0005576
  compartment I = 1;  // GO:0005829

  // Species:
  species PEP in I = 2.67;  // CHEBI:18021 kegg.compound:C00074
  species $GLCe in I = 2;  // CHEBI:4167; kegg.compound:C00031; isVersionOf CHEBI:17234 kegg.compound:C00293
  species G6P in I = 3.48;  // CHEBI:17665 kegg.compound:C00668
  species PYR in I = 2.67;  // CHEBI:15361 kegg.compound:C00022
  species F6P in I = 0.6;  // kegg.compound:C05345; isVersionOf kegg.compound:C00085; isVersionOf CHEBI:15946
  species G1P in I = 0.653;  // CHEBI:16077 kegg.compound:C00103
  species PG in I = 0.808;  // CHEBI:16863 kegg.compound:C00345
  species FDP in I = 0.272;  // CHEBI:16905 kegg.compound:C00354
  species SED7P in I = 0.276;  // CHEBI:15721 kegg.compound:C00281
  species G3P in I = 0.218;  // CHEBI:17138 kegg.compound:C00661
  species E4P in I = 0.098;  // CHEBI:48153; kegg.compound:C00279
  species XYL5P in I = 0.138;  // CHEBI:16332 kegg.compound:C00231
  species RIB5P in I = 0.398;  // CHEBI:17797 kegg.compound:C00117
  species DHAP in I = 0.167;  // CHEBI:16108 kegg.compound:C00111
  species PGP in I = 0.008;  // CHEBI:16001 kegg.compound:C00236
  species PG3 in I = 2.13;  // CHEBI:17794 kegg.compound:C00197
  species PG2 in I = 0.399;  // CHEBI:17835 kegg.compound:C00631
  species RIBU5P in I = 0.111;  // CHEBI:17363 kegg.compound:C00199
  species ATP in I = 4.27;
  species ADP in I = 0.595;
  species AMP in I = 0.955;
  species NADP in I = 0.195;
  species NADPH in I = 0.062;
  species NAD in I = 1.47;
  species NADH in I = 0.1;
  species cAMP in I = 0.004876019;
  species EI in I = 0.001763885;
  species EI_P in I = 0.0004294751;
  species HPr in I = 0.02219496;
  species HPr_P in I = 0.002650134;
  species IIA in I = 0.09094496;
  species IIA_P in I = 0.01230197;
  species IICB in I = 0.07661939;
  species IICB_P in I = 0.02336381;
  species Cya in I = 0.0003226505;
  species IIA_P_Cya in I = 0.0002441473;
  species Crp in I = 0.01442439;
  species CrpSiteI_crp in I = 3.829319e-9;
  species CrpSiteII_crp in I = 2.82683518e-8;
  species CrpSite_cyaA in I = 1.2880948e-9;
  species CrpSite_genome in I = 2.55029453e-7;
  species CrpSite_ptsGp1 in I = 8.3408018e-9;
  species CrpSite_ptsGp2 in I = 8.3408018e-9;
  species CrpSite_ptsHp0 in I = 8.3408018e-9;
  species CrpSite_ptsHp1 in I = 8.3408018e-9;
  species CrpSite_ptsIp0 in I = 8.3408018e-9;
  species CrpSite_ptsIp1 in I = 8.3408018e-9;
  species CrpSite_mlcp1 in I = 8.3408018e-9;
  species CrpSite_mlcp2 in I = 8.3408018e-9;
  species Mlc in I = 3.09226233e-7;
  species MlcSite_mlcp1 in I = 2.428128e-7;
  species MlcSite_mlcp2 in I = 2.428994e-7;
  species MlcSite_ptsGp1 in I = 2.28846e-7;
  species MlcSite_ptsGp2 in I = 2.28846e-7;
  species MlcSite_ptsHp0 in I = 2.28846e-7;
  species MlcSite_ptsIp0 in I = 2.28846e-7;
  species Crp_cAMP in I = 0.002813389;
  species Crp_cAMP_CrpSiteI_crp in I = 2.39168681e-7;
  species Crp_cAMP_CrpSiteII_crp in I = 2.147306e-7;
  species Crp_cAMP_CrpSite_cyaA in I = 2.417149e-7;
  species Crp_cAMP_CrpSite_genome in I = 7.174971e-6;
  species Crp_cAMP_CrpSite_ptsGp1 in I = 2.346592e-7;
  species Crp_cAMP_CrpSite_ptsGp2 in I = 2.346592e-7;
  species Crp_cAMP_CrpSite_ptsHp0 in I = 2.346592e-7;
  species Crp_cAMP_CrpSite_ptsHp1 in I = 2.346592e-7;
  species Crp_cAMP_CrpSite_ptsIp0 in I = 2.346592e-7;
  species Crp_cAMP_CrpSite_ptsIp1 in I = 2.346592e-7;
  species Crp_cAMP_CrpSite_mlcp1 in I = 2.346592e-7;
  species Crp_cAMP_CrpSite_mlcp2 in I = 2.346592e-7;
  species Mlc_MlcSite_ptsGp1 in I = 1.41530351e-8;
  species Mlc_MlcSite_ptsGp2 in I = 1.41530351e-8;
  species Mlc_MlcSite_ptsIp0 in I = 1.41530351e-8;
  species Mlc_MlcSite_ptsHp0 in I = 1.41530351e-8;
  species Mlc_MlcSite_mlcp1 in I = 1.824544e-10;
  species Mlc_MlcSite_mlcp2 in I = 1.013997e-10;
  species IICB_Mlc in I = 0.0001658491;
  species mRNA_cyaA in I = 2.933186e-6;
  species mRNA_crp in I = 0.0001567978;
  species mRNA_ptsG in I = 0.0009104459;
  species mRNA_ptsH in I = 0.0002258645;
  species mRNA_ptsI in I = 1.993964e-5;
  species mRNA_crr in I = 0.0009386085;
  species mRNA_mlc in I = 1.511047e-6;
  species $cyaA in I = 2.43e-7;
  species $crp in I = 2.43e-7;
  species $ptsGp1 in I = 2.43e-7;
  species $ptsGp2 in I = 2.43e-7;
  species $ptsHp0 in I = 2.43e-7;
  species $ptsHp1 in I = 2.43e-7;
  species $ptsIp0 in I = 2.43e-7;
  species $ptsIp1 in I = 2.43e-7;
  species $crr in I = 2.43e-7;
  species $mlcp1 in I = 2.43e-7;
  species $mlcp2 in I = 2.43e-7;
  species $pgi in I = 2.43e-7;
  species mRNA_pgi in I = 0.0001;
  species Pgi in I = 0.01;
  species $pgm in I = 2.43e-7;
  species mRNA_pgm in I = 0.0001;
  species Pgm in I = 0.01;
  species $zwf in I = 2.43e-7;
  species mRNA_zwf in I = 0.0001;
  species Zwf in I = 0.01;
  species $pfk in I = 2.43e-7;
  species mRNA_pfk in I = 0.0001;
  species Pfk in I = 0.01;
  species $tal in I = 2.43e-7;
  species mRNA_tal in I = 0.0001;
  species Tal in I = 0.01;
  species $tkt in I = 2.43e-7;
  species mRNA_tkt in I = 0.0001;
  species Tkt in I = 0.01;
  species $fba in I = 2.43e-7;
  species mRNA_fba in I = 0.0001;
  species Fba in I = 0.01;
  species $gap in I = 2.43e-7;
  species mRNA_gap in I = 0.0001;
  species Gap in I = 0.01;
  species $tpi in I = 2.43e-7;
  species mRNA_tpi in I = 0.0001;
  species Tpi in I = 0.01;
  species $pgk in I = 2.43e-7;
  species mRNA_pgk in I = 0.0001;
  species Pgk in I = 0.01;
  species $gpm in I = 2.43e-7;
  species mRNA_gpm in I = 0.0001;
  species Gpm in I = 0.01;
  species $eno in I = 2.43e-7;
  species mRNA_eno in I = 0.0001;
  species Eno in I = 0.01;
  species $pyk in I = 2.43e-7;
  species mRNA_pyk in I = 0.0001;
  species Pyk in I = 0.01;
  species $ppc in I = 2.43e-7;
  species mRNA_ppc in I = 0.0001;
  species Ppc in I = 0.01;
  species $pdh in I = 2.43e-7;
  species mRNA_pdh in I = 0.0001;
  species Pdh in I = 0.01;
  species $gnd in I = 2.43e-7;
  species mRNA_gnd in I = 0.0001;
  species Gnd in I = 0.01;
  species $rpi in I = 2.43e-7;
  species mRNA_rpi in I = 0.0001;
  species Rpi in I = 0.01;
  species $rpe in I = 2.43e-7;
  species mRNA_rpe in I = 0.0001;
  species Rpe in I = 0.01;
  species $glg in I = 2.43e-7;
  species mRNA_glg in I = 0.0001;
  species Glg in I = 0.01;
  species $adk in I = 2.43e-7;
  species mRNA_adk in I = 0.0001;
  species Adk in I = 0.01;
  species $cra in I = 2.43e-7;
  species mRNA_cra in I = 0.0001;
  species Cra in I = 0.009898557;
  species $pdhR in I = 2.43e-7;
  species mRNA_pdhR in I = 0.0001;
  species PdhR in I = 0.00989975943;
  species Cra_FDP in I = 0.0001;
  species PdhR_PYR in I = 0.0001;
  species CrpSite_pdh in I = 8.340802e-9;
  species Crp_cAMP_CrpSite_pdh in I = 2.346592e-7;
  species CraSite_zwf in I = 2.43e-9;
  species Cra_CraSite_zwf in I = 2.4057e-7;
  species CraSite_ptsHp1 in I = 2.430058e-9;
  species Cra_CraSite_ptsHp1 in I = 2.405699e-7;
  species CraSite_tpi in I = 2.430117e-9;
  species Cra_CraSite_tpi in I = 2.405699e-7;
  species CraSite_pfk in I = 2.430175e-9;
  species Cra_CraSite_pfk in I = 2.405698e-7;
  species CraSite_ppc in I = 2.430234e-9;
  species Cra_CraSite_ppc in I = 2.405698e-7;
  species CraSite_pyk in I = 2.430292e-9;
  species Cra_CraSite_pyk in I = 2.405697e-7;
  species PdhRSite_pdh in I = 2.43e-9;
  species PdhR_PdhRSite_pdh in I = 2.4057e-7;

  // Parameters:
  fast = 1000000 per_sec;
  total_Cra has mM;
  total_Crp has mM;
  total_Mlc has mM;
  regulation = 1 dimensionless;

  // Assignment rules:
  total_Cra := Cra + Cra_FDP + Cra_CraSite_zwf + Cra_CraSite_ptsHp1 + Cra_CraSite_tpi + Cra_CraSite_pfk + Cra_CraSite_ppc + Cra_CraSite_pyk;
  total_Crp := Crp + Crp_cAMP + Crp_cAMP_CrpSiteI_crp + Crp_cAMP_CrpSiteII_crp + Crp_cAMP_CrpSite_cyaA + Crp_cAMP_CrpSite_genome + Crp_cAMP_CrpSite_ptsGp1 + Crp_cAMP_CrpSite_ptsGp2 + Crp_cAMP_CrpSite_ptsHp0 + Crp_cAMP_CrpSite_ptsHp1 + Crp_cAMP_CrpSite_ptsIp0 + Crp_cAMP_CrpSite_ptsIp1 + Crp_cAMP_CrpSite_mlcp1 + Crp_cAMP_CrpSite_mlcp2 + Crp_cAMP_CrpSite_pdh;
  total_Mlc := Mlc + Mlc_MlcSite_ptsGp1 + Mlc_MlcSite_ptsGp2 + Mlc_MlcSite_ptsIp0 + Mlc_MlcSite_ptsHp0 + Mlc_MlcSite_mlcp1 + Mlc_MlcSite_mlcp2 + IICB_Mlc;

  // Reactions:
  PGI: G6P -> F6P; I*Pgi*PGI_kcat*(G6P - F6P/PGI_Keq)/PGI_Kg6p/(1 + G6P/PGI_Kg6p + F6P/PGI_Kf6p + PG/PGI_Kpg + PEP/PGI_Kpep);  // modifiers: PG, PEP, Pgi; isHomologTo reactome:REACT_1255; kegg.reaction:R00771; isVersionOf ec-code:5.3.1.9 GO:0004347
    PGI_kcat = 1572127 per_sec; PGI_Keq = 0.1725 dimensionless; PGI_Kg6p = 2.9 mM; PGI_Kf6p = 0.266 mM; PGI_Kpg = 0.2 mM; PGI_Kpep = 2 mM;
  PGM: G6P -> G1P; I*Pgm*PGM_kcat*(G6P - G1P/PGM_Keq)/(PGM_Kg6p*(1 + G1P/PGM_Kg1p) + G6P);  // modifiers: Pgm; isHomologTo reactome:REACT_605; kegg.reaction:R00959; isVersionOf ec-code:5.4.2.2
    PGM_kcat = 16.55878 per_sec; PGM_Keq = 0.196 dimensionless; PGM_Kg6p = 1.038 mM; PGM_Kg1p = 0.0136 mM;
  ZWF_PGL: G6P + NADP => PG + NADPH; I*Zwf*ZWF_PGL_kcat*G6P*NADP/((G6P + ZWF_PGL_Kg6p)*(1 + NADPH/Knadphg6pinh)*(ZWF_PGL_Knadp*(1 + NADPH/Knadphnadpinh) + NADP));  // modifiers: Zwf; hasPart kegg.reaction:R00835 kegg.reaction:R02035; hasPart ec-code:1.1.1.49 ec-code:3.1.1.31
    ZWF_PGL_kcat = 267.7765 per_sec; ZWF_PGL_Kg6p = 14.4 mM; Knadphg6pinh = 6.43 mM; ZWF_PGL_Knadp = 0.0246 mM; Knadphnadpinh = 0.01 mM;
  PFK: F6P + ATP => FDP + ADP; I*Pfk*PFK_kcat*ATP*F6P/((ATP + Katps*(1 + ADP/Kadpc))*(F6P + Kf6ps*(1 + PEP/PFK_Kpep + ADP/Kadpb + AMP/Kampb)/(1 + ADP/Kadpa + AMP/Kampa))*(1 + PFK_L/(1 + F6P*(1 + ADP/Kadpa + AMP/Kampa)/(Kf6ps*(1 + PEP/PFK_Kpep + ADP/Kadpb + AMP/Kampb)))^PFK_n));  // modifiers: PEP, AMP, Pfk; isHomologTo reactome:REACT_736; kegg.reaction:R00756; isVersionOf ec-code:2.7.1.11
    PFK_kcat = 1452581 per_sec; Katps = 0.123 mM; Kadpc = 4.14 mM; Kf6ps = 0.325 mM; PFK_Kpep = 3.26 mM; Kadpb = 3.89 mM; Kampb = 3.2 mM; Kadpa = 128 mM; Kampa = 19.1 mM; PFK_L = 5629067 dimensionless; PFK_n = 11.1 dimensionless;
  TAL: G3P + SED7P -> F6P + E4P; I*Tal*TAL_k*(G3P*SED7P - E4P*F6P/TAL_Keq);  // modifiers: Tal; isHomologTo reactome:REACT_1272; kegg.reaction:R01827; isVersionOf ec-code:2.2.1.2
    TAL_k = 2109.176 per_mM_squared_per_sec; TAL_Keq = 1.05 dimensionless;
  TKT1: RIB5P + XYL5P -> G3P + SED7P; I*Tkt*TKT1_k*(RIB5P*XYL5P - SED7P*G3P/TKT1_Keq);  // modifiers: Tkt; isHomologTo reactome:REACT_162; kegg.reaction:R01641; isVersionOf ec-code:2.2.1.1
    TKT1_k = 1837.593 per_mM_squared_per_sec; TKT1_Keq = 1.2 dimensionless;
  TKT2: E4P + XYL5P -> G3P + F6P; I*Tkt*TKT2_k*(XYL5P*E4P - F6P*G3P/TKT2_Keq);  // modifiers: Tkt; isHomologTo reactome:REACT_1811; kegg.reaction:R01067; isVersionOf ec-code:2.2.1.1
    TKT2_k = 16821.13 per_mM_squared_per_sec; TKT2_Keq = 10 dimensionless;
  FBA: FDP -> DHAP + G3P; I*Fba*FBA_kcat*(FDP - G3P*DHAP/FBA_keq)/(kfdp + FDP + FBA_kgap*DHAP/(FBA_keq*Vblf) + FBA_kdhap*G3P/(FBA_keq*Vblf) + FDP*G3P/kgapinh + G3P*DHAP/(Vblf*FBA_keq));  // modifiers: Fba; isHomologTo reactome:REACT_1602; kegg.reaction:R01070; isVersionOf ec-code:4.1.2.13
    FBA_kcat = 13744.29 per_sec; FBA_keq = 0.144 mM; kfdp = 1.75 mM; FBA_kgap = 0.088 mM; Vblf = 2 dimensionless; FBA_kdhap = 0.088 mM; kgapinh = 0.6 mM;
  GAP: G3P + NAD -> PGP + NADH; I*Gap*GAP_kcat*(G3P*NAD - PGP*NADH/GAP_Keq)/((Kgap*(1 + PGP/GAP_Kpgp) + G3P)*(GAP_Knad*(1 + NADH/GAP_Knadh) + NAD));  // modifiers: Gap; isHomologTo reactome:REACT_1847; kegg.reaction:R01061; isVersionOf ec-code:1.2.1.12
    GAP_kcat = 659222 per_sec; GAP_Keq = 0.63 dimensionless; Kgap = 0.683 mM; GAP_Kpgp = 1.04e-5 mM; GAP_Knad = 0.252 mM; GAP_Knadh = 1.09 mM;
  TPI: DHAP -> G3P; I*Tpi*TPI_kcat*(DHAP - G3P/TPI_keq)/(TPI_kdhap*(1 + G3P/TPI_kgap) + DHAP);  // modifiers: Tpi; isHomologTo reactome:REACT_469; kegg.reaction:R01015; isVersionOf ec-code:5.3.1.1
    TPI_kcat = 54202.48 per_sec; TPI_keq = 1.39 dimensionless; TPI_kdhap = 2.8 mM; TPI_kgap = 0.3 mM;
  PGK: PGP + ADP -> PG3 + ATP; I*Pgk*PGK_kcat*(ADP*PGP - ATP*PG3/PGK_Keq)/((PGK_Kadp*(1 + ATP/PGK_Katp) + ADP)*(PGK_Kpgp*(1 + PG3/PGK_Kpg3) + PGP));  // modifiers: Pgk; isHomologTo reactome:REACT_1186; kegg.reaction:R01512; isVersionOf ec-code:2.7.2.3
    PGK_kcat = 2078784 per_sec; PGK_Keq = 1934.4 dimensionless; PGK_Kadp = 0.185 mM; PGK_Katp = 0.653 mM; PGK_Kpgp = 0.0468 mM; PGK_Kpg3 = 0.473 mM;
  GPM: PG3 -> PG2; I*Gpm*GPM_kcat*(PG3 - PG2/GPM_Keq)/(GPM_Kpg3*(1 + PG2/GPM_Kpg2) + PG3);  // modifiers: Gpm; isHomologTo reactome:REACT_576; kegg.reaction:R01518; isVersionOf ec-code:5.4.2.1
    GPM_kcat = 72159.55 per_sec; GPM_Keq = 0.188 dimensionless; GPM_Kpg3 = 0.2 mM; GPM_Kpg2 = 0.369 mM;
  ENO: PG2 -> PEP; I*Eno*ENO_kcat*(PG2 - PEP/ENO_Keq)/(ENO_Kpg2*(1 + PEP/ENO_Kpep) + PG2);  // modifiers: Eno; isHomologTo reactome:REACT_1400; kegg.reaction:R00658; isVersionOf ec-code:4.2.1.11
    ENO_kcat = 236951.1 per_sec; ENO_Keq = 6.73 dimensionless; ENO_Kpg2 = 0.1 mM; ENO_Kpep = 0.135 mM;
  PYK: PEP + ADP => PYR + ATP; I*Pyk*PYK_kcat*PEP*(PEP/PYK_Kpep + 1)^(PYK_n - 1)*ADP/(PYK_Kpep*(PYK_L*((1 + ATP/PYK_Katp)/(FDP/PYK_Kfdp + AMP/Kamp + 1))^PYK_n + (PEP/PYK_Kpep + 1)^PYK_n)*(ADP + PYK_Kadp));  // modifiers: FDP, AMP, Pyk; isHomologTo reactome:REACT_1524; kegg.reaction:R00200; isVersionOf ec-code:2.7.1.40
    PYK_kcat = 82.73855 per_sec; PYK_Kpep = 0.31 mM; PYK_n = 4 dimensionless; PYK_L = 1000 dimensionless; PYK_Katp = 22.5 mM; PYK_Kfdp = 0.19 mM; Kamp = 0.2 mM; PYK_Kadp = 0.26 mM;
  PPC: PEP => ; I*Ppc*PPC_kcat*PEP*(1 + (FDP/PPC_Kfdp)^PPC_nfdp)/(PPC_Kpep + PEP);  // modifiers: FDP, Ppc; kegg.reaction:R00345; isVersionOf ec-code:4.1.1.31
    PPC_kcat = 76.7403 per_sec; PPC_Kfdp = 0.7 mM; PPC_nfdp = 4.21 dimensionless; PPC_Kpep = 4.07 mM;
  PDH: PYR + NAD => NADH; I*Pdh*PDH_kcat*PYR*NAD/(PDH_Kpyr*PDH_Knad)/(1 + PYR/PDH_Kpyr + NAD/PDH_Knad);  // modifiers: Pdh; isVersionOf ec-code:1.2.1.51; kegg.reaction:R00209; isPartOf kegg.pathway:rn00620
    PDH_kcat = 858.6943 per_sec; PDH_Kpyr = 6.801918 mM; PDH_Knad = 1 mM;
  GND: PG + NADP => RIBU5P + NADPH; I*Gnd*GND_kcat*PG*NADP/(GND_Kpg*GND_Knadp)/((1 + PG/GND_Kpg)*(1 + NADP/GND_Knadp + NADPH/GND_Knadph)*(1 + ATP/GND_Katp)*(1 + FDP/GND_Kfdp));  // modifiers: ATP, FDP, Gnd; isVersionOf ec-code:1.1.1.44; kegg.reaction:R01528; isHomologTo reactome:REACT_611
    GND_kcat = 37709.72 per_sec; GND_Kpg = 37.5 mM; GND_Knadp = 0.0506 mM; GND_Knadph = 0.0138 mM; GND_Katp = 208 mM; GND_Kfdp = 0.025 mM;
  RPI: RIBU5P -> RIB5P; I*Rpi*RPI_kcat*(RIBU5P - RIB5P/RPI_Keq)/Kribu5p/(1 + RIBU5P/Kribu5p + RIB5P/RPI_Krib5p + E4P/RPI_Ke4p);  // modifiers: E4P, Rpi; isVersionOf ec-code:5.3.1.6; kegg.reaction:R01056; isHomologTo reactome:REACT_6907
    RPI_kcat = 5366.583 per_sec; RPI_Keq = 4 dimensionless; Kribu5p = 4.4 mM; RPI_Krib5p = 3.1 mM; RPI_Ke4p = 0.67 mM;
  RPE: RIBU5P -> XYL5P; I*Rpe*RPE_k*(RIBU5P - XYL5P/RPE_Keq);  // modifiers: Rpe; kegg.reaction:R01529; isVersionOf ec-code:5.1.3.1; isHomologTo reactome:REACT_1522
    RPE_k = 1308.246 per_mM_per_sec; RPE_Keq = 1.4 dimensionless;
  GLG: G1P + ATP => ADP; I*Glg*GLG_kcat*G1P*ATP*(1 + (FDP/GLG_Kfdp)^GLG_nfdp)/((GLG_Katp + ATP)*(GLG_Kg1p + G1P));  // modifiers: FDP, Glg; kegg.reaction:R00948; isVersionOf ec-code:2.7.7.27
    GLG_kcat = 0.1468173 per_sec; GLG_Kfdp = 0.119 mM; GLG_nfdp = 1.2 mM; GLG_Katp = 4.42 mM; GLG_Kg1p = 3.2 mM;
  ATP_sink: ATP => ADP; I*ATP_sink_k*ATP;
    ATP_sink_k = 0.295082 per_sec;
  ADK: AMP + ATP -> 2 ADP; I*Adk*ADK_k*(AMP*ATP - ADP^2/ADK_Keq);  // modifiers: Adk
    ADK_k = 0.8334492 per_mM_per_sec; ADK_Keq = 2 dimensionless;
  cAMP_to_AMP: cAMP => AMP; I*cAMP_to_AMP_k*cAMP;
    cAMP_to_AMP_k = 6.667632 per_sec;
  CYA: ATP -> cAMP; I*(CYA_Q*Cya*ATP/(CYA_Kmich + ATP));  // modifiers: Cya
    CYA_Kmich = 1 mM; CYA_Q = 1.799677 per_sec;
  IIA_P_CYA: ATP -> cAMP; I*(IIA_P_CYA_Q*IIA_P_Cya*ATP/(IIA_P_CYA_Kmich + ATP));  // modifiers: IIA_P_Cya
    IIA_P_CYA_Kmich = 1 mM; IIA_P_CYA_Q = 161.9709 per_sec;
  PTS_0: EI + PEP -> EI_P + PYR; I*(2*PTS_0_Qf*EI*PEP^2/(PTS_0_Kmichf^2 + PEP^2) - 2*PTS_0_Qr*EI_P*PYR^2/(PTS_0_Kmichr^2 + PYR^2));
    PTS_0_Kmichf = 0.3 mM; PTS_0_Qf = 1184.564 per_sec; PTS_0_Kmichr = 2 mM; PTS_0_Qr = 5264.73 per_sec;
  PTS_1: HPr + EI_P -> HPr_P + EI; I*(PTS_1_kxf*HPr*EI_P - PTS_1_kxr*EI*HPr_P);
    PTS_1_kxf = 131618.4 per_mM_per_sec; PTS_1_kxr = 5264.735 per_mM_per_sec;
  PTS_2: IIA + HPr_P -> IIA_P + HPr; I*(PTS_2_kxf*IIA*HPr_P - PTS_2_kxr*HPr*IIA_P);
    PTS_2_kxf = 40143.74 per_mM_per_sec; PTS_2_kxr = 30930.42 per_mM_per_sec;
  PTS_3: IICB + IIA_P -> IICB_P + IIA; I*(PTS_3_kxf*IICB*IIA_P - PTS_3_kxr*IIA*IICB_P);
    PTS_3_kxf = 7239.22 per_mM_per_sec; PTS_3_kxr = 2632.444 per_mM_per_sec;
  PTS_4: IICB_P + $GLCe -> IICB + G6P; I*(PTS_4_Qf*IICB_P*GLCe/(PTS_4_Kmichf + GLCe) - PTS_4_Qr*IICB*G6P/(PTS_4_Kmichr + G6P));
    PTS_4_Kmichf = 0.02 mM; PTS_4_Qf = 53.17715 per_sec; PTS_4_Kmichr = 9610 mM; PTS_4_Qr = 4.309565 per_sec;
  binding_Crp_cAMP: Crp + cAMP -> Crp_cAMP; regulation*I*fast*one_per_mM*(binding_Crp_cAMP_Kb^2*(Crp*cAMP)^2 - Crp_cAMP^2);
    binding_Crp_cAMP_Kb = 40 per_mM; one_per_mM = 1 per_mM;
  binding_Crp_cAMP_CrpSite_cyaA: Crp_cAMP + CrpSite_cyaA -> Crp_cAMP_CrpSite_cyaA; regulation*I*fast*(binding_Crp_cAMP_CrpSite_cyaA_Kb*Crp_cAMP*CrpSite_cyaA - Crp_cAMP_CrpSite_cyaA);
    binding_Crp_cAMP_CrpSite_cyaA_Kb = 66700 per_mM;
  binding_Crp_cAMP_CrpSiteI_crp: Crp_cAMP + CrpSiteI_crp -> Crp_cAMP_CrpSiteI_crp; regulation*I*fast*(binding_Crp_cAMP_CrpSiteI_crp_Kb*Crp_cAMP*CrpSiteI_crp - Crp_cAMP_CrpSiteI_crp);
    binding_Crp_cAMP_CrpSiteI_crp_Kb = 22200 per_mM;
  binding_Crp_cAMP_CrpSiteII_crp: Crp_cAMP + CrpSiteII_crp -> Crp_cAMP_CrpSiteII_crp; regulation*I*fast*(binding_Crp_cAMP_CrpSiteII_crp_Kb*Crp_cAMP*CrpSiteII_crp - Crp_cAMP_CrpSiteII_crp);
    binding_Crp_cAMP_CrpSiteII_crp_Kb = 2700 per_mM;
  binding_Crp_cAMP_CrpSite_ptsGp1: Crp_cAMP + CrpSite_ptsGp1 -> Crp_cAMP_CrpSite_ptsGp1; regulation*I*fast*(binding_Crp_cAMP_CrpSite_ptsGp1_Kb*Crp_cAMP*CrpSite_ptsGp1 - Crp_cAMP_CrpSite_ptsGp1);
    binding_Crp_cAMP_CrpSite_ptsGp1_Kb = 10000 per_mM;
  binding_Crp_cAMP_CrpSite_ptsGp2: Crp_cAMP + CrpSite_ptsGp2 -> Crp_cAMP_CrpSite_ptsGp2; regulation*I*fast*(binding_Crp_cAMP_CrpSite_ptsGp2_Kb*Crp_cAMP*CrpSite_ptsGp2 - Crp_cAMP_CrpSite_ptsGp2);
    binding_Crp_cAMP_CrpSite_ptsGp2_Kb = 10000 per_mM;
  binding_Crp_cAMP_CrpSite_ptsHp0: Crp_cAMP + CrpSite_ptsHp0 -> Crp_cAMP_CrpSite_ptsHp0; regulation*I*fast*(binding_Crp_cAMP_CrpSite_ptsHp0_Kb*Crp_cAMP*CrpSite_ptsHp0 - Crp_cAMP_CrpSite_ptsHp0);
    binding_Crp_cAMP_CrpSite_ptsHp0_Kb = 10000 per_mM;
  binding_Crp_cAMP_CrpSite_ptsHp1: Crp_cAMP + CrpSite_ptsHp1 -> Crp_cAMP_CrpSite_ptsHp1; regulation*I*fast*(binding_Crp_cAMP_CrpSite_ptsHp1_Kb*Crp_cAMP*CrpSite_ptsHp1 - Crp_cAMP_CrpSite_ptsHp1);
    binding_Crp_cAMP_CrpSite_ptsHp1_Kb = 10000 per_mM;
  binding_Crp_cAMP_CrpSite_ptsIp0: Crp_cAMP + CrpSite_ptsIp0 -> Crp_cAMP_CrpSite_ptsIp0; regulation*I*fast*(binding_Crp_cAMP_CrpSite_ptsIp0_Kb*Crp_cAMP*CrpSite_ptsIp0 - Crp_cAMP_CrpSite_ptsIp0);
    binding_Crp_cAMP_CrpSite_ptsIp0_Kb = 10000 per_mM;
  binding_Crp_cAMP_CrpSite_ptsIp1: Crp_cAMP + CrpSite_ptsIp1 -> Crp_cAMP_CrpSite_ptsIp1; regulation*I*fast*(binding_Crp_cAMP_CrpSite_ptsIp1_Kb*Crp_cAMP*CrpSite_ptsIp1 - Crp_cAMP_CrpSite_ptsIp1);
    binding_Crp_cAMP_CrpSite_ptsIp1_Kb = 10000 per_mM;
  binding_Crp_cAMP_CrpSite_mlcp1: Crp_cAMP + CrpSite_mlcp1 -> Crp_cAMP_CrpSite_mlcp1; regulation*I*fast*(binding_Crp_cAMP_CrpSite_mlcp1_Kb*Crp_cAMP*CrpSite_mlcp1 - Crp_cAMP_CrpSite_mlcp1);
    binding_Crp_cAMP_CrpSite_mlcp1_Kb = 10000 per_mM;
  binding_Crp_cAMP_CrpSite_mlcp2: Crp_cAMP + CrpSite_mlcp2 -> Crp_cAMP_CrpSite_mlcp2; regulation*I*fast*(binding_Crp_cAMP_CrpSite_mlcp2_Kb*Crp_cAMP*CrpSite_mlcp2 - Crp_cAMP_CrpSite_mlcp2);
    binding_Crp_cAMP_CrpSite_mlcp2_Kb = 10000 per_mM;
  binding_Crp_cAMP_CrpSite_genome: Crp_cAMP + CrpSite_genome -> Crp_cAMP_CrpSite_genome; regulation*I*fast*(binding_Crp_cAMP_CrpSite_genome_Kb*Crp_cAMP*CrpSite_genome - Crp_cAMP_CrpSite_genome);
    binding_Crp_cAMP_CrpSite_genome_Kb = 10000 per_mM;
  binding_Mlc_MlcSite_ptsGp1: Mlc + MlcSite_ptsGp1 -> Mlc_MlcSite_ptsGp1; regulation*I*fast*(binding_Mlc_MlcSite_ptsGp1_Kb*Mlc*MlcSite_ptsGp1 - Mlc_MlcSite_ptsGp1);
    binding_Mlc_MlcSite_ptsGp1_Kb = 200000 per_mM;
  binding_Mlc_MlcSite_ptsGp2: Mlc + MlcSite_ptsGp2 -> Mlc_MlcSite_ptsGp2; regulation*I*fast*(binding_Mlc_MlcSite_ptsGp2_Kb*Mlc*MlcSite_ptsGp2 - Mlc_MlcSite_ptsGp2);
    binding_Mlc_MlcSite_ptsGp2_Kb = 200000 per_mM;
  binding_Mlc_MlcSite_ptsHp0: Mlc + MlcSite_ptsHp0 -> Mlc_MlcSite_ptsHp0; regulation*I*fast*(binding_Mlc_MlcSite_ptsHp0_Kb*Mlc*MlcSite_ptsHp0 - Mlc_MlcSite_ptsHp0);
    binding_Mlc_MlcSite_ptsHp0_Kb = 200000 per_mM;
  binding_Mlc_MlcSite_ptsIp0: Mlc + MlcSite_ptsIp0 -> Mlc_MlcSite_ptsIp0; regulation*I*fast*(binding_Mlc_MlcSite_ptsIp0_Kb*Mlc*MlcSite_ptsIp0 - Mlc_MlcSite_ptsIp0);
    binding_Mlc_MlcSite_ptsIp0_Kb = 200000 per_mM;
  binding_Mlc_MlcSite_mlcp1: Mlc + MlcSite_mlcp1 -> Mlc_MlcSite_mlcp1; regulation*I*fast*(binding_Mlc_MlcSite_mlcp1_Kb*Mlc*MlcSite_mlcp1 - Mlc_MlcSite_mlcp1);
    binding_Mlc_MlcSite_mlcp1_Kb = 2430 per_mM;
  binding_Mlc_MlcSite_mlcp2: Mlc + MlcSite_mlcp2 -> Mlc_MlcSite_mlcp2; regulation*I*fast*(binding_Mlc_MlcSite_mlcp2_Kb*Mlc*MlcSite_mlcp2 - Mlc_MlcSite_mlcp2);
    binding_Mlc_MlcSite_mlcp2_Kb = 1350 per_mM;
  binding_IICB_Mlc: IICB + Mlc -> IICB_Mlc; regulation*I*fast*(binding_IICB_Mlc_Kb*IICB*Mlc - IICB_Mlc);
    binding_IICB_Mlc_Kb = 7000 per_mM;
  binding_IIA_P_Cya: Cya + IIA_P -> IIA_P_Cya; regulation*I*fast*(binding_IIA_P_Cya_Kb*Cya*IIA_P^2 - IIA_P_Cya);
    binding_IIA_P_Cya_Kb = 5000 per_mM_squared;
  transcription_cyaA: -> mRNA_cyaA; regulation*I*transcription_cyaA_km*(1 - Crp_cAMP_CrpSite_cyaA/cyaA)*cyaA;  // modifiers: Crp_cAMP_CrpSite_cyaA, cyaA
    transcription_cyaA_km = 0.7543333 per_sec;
  transcription_cyaA_basal: -> mRNA_cyaA; regulation*I*transcription_cyaA_basal_km*cyaA;  // modifiers: cyaA
    transcription_cyaA_basal_km = 0.02135 per_sec;
  transcription_crp: -> mRNA_crp; regulation*I*transcription_crp_km*(1 + RelativeactivityatTCRPsiteII_crp*Crp_cAMP_CrpSiteII_crp/crp - Crp_cAMP_CrpSiteI_crp/crp)*crp;  // modifiers: Crp_cAMP_CrpSiteI_crp, Crp_cAMP_CrpSiteII_crp, crp
    transcription_crp_km = 0.3333333 per_sec; RelativeactivityatTCRPsiteII_crp = 5 dimensionless;
  transcription_crp_basal: -> mRNA_crp; regulation*I*transcription_crp_basal_km*crp;  // modifiers: crp
    transcription_crp_basal_km = 0.01681433 per_sec;
  transcription_ptsGp1: -> mRNA_ptsG; regulation*I*transcription_ptsGp1_km*(Crp_cAMP_CrpSite_ptsGp1/ptsGp1)*(1 - Mlc_MlcSite_ptsGp1/ptsGp1)*ptsGp1;  // modifiers: Crp_cAMP_CrpSite_ptsGp1, Mlc_MlcSite_ptsGp1, ptsGp1
    transcription_ptsGp1_km = 14.86667 per_sec;
  transcription_ptsGp2: -> mRNA_ptsG; regulation*I*transcription_ptsGp2_km*(Crp_cAMP_CrpSite_ptsGp2/ptsGp2)*(1 - Mlc_MlcSite_ptsGp2/ptsGp2)*ptsGp2;  // modifiers: Crp_cAMP_CrpSite_ptsGp2, Mlc_MlcSite_ptsGp2, ptsGp2
    transcription_ptsGp2_km = 0.03333333 per_sec;
  transcription_ptsHp0: -> mRNA_ptsH; regulation*I*transcription_ptsHp0_km*(Crp_cAMP_CrpSite_ptsHp0/ptsHp0)*(1 - Mlc_MlcSite_ptsHp0/ptsHp0)*ptsHp0;  // modifiers: Crp_cAMP_CrpSite_ptsHp0, Mlc_MlcSite_ptsHp0, ptsHp0
    transcription_ptsHp0_km = 1.196667 per_sec;
  transcription_ptsHp1: -> mRNA_ptsH; regulation*I*transcription_ptsHp1_km*(Crp_cAMP_CrpSite_ptsHp1/ptsHp1)*(1 - Cra_CraSite_ptsHp1/ptsHp1)*ptsHp1;  // modifiers: Crp_cAMP_CrpSite_ptsHp1, ptsHp1, Cra_CraSite_ptsHp1
    transcription_ptsHp1_km = 29.91595 per_sec;
  transcription_ptsIp0: -> mRNA_ptsI; regulation*I*transcription_ptsIp0_km*(Crp_cAMP_CrpSite_ptsIp0/ptsIp0)*(1 - Mlc_MlcSite_ptsIp0/ptsIp0)*ptsIp0;  // modifiers: Crp_cAMP_CrpSite_ptsIp0, Mlc_MlcSite_ptsIp0, ptsIp0
    transcription_ptsIp0_km = 0.1040667 per_sec;
  transcription_ptsIp1: -> mRNA_ptsI; regulation*I*transcription_ptsIp1_km*(Crp_cAMP_CrpSite_ptsIp1/ptsIp1)*ptsIp1;  // modifiers: Crp_cAMP_CrpSite_ptsIp1, ptsIp1
    transcription_ptsIp1_km = 0.01486667 per_sec;
  transcription_crr: -> mRNA_crr; regulation*I*transcription_crr_km*crr;  // modifiers: crr
    transcription_crr_km = 5.575 per_sec;
  transcription_mlcp1: -> mRNA_mlc; regulation*I*transcription_mlcp1_km*(1 - Crp_cAMP_CrpSite_mlcp1/mlcp1)*(1 - Mlc_MlcSite_mlcp1/mlcp1)*mlcp1;  // modifiers: Crp_cAMP_CrpSite_mlcp1, Mlc_MlcSite_mlcp1, mlcp1
    transcription_mlcp1_km = 0.03125 per_sec;
  transcription_mlcp2: -> mRNA_mlc; regulation*I*transcription_mlcp2_km*(Crp_cAMP_CrpSite_mlcp2/mlcp2)*(1 - Mlc_MlcSite_mlcp2/mlcp2)*mlcp2;  // modifiers: Crp_cAMP_CrpSite_mlcp2, Mlc_MlcSite_mlcp2, mlcp2
    transcription_mlcp2_km = 0.03125 per_sec;
  decomposition_mRNA_cyaA: mRNA_cyaA => ; regulation*I*decomposition_mRNA_cyaA_kmd*mRNA_cyaA;
    decomposition_mRNA_cyaA_kmd = 0.0021 per_sec;
  decomposition_mRNA_crp: mRNA_crp => ; regulation*I*decomposition_mRNA_crp_kmd*mRNA_crp;
    decomposition_mRNA_crp_kmd = 0.002316667 per_sec;
  decomposition_mRNA_ptsG: mRNA_ptsG => ; regulation*I*decomposition_mRNA_ptsG_kmd*mRNA_ptsG;
    decomposition_mRNA_ptsG_kmd = 0.003616667 per_sec;
  decomposition_mRNA_ptsH: mRNA_ptsH => ; regulation*I*decomposition_mRNA_ptsH_kmd*mRNA_ptsH;
    decomposition_mRNA_ptsH_kmd = 0.001481667 per_sec;
  decomposition_mRNA_ptsI: mRNA_ptsI => ; regulation*I*decomposition_mRNA_ptsI_kmd*mRNA_ptsI;
    decomposition_mRNA_ptsI_kmd = 0.001328333 per_sec;
  decomposition_mRNA_crr: mRNA_crr => ; regulation*I*decomposition_mRNA_crr_kmd*mRNA_crr;
    decomposition_mRNA_crr_kmd = 0.001443333 per_sec;
  decomposition_mRNA_mlc: mRNA_mlc => ; regulation*I*decomposition_mRNA_mlc_kmd*mRNA_mlc;
    decomposition_mRNA_mlc_kmd = 0.005023333 per_sec;
  translation_mRNA_cyaA: -> Cya; regulation*I*translation_mRNA_cyaA_kp*mRNA_cyaA;  // modifiers: mRNA_cyaA
    translation_mRNA_cyaA_kp = 0.1833333 per_sec;
  translation_mRNA_crp: -> Crp; regulation*I*translation_mRNA_crp_kp*mRNA_crp;  // modifiers: mRNA_crp
    translation_mRNA_crp_kp = 0.1833333 per_sec;
  translation_mRNA_ptsG: -> IICB; regulation*I*translation_mRNA_ptsG_kp*mRNA_ptsG;  // modifiers: mRNA_ptsG
    translation_mRNA_ptsG_kp = 0.1833333 per_sec;
  translation_mRNA_ptsH: -> HPr; regulation*I*translation_mRNA_ptsH_kp*mRNA_ptsH;  // modifiers: mRNA_ptsH
    translation_mRNA_ptsH_kp = 0.1833333 per_sec;
  translation_mRNA_ptsI: -> EI; regulation*I*translation_mRNA_ptsI_kp*mRNA_ptsI;  // modifiers: mRNA_ptsI
    translation_mRNA_ptsI_kp = 0.1833333 per_sec;
  translation_mRNA_crr: -> IIA; regulation*I*translation_mRNA_crr_kp*mRNA_crr;  // modifiers: mRNA_crr
    translation_mRNA_crr_kp = 0.1833333 per_sec;
  translation_mlc: -> Mlc; regulation*I*translation_mlc_kp*mRNA_mlc;  // modifiers: mRNA_mlc
    translation_mlc_kp = 0.1833333 per_sec;
  decomposition_Cya: Cya => ; regulation*I*decomposition_Cya_kpd*Cya;
    decomposition_Cya_kpd = 0.001666667 per_sec;
  decomposition_Crp: Crp => ; regulation*I*decomposition_Crp_kpd*Crp;
    decomposition_Crp_kpd = 0.001666667 per_sec;
  decomposition_Mlc: Mlc => ; regulation*I*decomposition_Mlc_kpd*Mlc;
    decomposition_Mlc_kpd = 0.001666667 per_sec;
  decomposition_Crp_cAMP: Crp_cAMP => cAMP; regulation*I*decomposition_Crp_cAMP_kpd*Crp_cAMP;
    decomposition_Crp_cAMP_kpd = 0.001666667 per_sec;
  decomposition_Crp_cAMP_CrpSite_cyaA: Crp_cAMP_CrpSite_cyaA => CrpSite_cyaA + cAMP; regulation*I*decomposition_Crp_cAMP_CrpSite_cyaA_kpd*Crp_cAMP_CrpSite_cyaA;
    decomposition_Crp_cAMP_CrpSite_cyaA_kpd = 0.001666667 per_sec;
  decomposition_Crp_cAMP_CrpSiteI_crp: Crp_cAMP_CrpSiteI_crp => CrpSiteI_crp + cAMP; regulation*I*decomposition_Crp_cAMP_CrpSiteI_crp_kpd*Crp_cAMP_CrpSiteI_crp;
    decomposition_Crp_cAMP_CrpSiteI_crp_kpd = 0.001666667 per_sec;
  decomposition_Crp_cAMP_CrpSiteII_crp: Crp_cAMP_CrpSiteII_crp => CrpSiteII_crp + cAMP; regulation*I*decomposition_Crp_cAMP_CrpSiteII_crp_kpd*Crp_cAMP_CrpSiteII_crp;
    decomposition_Crp_cAMP_CrpSiteII_crp_kpd = 0.001666667 per_sec;
  decomposition_Crp_cAMP_CrpSite_ptsGp1: Crp_cAMP_CrpSite_ptsGp1 => CrpSite_ptsGp1 + cAMP; regulation*I*decomposition_Crp_cAMP_CrpSite_ptsGp1_kpd*Crp_cAMP_CrpSite_ptsGp1;
    decomposition_Crp_cAMP_CrpSite_ptsGp1_kpd = 0.001666667 per_sec;
  decomposition_Crp_cAMP_CrpSite_ptsGp2: Crp_cAMP_CrpSite_ptsGp2 => CrpSite_ptsGp2 + cAMP; regulation*I*decomposition_Crp_cAMP_CrpSite_ptsGp2_kpd*Crp_cAMP_CrpSite_ptsGp2;
    decomposition_Crp_cAMP_CrpSite_ptsGp2_kpd = 0.001666667 per_sec;
  decomposition_Crp_cAMP_CrpSite_ptsHp0: Crp_cAMP_CrpSite_ptsHp0 => CrpSite_ptsHp0 + cAMP; regulation*I*decomposition_Crp_cAMP_CrpSite_ptsHp0_kpd*Crp_cAMP_CrpSite_ptsHp0;
    decomposition_Crp_cAMP_CrpSite_ptsHp0_kpd = 0.001666667 per_sec;
  decomposition_Crp_cAMP_CrpSite_ptsHp1: Crp_cAMP_CrpSite_ptsHp1 => CrpSite_ptsHp1 + cAMP; regulation*I*decomposition_Crp_cAMP_CrpSite_ptsHp1_kpd*Crp_cAMP_CrpSite_ptsHp1;
    decomposition_Crp_cAMP_CrpSite_ptsHp1_kpd = 0.001666667 per_sec;
  decomposition_Crp_cAMP_CrpSite_ptsIp0: Crp_cAMP_CrpSite_ptsIp0 => CrpSite_ptsIp0 + cAMP; regulation*I*decomposition_Crp_cAMP_CrpSite_ptsIp0_kpd*Crp_cAMP_CrpSite_ptsIp0;
    decomposition_Crp_cAMP_CrpSite_ptsIp0_kpd = 0.001666667 per_sec;
  decomposition_Crp_cAMP_CrpSite_ptsIp1: Crp_cAMP_CrpSite_ptsIp1 => CrpSite_ptsIp1 + cAMP; regulation*I*decomposition_Crp_cAMP_CrpSite_ptsIp1_kpd*Crp_cAMP_CrpSite_ptsIp1;
    decomposition_Crp_cAMP_CrpSite_ptsIp1_kpd = 0.001666667 per_sec;
  decomposition_Crp_cAMP_CrpSite_mlcp1: Crp_cAMP_CrpSite_mlcp1 => CrpSite_mlcp1 + cAMP; regulation*I*decomposition_Crp_cAMP_CrpSite_mlcp1_kpd*Crp_cAMP_CrpSite_mlcp1;
    decomposition_Crp_cAMP_CrpSite_mlcp1_kpd = 0.001666667 per_sec;
  decomposition_Crp_cAMP_CrpSite_mlcp2: Crp_cAMP_CrpSite_mlcp2 => CrpSite_mlcp2 + cAMP; regulation*I*decomposition_Crp_cAMP_CrpSite_mlcp2_kpd*Crp_cAMP_CrpSite_mlcp2;
    decomposition_Crp_cAMP_CrpSite_mlcp2_kpd = 0.001666667 per_sec;
  decomposition_Crp_cAMP_CrpSite_genome: Crp_cAMP_CrpSite_genome => CrpSite_genome + cAMP; regulation*I*decomposition_Crp_cAMP_CrpSite_genome_kpd*Crp_cAMP_CrpSite_genome;
    decomposition_Crp_cAMP_CrpSite_genome_kpd = 0.001666667 per_sec;
  decomposition_Mlc_MlcSite_ptsGp1: Mlc_MlcSite_ptsGp1 => MlcSite_ptsGp1; regulation*I*decomposition_Mlc_MlcSite_ptsGp1_kpd*Mlc_MlcSite_ptsGp1;
    decomposition_Mlc_MlcSite_ptsGp1_kpd = 0.001666667 per_sec;
  decomposition_Mlc_MlcSite_ptsGp2: Mlc_MlcSite_ptsGp2 => MlcSite_ptsGp2; regulation*I*decomposition_Mlc_MlcSite_ptsGp2_kpd*Mlc_MlcSite_ptsGp2;
    decomposition_Mlc_MlcSite_ptsGp2_kpd = 0.001666667 per_sec;
  decomposition_Mlc_MlcSite_ptsHp0: Mlc_MlcSite_ptsHp0 => MlcSite_ptsHp0; regulation*I*decomposition_Mlc_MlcSite_ptsHp0_kpd*Mlc_MlcSite_ptsHp0;
    decomposition_Mlc_MlcSite_ptsHp0_kpd = 0.001666667 per_sec;
  decomposition_Mlc_MlcSite_ptsIp0: Mlc_MlcSite_ptsIp0 => MlcSite_ptsIp0; regulation*I*decomposition_Mlc_MlcSite_ptsIp0_kpd*Mlc_MlcSite_ptsIp0;
    decomposition_Mlc_MlcSite_ptsIp0_kpd = 0.001666667 per_sec;
  decomposition_Mlc_MlcSite_mlcp1: Mlc_MlcSite_mlcp1 => MlcSite_mlcp1; regulation*I*decomposition_Mlc_MlcSite_mlcp1_kpd*Mlc_MlcSite_mlcp1;
    decomposition_Mlc_MlcSite_mlcp1_kpd = 0.001666667 per_sec;
  decomposition_Mlc_MlcSite_mlcp2: Mlc_MlcSite_mlcp2 => MlcSite_mlcp2; regulation*I*decomposition_Mlc_MlcSite_mlcp2_kpd*Mlc_MlcSite_mlcp2;
    decomposition_Mlc_MlcSite_mlcp2_kpd = 0.001666667 per_sec;
  decomposition_IICB_Mlc: IICB_Mlc => ; regulation*I*decomposition_IICB_Mlc_kpd*IICB_Mlc;
    decomposition_IICB_Mlc_kpd = 0.001666667 per_sec;
  decomposition_EI_P: EI_P => ; regulation*I*decomposition_EI_P_kpd*EI_P;
    decomposition_EI_P_kpd = 0.001666667 per_sec;
  decomposition_EI: EI => ; regulation*I*decomposition_EI_kpd*EI;
    decomposition_EI_kpd = 0.001666667 per_sec;
  decomposition_HPr_P: HPr_P => ; regulation*I*decomposition_HPr_P_kpd*HPr_P;
    decomposition_HPr_P_kpd = 0.001666667 per_sec;
  decomposition_HPr: HPr => ; regulation*I*decomposition_HPr_kpd*HPr;
    decomposition_HPr_kpd = 0.001666667 per_sec;
  decomposition_IIA_P: IIA_P => ; regulation*I*decomposition_IIA_P_kpd*IIA_P;
    decomposition_IIA_P_kpd = 0.001666667 per_sec;
  decomposition_IIA: IIA => ; regulation*I*decomposition_IIA_kpd*IIA;
    decomposition_IIA_kpd = 0.001666667 per_sec;
  decomposition_IICB_P: IICB_P => ; regulation*I*decomposition_IICB_P_kpd*IICB_P;
    decomposition_IICB_P_kpd = 0.001666667 per_sec;
  decomposition_IICB: IICB => ; regulation*I*decomposition_IICB_kpd*IICB;
    decomposition_IICB_kpd = 0.001666667 per_sec;
  transcription_pgi: => mRNA_pgi; regulation*I*transcription_pgi_km*pgi;  // modifiers: pgi
    transcription_pgi_km = 1 per_sec;
  decomposition_pgi: mRNA_pgi => ; regulation*I*decomposition_pgi_kmd*mRNA_pgi;
    decomposition_pgi_kmd = 0.00243 per_sec;
  translation_mRNA_pgi: => Pgi; regulation*I*translation_mRNA_pgi_kp*mRNA_pgi;  // modifiers: mRNA_pgi
    translation_mRNA_pgi_kp = 0.1833333 per_sec;
  decomposition_Pgi: Pgi => ; regulation*I*decomposition_Pgi_kpd*Pgi;
    decomposition_Pgi_kpd = 0.001833333 per_sec;
  transcription_pgm: => mRNA_pgm; regulation*I*transcription_pgm_km*pgm;  // modifiers: pgm
    transcription_pgm_km = 1 per_sec;
  decomposition_pgm: mRNA_pgm => ; regulation*I*decomposition_pgm_kmd*mRNA_pgm;
    decomposition_pgm_kmd = 0.00243 per_sec;
  translation_mRNA_pgm: => Pgm; regulation*I*translation_mRNA_pgm_kp*mRNA_pgm;  // modifiers: mRNA_pgm
    translation_mRNA_pgm_kp = 0.1833333 per_sec;
  decomposition_Pgm: Pgm => ; regulation*I*decomposition_Pgm_kpd*Pgm;
    decomposition_Pgm_kpd = 0.001833333 per_sec;
  transcription_zwf: => mRNA_zwf; regulation*I*transcription_zwf_km*(1 - Cra_CraSite_zwf/zwf)*zwf;  // modifiers: zwf, Cra_CraSite_zwf
    transcription_zwf_km = 100 per_sec;
  decomposition_zwf: mRNA_zwf => ; regulation*I*decomposition_zwf_kmd*mRNA_zwf;
    decomposition_zwf_kmd = 0.00243 per_sec;
  translation_mRNA_zwf: => Zwf; regulation*I*translation_mRNA_zwf_kp*mRNA_zwf;  // modifiers: mRNA_zwf
    translation_mRNA_zwf_kp = 0.1833333 per_sec;
  decomposition_Zwf: Zwf => ; regulation*I*decomposition_Zwf_kpd*Zwf;
    decomposition_Zwf_kpd = 0.001833333 per_sec;
  transcription_pfk: => mRNA_pfk; regulation*I*transcription_pfk_km*(1 - Cra_CraSite_pfk/pfk)*pfk;  // modifiers: pfk, Cra_CraSite_pfk
    transcription_pfk_km = 99.99278 per_sec;
  decomposition_pfk: mRNA_pfk => ; regulation*I*decomposition_pfk_kmd*mRNA_pfk;
    decomposition_pfk_kmd = 0.00243 per_sec;
  translation_mRNA_pfk: => Pfk; regulation*I*translation_mRNA_pfk_kp*mRNA_pfk;  // modifiers: mRNA_pfk
    translation_mRNA_pfk_kp = 0.1833333 per_sec;
  decomposition_Pfk: Pfk => ; regulation*I*decomposition_Pfk_kpd*Pfk;
    decomposition_Pfk_kpd = 0.001833333 per_sec;
  transcription_tal: => mRNA_tal; regulation*I*transcription_tal_km*tal;  // modifiers: tal
    transcription_tal_km = 1 per_sec;
  decomposition_tal: mRNA_tal => ; regulation*I*decomposition_tal_kmd*mRNA_tal;
    decomposition_tal_kmd = 0.00243 per_sec;
  translation_mRNA_tal: => Tal; regulation*I*translation_mRNA_tal_kp*mRNA_tal;  // modifiers: mRNA_tal
    translation_mRNA_tal_kp = 0.1833333 per_sec;
  decomposition_Tal: Tal => ; regulation*I*decomposition_Tal_kpd*Tal;
    decomposition_Tal_kpd = 0.001833333 per_sec;
  transcription_tkt: => mRNA_tkt; regulation*I*transcription_tkt_km*tkt;  // modifiers: tkt
    transcription_tkt_km = 1 per_sec;
  decomposition_tkt: mRNA_tkt => ; regulation*I*decomposition_tkt_kmd*mRNA_tkt;
    decomposition_tkt_kmd = 0.00243 per_sec;
  translation_mRNA_tkt: => Tkt; regulation*I*translation_mRNA_tkt_kp*mRNA_tkt;  // modifiers: mRNA_tkt
    translation_mRNA_tkt_kp = 0.1833333 per_sec;
  decomposition_Tkt: Tkt => ; regulation*I*decomposition_Tkt_kpd*Tkt;
    decomposition_Tkt_kpd = 0.001833333 per_sec;
  transcription_fba: => mRNA_fba; regulation*I*transcription_fba_km*fba;  // modifiers: fba
    transcription_fba_km = 1 per_sec;
  decomposition_fba: mRNA_fba => ; regulation*I*decomposition_fba_kmd*mRNA_fba;
    decomposition_fba_kmd = 0.00243 per_sec;
  translation_mRNA_fba: => Fba; regulation*I*translation_mRNA_fba_kp*mRNA_fba;  // modifiers: mRNA_fba
    translation_mRNA_fba_kp = 0.1833333 per_sec;
  decomposition_Fba: Fba => ; regulation*I*decomposition_Fba_kpd*Fba;
    decomposition_Fba_kpd = 0.001833333 per_sec;
  transcription_gap: => mRNA_gap; regulation*I*transcription_gap_km*gap;  // modifiers: gap
    transcription_gap_km = 1 per_sec;
  decomposition_gap: mRNA_gap => ; regulation*I*decomposition_gap_kmd*mRNA_gap;
    decomposition_gap_kmd = 0.00243 per_sec;
  translation_mRNA_gap: => Gap; regulation*I*translation_mRNA_gap_kp*mRNA_gap;  // modifiers: mRNA_gap
    translation_mRNA_gap_kp = 0.1833333 per_sec;
  decomposition_Gap: Gap => ; regulation*I*decomposition_Gap_kpd*Gap;
    decomposition_Gap_kpd = 0.001833333 per_sec;
  transcription_tpi: => mRNA_tpi; regulation*I*transcription_tpi_km*(1 - Cra_CraSite_tpi/tpi)*tpi;  // modifiers: tpi, Cra_CraSite_tpi
    transcription_tpi_km = 99.99519 per_sec;
  decomposition_tpi: mRNA_tpi => ; regulation*I*decomposition_tpi_kmd*mRNA_tpi;
    decomposition_tpi_kmd = 0.00243 per_sec;
  translation_mRNA_tpi: => Tpi; regulation*I*translation_mRNA_tpi_kp*mRNA_tpi;  // modifiers: mRNA_tpi
    translation_mRNA_tpi_kp = 0.1833333 per_sec;
  decomposition_Tpi: Tpi => ; regulation*I*decomposition_Tpi_kpd*Tpi;
    decomposition_Tpi_kpd = 0.001833333 per_sec;
  transcription_pgk: => mRNA_pgk; regulation*I*transcription_pgk_km*pgk;  // modifiers: pgk
    transcription_pgk_km = 1 per_sec;
  decomposition_pgk: mRNA_pgk => ; regulation*I*decomposition_pgk_kmd*mRNA_pgk;
    decomposition_pgk_kmd = 0.00243 per_sec;
  translation_mRNA_pgk: => Pgk; regulation*I*translation_mRNA_pgk_kp*mRNA_pgk;  // modifiers: mRNA_pgk
    translation_mRNA_pgk_kp = 0.1833333 per_sec;
  decomposition_Pgk: Pgk => ; regulation*I*decomposition_Pgk_kpd*Pgk;
    decomposition_Pgk_kpd = 0.001833333 per_sec;
  transcription_gpm: => mRNA_gpm; regulation*I*transcription_gpm_km*gpm;  // modifiers: gpm
    transcription_gpm_km = 1 per_sec;
  decomposition_gpm: mRNA_gpm => ; regulation*I*decomposition_gpm_kmd*mRNA_gpm;
    decomposition_gpm_kmd = 0.00243 per_sec;
  translation_mRNA_gpm: => Gpm; regulation*I*translation_mRNA_gpm_kp*mRNA_gpm;  // modifiers: mRNA_gpm
    translation_mRNA_gpm_kp = 0.1833333 per_sec;
  decomposition_Gpm: Gpm => ; regulation*I*decomposition_Gpm_kpd*Gpm;
    decomposition_Gpm_kpd = 0.001833333 per_sec;
  transcription_eno: => mRNA_eno; regulation*I*transcription_eno_km*eno;  // modifiers: eno
    transcription_eno_km = 1 per_sec;
  decomposition_eno: mRNA_eno => ; regulation*I*decomposition_eno_kmd*mRNA_eno;
    decomposition_eno_kmd = 0.00243 per_sec;
  translation_mRNA_eno: => Eno; regulation*I*translation_mRNA_eno_kp*mRNA_eno;  // modifiers: mRNA_eno
    translation_mRNA_eno_kp = 0.1833333 per_sec;
  decomposition_Eno: Eno => ; regulation*I*decomposition_Eno_kpd*Eno;
    decomposition_Eno_kpd = 0.001833333 per_sec;
  transcription_pyk: => mRNA_pyk; regulation*I*transcription_pyk_km*(1 - Cra_CraSite_pyk/pyk)*pyk;  // modifiers: pyk, Cra_CraSite_pyk
    transcription_pyk_km = 99.98797 per_sec;
  decomposition_pyk: mRNA_pyk => ; regulation*I*decomposition_pyk_kmd*mRNA_pyk;
    decomposition_pyk_kmd = 0.00243 per_sec;
  translation_mRNA_pyk: => Pyk; regulation*I*translation_mRNA_pyk_kp*mRNA_pyk;  // modifiers: mRNA_pyk
    translation_mRNA_pyk_kp = 0.1833333 per_sec;
  decomposition_Pyk: Pyk => ; regulation*I*decomposition_Pyk_kpd*Pyk;
    decomposition_Pyk_kpd = 0.001833333 per_sec;
  transcription_ppc: => mRNA_ppc; regulation*I*transcription_ppc_km*(1 - Cra_CraSite_ppc/ppc)*ppc;  // modifiers: ppc, Cra_CraSite_ppc
    transcription_ppc_km = 99.99038 per_sec;
  decomposition_ppc: mRNA_ppc => ; regulation*I*decomposition_ppc_kmd*mRNA_ppc;
    decomposition_ppc_kmd = 0.00243 per_sec;
  translation_mRNA_ppc: => Ppc; regulation*I*translation_mRNA_ppc_kp*mRNA_ppc;  // modifiers: mRNA_ppc
    translation_mRNA_ppc_kp = 0.1833333 per_sec;
  decomposition_Ppc: Ppc => ; regulation*I*decomposition_Ppc_kpd*Ppc;
    decomposition_Ppc_kpd = 0.001833333 per_sec;
  transcription_pdh: => mRNA_pdh; regulation*I*transcription_pdh_km*(1 - Crp_cAMP_CrpSite_pdh/pdh)*(1 - PdhR_PdhRSite_pdh/pdh)*pdh;  // modifiers: pdh, Crp_cAMP_CrpSite_pdh, PdhR_PdhRSite_pdh
    transcription_pdh_km = 2913.389 per_sec;
  decomposition_pdh: mRNA_pdh => ; regulation*I*decomposition_pdh_kmd*mRNA_pdh;
    decomposition_pdh_kmd = 0.00243 per_sec;
  translation_mRNA_pdh: => Pdh; regulation*I*translation_mRNA_pdh_kp*mRNA_pdh;  // modifiers: mRNA_pdh
    translation_mRNA_pdh_kp = 0.1833333 per_sec;
  decomposition_Pdh: Pdh => ; regulation*I*decomposition_Pdh_kpd*Pdh;
    decomposition_Pdh_kpd = 0.001833333 per_sec;
  transcription_gnd: => mRNA_gnd; regulation*I*transcription_gnd_km*gnd;  // modifiers: gnd
    transcription_gnd_km = 1 per_sec;
  decomposition_gnd: mRNA_gnd => ; regulation*I*decomposition_gnd_kmd*mRNA_gnd;
    decomposition_gnd_kmd = 0.00243 per_sec;
  translation_mRNA_gnd: => Gnd; regulation*I*translation_mRNA_gnd_kp*mRNA_gnd;  // modifiers: mRNA_gnd
    translation_mRNA_gnd_kp = 0.1833333 per_sec;
  decomposition_Gnd: Gnd => ; regulation*I*decomposition_Gnd_kpd*Gnd;
    decomposition_Gnd_kpd = 0.001833333 per_sec;
  transcription_rpi: => mRNA_rpi; regulation*I*transcription_rpi_km*rpi;  // modifiers: rpi
    transcription_rpi_km = 1 per_sec;
  decomposition_rpi: mRNA_rpi => ; regulation*I*decomposition_rpi_kmd*mRNA_rpi;
    decomposition_rpi_kmd = 0.00243 per_sec;
  translation_mRNA_rpi: => Rpi; regulation*I*translation_mRNA_rpi_kp*mRNA_rpi;  // modifiers: mRNA_rpi
    translation_mRNA_rpi_kp = 0.1833333 per_sec;
  decomposition_Rpi: Rpi => ; regulation*I*decomposition_Rpi_kpd*Rpi;
    decomposition_Rpi_kpd = 0.001833333 per_sec;
  transcription_rpe: => mRNA_rpe; regulation*I*transcription_rpe_km*rpe;  // modifiers: rpe
    transcription_rpe_km = 1 per_sec;
  decomposition_rpe: mRNA_rpe => ; regulation*I*decomposition_rpe_kmd*mRNA_rpe;
    decomposition_rpe_kmd = 0.00243 per_sec;
  translation_mRNA_rpe: => Rpe; regulation*I*translation_mRNA_rpe_kp*mRNA_rpe;  // modifiers: mRNA_rpe
    translation_mRNA_rpe_kp = 0.1833333 per_sec;
  decomposition_Rpe: Rpe => ; regulation*I*decomposition_Rpe_kpd*Rpe;
    decomposition_Rpe_kpd = 0.001833333 per_sec;
  transcription_glg: => mRNA_glg; regulation*I*transcription_glg_km*glg;  // modifiers: glg
    transcription_glg_km = 1 per_sec;
  decomposition_glg: mRNA_glg => ; regulation*I*decomposition_glg_kmd*mRNA_glg;
    decomposition_glg_kmd = 0.00243 per_sec;
  translation_mRNA_glg: => Glg; regulation*I*translation_mRNA_glg_kp*mRNA_glg;  // modifiers: mRNA_glg
    translation_mRNA_glg_kp = 0.1833333 per_sec;
  decomposition_Glg: Glg => ; regulation*I*decomposition_Glg_kpd*Glg;
    decomposition_Glg_kpd = 0.001833333 per_sec;
  transcription_adk: => mRNA_adk; regulation*I*transcription_adk_km*adk;  // modifiers: adk
    transcription_adk_km = 1 per_sec;
  decomposition_adk: mRNA_adk => ; regulation*I*decomposition_adk_kmd*mRNA_adk;
    decomposition_adk_kmd = 0.00243 per_sec;
  translation_mRNA_adk: => Adk; regulation*I*translation_mRNA_adk_kp*mRNA_adk;  // modifiers: mRNA_adk
    translation_mRNA_adk_kp = 0.1833333 per_sec;
  decomposition_Adk: Adk => ; regulation*I*decomposition_Adk_kpd*Adk;
    decomposition_Adk_kpd = 0.001833333 per_sec;
  transcription_cra: => mRNA_cra; regulation*I*transcription_cra_km*cra;  // modifiers: cra
    transcription_cra_km = 1 per_sec;
  decomposition_cra: mRNA_cra => ; regulation*I*decomposition_cra_kmd*mRNA_cra;
    decomposition_cra_kmd = 0.00243 per_sec;
  translation_mRNA_cra: => Cra; regulation*I*translation_mRNA_cra_kp*mRNA_cra;  // modifiers: mRNA_cra
    translation_mRNA_cra_kp = 0.1833333 per_sec;
  decomposition_Cra: Cra => ; regulation*I*decomposition_Cra_kpd*Cra;
    decomposition_Cra_kpd = 0.001833333 per_sec;
  transcription_pdhR: => mRNA_pdhR; regulation*I*transcription_pdhR_km*pdhR;  // modifiers: pdhR
    transcription_pdhR_km = 1 per_sec;
  decomposition_pdhR: mRNA_pdhR => ; regulation*I*decomposition_pdhR_kmd*mRNA_pdhR;
    decomposition_pdhR_kmd = 0.00243 per_sec;
  translation_mRNA_pdhR: => PdhR; regulation*I*translation_mRNA_pdhR_kp*mRNA_pdhR;  // modifiers: mRNA_pdhR
    translation_mRNA_pdhR_kp = 0.1833333 per_sec;
  decomposition_PdhR: PdhR => ; regulation*I*decomposition_PdhR_kpd*PdhR;
    decomposition_PdhR_kpd = 0.001833333 per_sec;
  binding_Cra_FDP: Cra + FDP -> Cra_FDP; regulation*I*fast*(binding_Cra_FDP_Kb*Cra*FDP - Cra_FDP);
    binding_Cra_FDP_Kb = 0.03714148 per_mM;
  decomposition_Cra_FDP: Cra_FDP => FDP; regulation*I*decomposition_Cra_FDP_kpd*Cra_FDP;
    decomposition_Cra_FDP_kpd = 0.001833333 per_sec;
  binding_PdhR_PYR: PdhR + PYR -> PdhR_PYR; regulation*I*fast*(binding_PdhR_PYR_Kb*PdhR*PYR - PdhR_PYR);
    binding_PdhR_PYR_Kb = 0.003783242 per_mM;
  decomposition_PdhR_PYR: PdhR_PYR => PYR; regulation*I*decomposition_PdhR_PYR_kpd*PdhR_PYR;
    decomposition_PdhR_PYR_kpd = 0.001833333 per_sec;
  binding_Crp_cAMP_CrpSite_pdh: Crp_cAMP + CrpSite_pdh -> Crp_cAMP_CrpSite_pdh; regulation*I*fast*(binding_Crp_cAMP_CrpSite_pdh_Kb*Crp_cAMP*CrpSite_pdh - Crp_cAMP_CrpSite_pdh);
    binding_Crp_cAMP_CrpSite_pdh_Kb = 10000 per_mM;
  decomposition_Crp_cAMP_CrpSite_pdh: Crp_cAMP_CrpSite_pdh => CrpSite_pdh + cAMP; regulation*I*decomposition_Crp_cAMP_CrpSite_pdh_kpd*Crp_cAMP_CrpSite_pdh;
    decomposition_Crp_cAMP_CrpSite_pdh_kpd = 0.001833333 per_sec;
  binding_Cra_CraSite_zwf: Cra + CraSite_zwf -> Cra_CraSite_zwf; regulation*I*fast*(binding_Cra_CraSite_zwf_Kb*Cra*CraSite_zwf - Cra_CraSite_zwf);
    binding_Cra_CraSite_zwf_Kb = 10000 per_mM;
  decomposition_Cra_CraSite_zwf: Cra_CraSite_zwf => CraSite_zwf; regulation*I*decomposition_Cra_CraSite_zwf_kpd*Cra_CraSite_zwf;
    decomposition_Cra_CraSite_zwf_kpd = 0.001833333 per_sec;
  binding_Cra_CraSite_ptsHp1: Cra + CraSite_ptsHp1 -> Cra_CraSite_ptsHp1; regulation*I*fast*(binding_Cra_CraSite_ptsHp1_Kb*Cra*CraSite_ptsHp1 - Cra_CraSite_ptsHp1);
    binding_Cra_CraSite_ptsHp1_Kb = 10000 per_mM;
  decomposition_Cra_CraSite_ptsHp1: Cra_CraSite_ptsHp1 => CraSite_ptsHp1; regulation*I*decomposition_Cra_CraSite_ptsHp1_kpd*Cra_CraSite_ptsHp1;
    decomposition_Cra_CraSite_ptsHp1_kpd = 0.001833333 per_sec;
  binding_Cra_CraSite_tpi: Cra + CraSite_tpi -> Cra_CraSite_tpi; regulation*I*fast*(binding_Cra_CraSite_tpi_Kb*Cra*CraSite_tpi - Cra_CraSite_tpi);
    binding_Cra_CraSite_tpi_Kb = 10000 per_mM;
  decomposition_Cra_CraSite_tpi: Cra_CraSite_tpi => CraSite_tpi; regulation*I*decomposition_Cra_CraSite_tpi_kpd*Cra_CraSite_tpi;
    decomposition_Cra_CraSite_tpi_kpd = 0.001833333 per_sec;
  binding_Cra_CraSite_pfk: Cra + CraSite_pfk -> Cra_CraSite_pfk; regulation*I*fast*(binding_Cra_CraSite_pfk_Kb*Cra*CraSite_pfk - Cra_CraSite_pfk);
    binding_Cra_CraSite_pfk_Kb = 10000 per_mM;
  decomposition_Cra_CraSite_pfk: Cra_CraSite_pfk => CraSite_pfk; regulation*I*decomposition_Cra_CraSite_pfk_kpd*Cra_CraSite_pfk;
    decomposition_Cra_CraSite_pfk_kpd = 0.001833333 per_sec;
  binding_Cra_CraSite_ppc: Cra + CraSite_ppc -> Cra_CraSite_ppc; regulation*I*fast*(binding_Cra_CraSite_ppc_Kb*Cra*CraSite_ppc - Cra_CraSite_ppc);
    binding_Cra_CraSite_ppc_Kb = 10000 per_mM;
  decomposition_Cra_CraSite_ppc: Cra_CraSite_ppc => CraSite_ppc; regulation*I*decomposition_Cra_CraSite_ppc_kpd*Cra_CraSite_ppc;
    decomposition_Cra_CraSite_ppc_kpd = 0.001833333 per_sec;
  binding_Cra_CraSite_pyk: Cra + CraSite_pyk -> Cra_CraSite_pyk; regulation*I*fast*(binding_Cra_CraSite_pyk_Kb*Cra*CraSite_pyk - Cra_CraSite_pyk);
    binding_Cra_CraSite_pyk_Kb = 10000 per_mM;
  decomposition_Cra_CraSite_pyk: Cra_CraSite_pyk => CraSite_pyk; regulation*I*decomposition_Cra_CraSite_pyk_kpd*Cra_CraSite_pyk;
    decomposition_Cra_CraSite_pyk_kpd = 0.001833333 per_sec;
  binding_PdhR_PdhRSite_pdh: PdhR + PdhRSite_pdh -> PdhR_PdhRSite_pdh; regulation*I*fast*(binding_PdhR_PdhRSite_pdh_Kb*PdhR*PdhRSite_pdh - PdhR_PdhRSite_pdh);
    binding_PdhR_PdhRSite_pdh_Kb = 10000 per_mM;
  decomposition_PdhR_PdhRSite_pdh: PdhR_PdhRSite_pdh => PdhRSite_pdh; regulation*I*decomposition_PdhR_PdhRSite_pdh_kpd*PdhR_PdhRSite_pdh;
    decomposition_PdhR_PdhRSite_pdh_kpd = 0.001833333 per_sec;
  GROWTH: 24083.84 NADH + 3239.528 NADPH + 2195.641 ATP + 720.782 PG3 + 689.55 PEP + 119.7237 RIB5P + 89.16246 PYR + 79.18934 E4P + 78.58849 DHAP + 41.31412 F6P => 24083.84 NAD + 3239.528 NADP + 2195.641 ADP; Vmax*(NADH/(NADH + GROWTH_Knadh))*(NADPH/(NADPH + GROWTH_Knadph))*(ATP/(ATP + GROWTH_Katp))*(PG3/(PG3 + GROWTH_Kpg3))*(PEP/(PEP + GROWTH_Kpep))*(RIB5P/(RIB5P + GROWTH_Krib5p))*(PYR/(PYR + GROWTH_Kpyr))*(E4P/(E4P + GROWTH_Ke4p))*(DHAP/(DHAP + Kdhap))*(F6P/(F6P + GROWTH_Kf6p));
    Vmax = 0.004745835 mM_per_sec; GROWTH_Knadh = 0.1 mM; GROWTH_Knadph = 0.1 mM; GROWTH_Katp = 0.1 mM; GROWTH_Kpg3 = 0.1 mM; GROWTH_Kpep = 0.1 mM; GROWTH_Krib5p = 0.1 mM; GROWTH_Kpyr = 0.1 mM; GROWTH_Ke4p = 0.1 mM; Kdhap = 0.1 mM; GROWTH_Kf6p = 0.1 mM;

  // Unit definitions:
  unit substance = 1e-3 mole;
  unit mM = 1e-3 mole / litre;
  unit per_sec = 1 / second;
  unit mM_per_sec = 1e-3 mole / (litre * second);
  unit per_mM_per_sec = litre / (1e-3 mole * second);
  unit per_mM = litre / (1e-3 mole);
  unit per_mM_squared = litre^2 / (1e-3 mole)^2;
  unit per_mM_squared_per_sec = litre / ((1e-3 mole)^2 * second);
end
