// SBML level 2 version 4

model MODEL1510230003()
  // Rantasalo2016 - Synthetic expresion modulator constitutive STF_VP16_pBID2-ED corePromoter
  // Rantasalo2015-Synthetic_expresion_modulator_constitutiveSTF_VP16_pBID2-EDcorePromoter
  // This model is part of a family of models describing a modular synthetic expression system that modulates the expression level of a gene in S. Cerevisae. The whole family of models is described in the article:
  // Synthetic transcription amplifier system for orthogonal control of gene expression in Saccharomyces cerevisiae, by
  // Anssi Rantasalo, Elena Czeizler, Riitta Virtanen, Juho Rousu, Harri Lähdesmäki, Merja Penttilä, Jussi Jäntti and Dominik Mojzita (submitted).
  // The family comprises 5 different models corresponding to the synthetic systems using:
  // 1) the methionine induced synthetic transcription factor sTF-VP16 construct,
  // 2) the methionine induced synthetic transcription factor sTF-B42 construct,
  // 3) the constitutive sTF-VP16 construct,
  // 4) the constitutive sTF-B42 construct, and
  // 5) the constitutive sTF-VP16 construct with a different core promoter for the reporter gene.
  // The computational models were designed, developed and implemented by Elena Czeizler, Harri Lahdesmaki and Juho Rousu and they are all hosted separately in the Biomodels database.
  // The only difference between the models corresponding to the constitutive and the methionine-induced systems stands in the sTF transcription process. The only difference between the models for the systems using the sTF16 or sTF42 constructs stands in the kinetic rates associated to 2 reactions: i) the association of the polymerase with the sTF’s bound to their specific DNA sites and ii) the degradation rate of the sTF proteins corresponding to the two transcription factors sTF16 or sTF42. The first 4 models correspond to systems using the pBID2-EP core promoter for the reporter mCherry gene. Starting from the model associated to the constitutive system using the sTF16 construct we derived the 5th model corresponding to the case when the core promoter for the reporter mCherry gene is switched from pBID2-EP to pBID2-ED. The only difference between these two last models stands in the kinetic rates for the association of polymerase bound to sTF and the core promoter.
  // Since the 5 considered models have many parts in common, the values for the kinetic parameters corresponding to these common parts are identical in all of them.
  // The current model describes the gene expression modulation system using the constitutive synthetic transcription factor sTF-VP16 composed of a LexA DNA binding domain, the Herpes simplex virus transactivation domain (VP16) and a 6×His-tag. In this model, the number of boxes to which this sTF can bind (encoded in the species B) is set to 2. In the experimental setups, the number of binding boxes varied between 0 and 16 (8 binding sites on each of the 2 DNA constructs), which can be easily modified in the model by changing the initial value for B. The core promoter used for the reporter mCherry gene is pBID2-ED.
  // All model analysis and simulations were done by using the software COPASI (Hoops, S., Sahle, S., Gauges, R., Lee, C., Pahle, J., Simus, N., Singhal, M., Xu, L., Mendes, P. and Kummer, U. (2006) COPASI- A COmplex PAthway SImulator. Bioinformatics, 22, 3067-3074.)
  // biomodels.db:MODEL1510230003

  // Compartments:
  compartment cytoplasm = 0.04;
  compartment nucleus = 0.003;

  // Species:
  species MmCherryc in cytoplasm = 0;
  species mCherryc in cytoplasm = 0;
  species TFc in cytoplasm = 0;
  species MTFc in cytoplasm = 0;
  species Pol in nucleus = 3333333;
  species TFn_B in nucleus = 282.29; TFn_B is "TFn:B";
  species CP2 in nucleus = 666.6667;
  species Pol_TFn_B in nucleus = 0; Pol_TFn_B is "Pol:TFn:B";
  species TFn in nucleus = 0;
  species Pol_DTF in nucleus = 0; Pol_DTF is "Pol:DTF";
  species DTF in nucleus = 333.3333;
  species B in nucleus = 2*333.333 - TFn_B - Pol_TFn_B - Pol_TFn_B_CP2;
  species Pol_TFn_B_CP2 in nucleus = 0; Pol_TFn_B_CP2 is "Pol:TFn:B:CP2";

  // Parameters:
  k_PolDTF_binding = 4988.366; k_PolDTF_binding is "k_PolDTF_binding+";
  k_PolDTF_binding_0 = 0.1921825; k_PolDTF_binding_0 is "k_PolDTF_binding-";
  k_TF_transcription = 2.044447;
  k_TF_translocation = 0.8669599;
  k_TF_binding = 0.189786; k_TF_binding is "k_TF_binding+";
  k_TF_binding_0 = 236.8532; k_TF_binding_0 is "k_TF_binding-";
  k_mCherry_transcription = 62.34028;
  k__mCherry_translation = 31.17014;
  k_protein_degrade = 12.22687;
  k_MRNA_degrade = 863.9067;
  k_mCherry_baseTransc = 30.59818;
  mCherry_f_fact_strong = 5.905757;
  mCherry_f_fact = 13.71217;
  k_TF_translation = 97.56151;
  k_MetTF_binding = 0.4444907; k_MetTF_binding is "k_MetTF_binding+";
  k_MetTF_binding_0 = 125.7506; k_MetTF_binding_0 is "k_MetTF_binding-";
  k_MetTF_sequestration = 0.7381173; k_MetTF_sequestration is "k_MetTF_sequestration+";
  k_MetTF_sequestration_0 = 0.6229791; k_MetTF_sequestration_0 is "k_MetTF_sequestration-";
  k_CP_activation = 0.02569042;
  k_Pol_TFn_B_binding_strong = 6.666671; k_Pol_TFn_B_binding_strong is "k_Pol_TFn:B_binding_strong+";
  k_TF_degrade_strong = 226.0076;
  k_TF_degrade_weak = 358.6849;
  k_Pol_TFn_B_binding_weak = 0.2233822; k_Pol_TFn_B_binding_weak is "k_Pol_TFn:B_binding_weak+";
  k_Pol_TFn_B_binding_strong_0 = 74458.61; k_Pol_TFn_B_binding_strong_0 is "k_Pol_TFn:B_binding_strong-";
  k_Pol_TFn_B_binding_weak_0 = 53400; k_Pol_TFn_B_binding_weak_0 is "k_Pol_TFn:B_binding_weak-";
  k_TFcomplex_CP_binding = 0.6128788; k_TFcomplex_CP_binding is "k_TFcomplex_CP_binding+";
  k_TFcomplex_CP_binding_0 = 342.9441; k_TFcomplex_CP_binding_0 is "k_TFcomplex_CP_binding-";
  Initial_for_mCherry_f_fact = mCherry_f_fact;

  // Assignment rules:
  mCherry_fl := Initial_for_mCherry_f_fact*mCherryc*cytoplasm*1000;
  Constraint_k_mCherry_transcription := k_mCherry_transcription/k__mCherry_translation;
  Constraint_degradation := k_MRNA_degrade/k_protein_degrade;
  Constant_fluorescence_constraint := mCherry_f_fact/mCherry_f_fact_strong;
  Constraint_TF_degradation := k_TF_degrade_strong/k_TF_degrade_weak;

  // Reactions:
  mCherry_transcription: Pol_TFn_B_CP2 => TFn_B + Pol + CP2 + MmCherryc; k_mCherry_transcription*Pol_TFn_B_CP2;
  mCherry_translation: MmCherryc => mCherryc + MmCherryc; cytoplasm*k__mCherry_translation*MmCherryc;
  mCherry_degradation: mCherryc => ; cytoplasm*k_protein_degrade*mCherryc;
  MmCherry_degradation: MmCherryc => ; cytoplasm*k_MRNA_degrade*MmCherryc;
  Pol_active_CP2_binding: Pol + TFn_B -> Pol_TFn_B; nucleus*(k_Pol_TFn_B_binding_strong*Pol*TFn_B - k_Pol_TFn_B_binding_strong_0*Pol_TFn_B); Pol_active_CP2_binding is "Pol-active CP2 binding";
  TFn_degradation: TFn => ; nucleus*k_TF_degrade_strong*TFn;
  TFc_translocation_to_nucleus: TFc => TFn; k_TF_translocation*TFc;
  TFc_degradation: TFc => ; cytoplasm*k_TF_degrade_strong*TFc;
  TF_translation: MTFc => MTFc + TFc; cytoplasm*k_TF_translation*MTFc; TF_translation is "TF-translation";
  TF_transcription: Pol_DTF => MTFc + Pol + DTF; k_TF_transcription*Pol_DTF; TF_transcription is "TF-transcription";
  TF_DNA_binding: TFn + B -> TFn_B; nucleus*(k_TF_binding*TFn*B - k_TF_binding_0*TFn_B); TF_DNA_binding is "TF-DNA binding";
  Pol_DTF_binding: Pol + DTF -> Pol_DTF; nucleus*(k_PolDTF_binding*Pol*DTF - k_PolDTF_binding_0*Pol_DTF); Pol_DTF_binding is "Pol-DTF binding";
  MTFc_degradation: MTFc => ; cytoplasm*k_MRNA_degrade*MTFc;
  TF_complex_CP_binding: Pol_TFn_B + CP2 -> Pol_TFn_B_CP2; nucleus*(k_TFcomplex_CP_binding*Pol_TFn_B*CP2 - k_TFcomplex_CP_binding_0*Pol_TFn_B_CP2); TF_complex_CP_binding is "TF-complex-CP binding";

  // Unit definitions:
  unit volume = 1e-12 litre;
  unit substance = item;
end
