// SBML level 2 version 3

model MODEL1610100002()
  // Proctor2017- Role of microRNAs in osteoarthritis (Negative Feedback By MicroRNA with Delay)
  // This model is described in the article:
  // Computer simulation models as a tool to investigate the role of microRNAs in osteoarthritis.
  // Proctor CJ, Smith GR.
  // PLoS ONE 2017; 12(11): e0187568
  // Abstract:
  // The aim of this study was to show how computational models can be used to increase our understanding of the role of microRNAs in osteoarthritis (OA) using miR-140 as an example. Bioinformatics analysis and experimental results from the literature were used to create and calibrate models of gene regulatory networks in OA involving miR-140 along with key regulators such as NF-?B, SMAD3, and RUNX2. The individual models were created with the modelling standard, Systems Biology Markup Language, and integrated to examine the overall effect of miR-140 on cartilage homeostasis. Down-regulation of miR-140 may have either detrimental or protective effects for cartilage, indicating that the role of miR-140 is complex. Studies of individual networks in isolation may therefore lead to different conclusions. This indicated the need to combine the five chosen individual networks involving miR-140 into an integrated model. This model suggests that the overall effect of miR-140 is to change the response to an IL-1 stimulus from a prolonged increase in matrix degrading enzymes to a pulse-like response so that cartilage degradation is temporary. Our current model can easily be modified and extended as more experimental data become available about the role of miR-140 in OA. In addition, networks of other microRNAs that are important in OA could be incorporated. A fully integrated model could not only aid our understanding of the mechanisms of microRNAs in ageing cartilage but could also provide a useful tool to investigate the effect of potential interventions to prevent cartilage loss.
  // This model is hosted on BioModels Database and identified by: MODEL1610100002.
  // To cite BioModels Database, please use: Chelliah V et al. BioModels: ten-year anniversary. Nucl. Acids Res. 2015, 43(Database issue):D542-8.
  // To the extent possible under law, all copyright and related or neighbouring rights to this encoded model have been dedicated to the public domain worldwide. Please refer to CC0 Public Domain Dedication for more information.
  // biomodels.db:MODEL1610100002

  // Compartments:
  compartment cell = 1;

  // Species:
  substanceOnly species miR in cell = 0;
  substanceOnly species miR_gene in cell = 2;
  substanceOnly species miR_gene_TF1 in cell = 0;
  substanceOnly species pri_miR in cell = 0;
  substanceOnly species Signal in cell = 0;
  substanceOnly species TF1_cyt in cell = 0;
  substanceOnly species TF1_nuc in cell = 0;
  substanceOnly species TF1_mRNA in cell = 0;
  substanceOnly species $Sink in cell = 0;

  // Parameters:
  kbinTF1miRgene = 0.1;
  kdegMiR = 0.005;
  kdegTF1 = 0.001;
  kdegTF1mRNA = 0.0001;
  kdegTF1mRNAbyMiR = 0.001;
  krelTF1miRgene = 0.5;
  ksynMiR = 1;
  ksynTF1 = 0.005;
  ksynTF1mRNA = 0.01;
  kcyt2nuc = 1e-5;
  knuc2cyt = 0.001;
  kprocessMiR = 0.005;

  // Reactions:
  miR_gene_TF1_binding: miR_gene + TF1_nuc => miR_gene_TF1; kbinTF1miRgene*miR_gene*TF1_nuc;
  miR_gene_TF1_release: miR_gene_TF1 => miR_gene + TF1_nuc; krelTF1miRgene*miR_gene_TF1;
  miR_synthesis: miR_gene_TF1 => miR_gene_TF1 + pri_miR; ksynMiR*miR_gene_TF1;
  miR_processing: pri_miR => miR; kprocessMiR*pri_miR;
  miR_degradation: miR => $Sink; kdegMiR*miR;
  TF1_transcription: Signal => Signal + TF1_mRNA; ksynTF1mRNA*Signal;
  TF1_mRNA_degradation: TF1_mRNA => $Sink; kdegTF1mRNA*TF1_mRNA;
  TF1_mRNA_degradation_via_miR: TF1_mRNA + miR => miR; kdegTF1mRNAbyMiR*TF1_mRNA*miR;
  TF1_translation: TF1_mRNA => TF1_mRNA + TF1_cyt; ksynTF1*TF1_mRNA;
  TF1_degradation: TF1_cyt => $Sink; kdegTF1*TF1_cyt;
  TF1_translocation_to_nucleus: TF1_cyt => TF1_nuc; kcyt2nuc*TF1_cyt;
  TF1_translocation_to_cytoplasm: TF1_nuc => TF1_cyt; knuc2cyt*TF1_nuc;

  // Events:
  ActivateSignal: at (time > 3600): Signal = 100;

  // Unit definitions:
  unit substance = item;
end
