// SBML level 2 version 4

model MODEL1704110001()
  // Proctor2017 - Identifying microRNA for muscle regeneration during ageing (Mir181_in_muscle)
  // This model is described in the article:
  // Using computer simulation models to investigate the most promising microRNAs to improve muscle regeneration during ageing
  // Carole J. Proctor & Katarzyna Goljanek-Whysall
  // Scientific Reports
  // Abstract:
  // MicroRNAs (miRNAs) regulate gene expression through interactions with target sites within mRNAs, leading to enhanced degradation of the mRNA or inhibition of translation. Skeletal muscle expresses many different miRNAs with important roles in adulthood myogenesis (regeneration) and myofibre hypertrophy and atrophy, processes associated with muscle ageing. However, the large number of miRNAs and their targets mean that a complex network of pathways exists, making it difficult to predict the effect of selected miRNAs on age-related muscle wasting. Computational modelling has the potential to aid this process as it is possible to combine models of individual miRNA:target interactions to form an integrated network. As yet, no models of these interactions in muscle exist. We created the first model of miRNA:target interactions in myogenesis based on experimental evidence of individual miRNAs which were next validated and used to make testable predictions. Our model confirms that miRNAs regulate key interactions during myogenesis and can act by promoting the switch between quiescent/proliferating/differentiating myoblasts and by maintaining the differentiation process. We propose that a threshold level of miR-1 acts in the initial switch to differentiation, with miR-181 keeping the switch on and miR-378 maintaining the differentiation and miR-143 inhibiting myogenesis.
  // This model is hosted on BioModels Database and identified by: MODEL1704110001.
  // To cite BioModels Database, please use: Chelliah V et al. BioModels: ten-year anniversary. Nucl. Acids Res. 2015, 43(Database issue):D542-8.
  // To the extent possible under law, all copyright and related or neighbouring rights to this encoded model have been dedicated to the public domain worldwide. Please refer to CC0 Public Domain Dedication for more information.
  // biomodels.db:MODEL1704110001

  // Compartments:
  compartment cell = 1;

  // Species:
  substanceOnly species FoxO3 in cell = 400;
  substanceOnly species FoxO3_Sirt1 in cell = 100;
  substanceOnly species HoxA11 in cell = 500;
  substanceOnly species HoxA11_mRNA in cell = 100;
  substanceOnly species Mafbx in cell = 0;
  substanceOnly species miR181 in cell = 10;
  substanceOnly species miR181_HoxA11_mRNA in cell = 0;
  substanceOnly species miR181_Sirt1_mRNA in cell = 0;
  substanceOnly species miR181_gene in cell = 2;
  substanceOnly species MyoD in cell = 0;
  substanceOnly species MyoD_gene in cell = 2;
  substanceOnly species MyoD_gene_FoxO3 in cell = 0;
  substanceOnly species MyoD_gene_HoxA11 in cell = 0;
  substanceOnly species MyoD_mRNA in cell = 0;
  substanceOnly species Sirt1 in cell = 400;
  substanceOnly species Sirt1_mRNA in cell = 100;
  substanceOnly species $Sink in cell = 0;
  substanceOnly species $Source in cell = 1;

  // Parameters:
  kbinFoxO3Sirt1 = 1e-5;
  kbinmiR181Sirt1 = 5e-5;
  kbinmiR181HoxA11 = 5e-5;
  kbinMyoDgeneFoxO3 = 1e-5;
  kbinMyoDgeneHoxA11 = 1e-5;
  kdegFoxO3 = 4.8e-5;
  kdegFoxO3Sirt1 = 9.6e-5;
  kdegHoxA11 = 6.4e-6;
  kdegHoxA11mRNA = 2e-5;
  kdegHoxA11mRNAmiR181 = 2e-5;
  kdegMafbx = 0.0002;
  kdegmiR181 = 1.6e-6;
  kdegMyoD = 0.00026;
  kdegMyoDmRNA = 0.0002;
  kdegSirt1 = 2.4e-5;
  kdegSirt1mRNA = 2e-5;
  kdegSirt1mRNAmiR181 = 2e-5;
  krelFoxO3Sirt1 = 0.001;
  krelmiR181HoxA11 = 0.001;
  krelmiR181Sirt1 = 0.001;
  krelMyoDgeneFoxO3 = 0.001;
  krelMyoDgeneHoxA11 = 0.0005;
  ksynFoxO3 = 0.038;
  ksynHoxA11 = 3.2e-5;
  ksynHoxA11mRNA = 0.002;
  ksynMafbx = 0.0001;
  ksynmiR181 = 6e-6;
  ksynMyoD = 0.002;
  ksynMyoDmRNA = 0.005;
  ksynSirt1 = 2e-5;
  ksynSirt1mRNA = 0.005;

  // Reactions:
  miR181_synthesis: miR181_gene => miR181_gene + miR181; ksynmiR181*miR181_gene;
  miR181_degradation: miR181 => $Sink; kdegmiR181*miR181;
  Sirt1_transcription: $Source => Sirt1_mRNA; ksynSirt1mRNA*Source;
  Sirt1_mRNA_degradation: Sirt1_mRNA => $Sink; kdegSirt1mRNA*Sirt1_mRNA;
  Sirt1_translation: Sirt1_mRNA => Sirt1_mRNA + Sirt1; ksynSirt1*Sirt1_mRNA;
  Sirt1_degradation: Sirt1 => $Sink; kdegSirt1*Sirt1;
  miR181_Sirt1mRNA_binding: miR181 + Sirt1_mRNA => miR181_Sirt1_mRNA; kbinmiR181Sirt1*miR181*Sirt1_mRNA;
  miR181_Sirt1mRNA_release: miR181_Sirt1_mRNA => miR181 + Sirt1_mRNA; krelmiR181Sirt1*miR181_Sirt1_mRNA;
  Sirt1_mRNA_degradation_by_miR181: miR181_Sirt1_mRNA => miR181; kdegSirt1mRNAmiR181*miR181_Sirt1_mRNA;
  HoxA11_transcription: $Source => HoxA11_mRNA; ksynHoxA11mRNA*Source;
  HoxA11_mRNA_degradation: HoxA11_mRNA => $Sink; kdegHoxA11mRNA*HoxA11_mRNA;
  miR181_HoxA11mRNA_binding: miR181 + HoxA11_mRNA => miR181_HoxA11_mRNA; kbinmiR181HoxA11*miR181*HoxA11_mRNA;
  miR181_HoxA11mRNA_release: miR181_HoxA11_mRNA => miR181 + HoxA11_mRNA; krelmiR181HoxA11*miR181_HoxA11_mRNA;
  HoxA11_mRNA_degradation_by_miR181: miR181_HoxA11_mRNA => miR181; kdegHoxA11mRNAmiR181*miR181_HoxA11_mRNA;
  HoxA11_translation: HoxA11_mRNA => HoxA11_mRNA + HoxA11; ksynHoxA11*HoxA11_mRNA;
  HoxA11_degradation: HoxA11 => $Sink; kdegHoxA11*HoxA11;
  MyoD_gene_FoxO3_binding: MyoD_gene + FoxO3 => MyoD_gene_FoxO3; kbinMyoDgeneFoxO3*MyoD_gene*FoxO3;
  MyoD_gene_FoxO3_release: MyoD_gene_FoxO3 => MyoD_gene + FoxO3; krelMyoDgeneFoxO3*MyoD_gene_FoxO3;
  MyoD_transcription: MyoD_gene_FoxO3 => MyoD_gene_FoxO3 + MyoD_mRNA; ksynMyoDmRNA*MyoD_gene_FoxO3;
  MyoD_gene_HoxA11_binding: HoxA11 + MyoD_gene => MyoD_gene_HoxA11; kbinMyoDgeneHoxA11*HoxA11*MyoD_gene;
  MyoD_gene_HoxA11_release: MyoD_gene_HoxA11 => HoxA11 + MyoD_gene; krelMyoDgeneHoxA11*MyoD_gene_HoxA11;
  MyoD_translation: MyoD_mRNA => MyoD_mRNA + MyoD; ksynMyoD*MyoD_mRNA;
  MyoD_mRNA_degradation: MyoD_mRNA => $Sink; kdegMyoDmRNA*MyoD_mRNA;
  MyoD_degradation: MyoD => $Sink; kdegMyoD*MyoD;
  FoxO3_Sirt1_binding: FoxO3 + Sirt1 => FoxO3_Sirt1; kbinFoxO3Sirt1*FoxO3*Sirt1;
  FoxO3_Sirt1_release: FoxO3_Sirt1 => FoxO3 + Sirt1; krelFoxO3Sirt1*FoxO3_Sirt1;
  Fox3_degradation_via_Sirt1: FoxO3_Sirt1 => Sirt1; kdegFoxO3Sirt1*FoxO3_Sirt1;
  Fox3_degradation: FoxO3 => $Sink; kdegFoxO3*FoxO3;
  Fox3_synthesis: $Source => FoxO3; ksynFoxO3*Source;
  Mafbx_synthesis: FoxO3 => FoxO3 + Mafbx; ksynMafbx*FoxO3;
  Mafbx_degradation: Mafbx => $Sink; kdegMafbx*Mafbx;

  // Unit definitions:
  unit substance = item;
end
