// SBML level 2 version 4

model MODEL1704110002()
  // Proctor2017 - Identifying microRNA for muscle regeneration during ageing (Mir378_in_muscle)
  // This model is described in the article:
  // Using computer simulation models to investigate the most promising microRNAs to improve muscle regeneration during ageing
  // Carole J. Proctor & Katarzyna Goljanek-Whysall
  // Scientific Reports
  // Abstract:
  // MicroRNAs (miRNAs) regulate gene expression through interactions with target sites within mRNAs, leading to enhanced degradation of the mRNA or inhibition of translation. Skeletal muscle expresses many different miRNAs with important roles in adulthood myogenesis (regeneration) and myofibre hypertrophy and atrophy, processes associated with muscle ageing. However, the large number of miRNAs and their targets mean that a complex network of pathways exists, making it difficult to predict the effect of selected miRNAs on age-related muscle wasting. Computational modelling has the potential to aid this process as it is possible to combine models of individual miRNA:target interactions to form an integrated network. As yet, no models of these interactions in muscle exist. We created the first model of miRNA:target interactions in myogenesis based on experimental evidence of individual miRNAs which were next validated and used to make testable predictions. Our model confirms that miRNAs regulate key interactions during myogenesis and can act by promoting the switch between quiescent/proliferating/differentiating myoblasts and by maintaining the differentiation process. We propose that a threshold level of miR-1 acts in the initial switch to differentiation, with miR-181 keeping the switch on and miR-378 maintaining the differentiation and miR-143 inhibiting myogenesis.
  // This model is hosted on BioModels Database and identified by: MODEL1704110002.
  // To cite BioModels Database, please use: Chelliah V et al. BioModels: ten-year anniversary. Nucl. Acids Res. 2015, 43(Database issue):D542-8.
  // To the extent possible under law, all copyright and related or neighbouring rights to this encoded model have been dedicated to the public domain worldwide. Please refer to CC0 Public Domain Dedication for more information.

  // Compartments:
  compartment cell = 1;

  // Species:
  substanceOnly species miR378 in cell = 20;
  substanceOnly species miR378_gene in cell = 2;
  substanceOnly species miR378_gene_MyoD in cell = 0;
  substanceOnly species miR378_gene_Msc in cell = 0;
  substanceOnly species miR378_Msc_mRNA in cell = 0;
  substanceOnly species MyoD in cell = 500;
  substanceOnly species MyoD_gene in cell = 2;
  substanceOnly species MyoD_mRNA in cell = 20;
  substanceOnly species Msc in cell = 500;
  substanceOnly species Msc_gene in cell = 2;
  substanceOnly species Msc_mRNA in cell = 50;
  substanceOnly species $Sink in cell = 0;
  substanceOnly species $Source in cell = 1;

  // Parameters:
  kbinmiR378geneMsc = 5e-5;
  kbinmiR378geneMyoD = 1e-5;
  kbinmiR378MscmRNA = 0.0001;
  kdegmiR378 = 1.6e-6;
  kdegMyoD = 0.00026;
  kdegMyoDmRNA = 0.0002;
  kdegMsc = 5e-5;
  kdegMscmRNA = 1e-5;
  kdegMscmRNAmiR378 = 4e-5;
  krelmiR378geneMsc = 0.001;
  krelmiR378geneMyoD = 0.001;
  krelmiR378MscmRNA = 0.001;
  ksynmiR378 = 0.0001;
  ksynMsc = 0.0005;
  ksynMscmRNA = 0.00025;
  ksynMyoD = 0.002;
  ksynMyoDmRNA = 0.005;

  // Reactions:
  miR378_gene_MyoD_binding: miR378_gene + MyoD => miR378_gene_MyoD; kbinmiR378geneMyoD*miR378_gene*MyoD;
  miR_gene_MyoD_release: miR378_gene_MyoD => miR378_gene + MyoD; krelmiR378geneMyoD*miR378_gene_MyoD;
  miR378_synthesis: miR378_gene_MyoD => miR378_gene_MyoD + miR378; ksynmiR378*miR378_gene_MyoD;
  miR378_degradation: miR378 => $Sink; kdegmiR378*miR378;
  MyoD_transcription: MyoD_gene => MyoD_gene + MyoD_mRNA; ksynMyoDmRNA*MyoD_gene;
  MyoD_mRNA_degradation: MyoD_mRNA => $Sink; kdegMyoDmRNA*MyoD_mRNA;
  MyoD_translation: MyoD_mRNA => MyoD_mRNA + MyoD; ksynMyoD*MyoD_mRNA;
  MyoD_degradation: MyoD => $Sink; kdegMyoD*MyoD;
  Msc_transcription: Msc_gene => Msc_gene + Msc_mRNA; ksynMscmRNA*Msc_gene;
  Msc_translation: Msc_mRNA => Msc_mRNA + Msc; ksynMsc*Msc_mRNA;
  Msc_mRNA_degradation: Msc_mRNA => $Sink; kdegMscmRNA*Msc_mRNA;
  miR378_Msc_binding: miR378 + Msc_mRNA => miR378_Msc_mRNA; kbinmiR378MscmRNA*miR378*Msc_mRNA;
  miR378_Msc_release: miR378_Msc_mRNA => miR378 + Msc_mRNA; krelmiR378MscmRNA*miR378_Msc_mRNA;
  Msc_mRNA_degradation_by_miR378: miR378_Msc_mRNA => miR378; kdegMscmRNAmiR378*miR378_Msc_mRNA;
  miR378_gene_Msc_binding: miR378_gene + Msc => miR378_gene_Msc; kbinmiR378geneMsc*miR378_gene*Msc;
  miR378_gene_Msc_release: miR378_gene_Msc => miR378_gene + Msc; krelmiR378geneMsc*miR378_gene_Msc;
  Msc_degradation: Msc => $Sink; kdegMsc*Msc;

  // Unit definitions:
  unit substance = item;
end
