// SBML level 2 version 4

model MODEL1704110003()
  // Proctor2017 - Identifying microRNA for muscle regeneration during ageing (Mir143_in_muscle)
  // This model is described in the article:
  // Using computer simulation models to investigate the most promising microRNAs to improve muscle regeneration during ageing
  // Carole J. Proctor & Katarzyna Goljanek-Whysall
  // Scientific Reports
  // Abstract:
  // MicroRNAs (miRNAs) regulate gene expression through interactions with target sites within mRNAs, leading to enhanced degradation of the mRNA or inhibition of translation. Skeletal muscle expresses many different miRNAs with important roles in adulthood myogenesis (regeneration) and myofibre hypertrophy and atrophy, processes associated with muscle ageing. However, the large number of miRNAs and their targets mean that a complex network of pathways exists, making it difficult to predict the effect of selected miRNAs on age-related muscle wasting. Computational modelling has the potential to aid this process as it is possible to combine models of individual miRNA:target interactions to form an integrated network. As yet, no models of these interactions in muscle exist. We created the first model of miRNA:target interactions in myogenesis based on experimental evidence of individual miRNAs which were next validated and used to make testable predictions. Our model confirms that miRNAs regulate key interactions during myogenesis and can act by promoting the switch between quiescent/proliferating/differentiating myoblasts and by maintaining the differentiation process. We propose that a threshold level of miR-1 acts in the initial switch to differentiation, with miR-181 keeping the switch on and miR-378 maintaining the differentiation and miR-143 inhibiting myogenesis.
  // This model is hosted on BioModels Database and identified by: MODEL1704110003.
  // To cite BioModels Database, please use: Chelliah V et al. BioModels: ten-year anniversary. Nucl. Acids Res. 2015, 43(Database issue):D542-8.
  // To the extent possible under law, all copyright and related or neighbouring rights to this encoded model have been dedicated to the public domain worldwide. Please refer to CC0 Public Domain Dedication for more information.
  // biomodels.db:MODEL1704110003

  // Compartments:
  compartment cell = 1;

  // Species:
  substanceOnly species Akt in cell = 100;
  substanceOnly species Akt_P in cell = 0;
  substanceOnly species Igf2 in cell = 500;
  substanceOnly species Igf2_Igfbp5 in cell = 0;
  substanceOnly species Igfbp5 in cell = 100;
  substanceOnly species Igfbp5_mRNA in cell = 20;
  substanceOnly species Igfbp5_mRNA_miR143 in cell = 0;
  substanceOnly species IL6 in cell = 500;
  substanceOnly species miR143 in cell = 200;
  substanceOnly species miR143_gene in cell = 2;
  substanceOnly species miR143_gene_IL6 in cell = 0;
  substanceOnly species miR143_gene_MyoD in cell = 0;
  substanceOnly species MyoD in cell = 500;
  substanceOnly species Myogenin in cell = 0;
  substanceOnly species $Sink in cell = 0;
  substanceOnly species $Source in cell = 1;

  // Parameters:
  kbinIgf2Igfbp5 = 5e-6;
  kbinmiR143geneIL6 = 0.001;
  kbinmiR143geneMyoD = 1e-5;
  kbinmiR143Igfbp5mRNA = 0.0001;
  kdegIgfbp5 = 5e-5;
  kdegIgfbp5mRNA = 1e-5;
  kdegIgfbp5mRNAmiR143 = 5e-5;
  kdegIL6 = 8e-6;
  kdegmiR143 = 5e-6;
  kdegMyogenin = 1e-5;
  kdephosAkt = 0.01;
  kphosAkt = 0.0005;
  krelIgf2Igfbp5 = 0.001;
  krelmiR143geneIL6 = 0.0005;
  krelmiR143geneMyoD = 0.001;
  krelmiR143Igfbp5mRNA = 0.001;
  ksynIgfbp5 = 8e-5;
  ksynIgfbp5mRNA = 0.001;
  ksynIL6 = 0;
  ksynmiR143 = 0.0005;
  ksynMyogenin = 1e-5;

  // Reactions:
  miR143_gene_MyoD_binding: miR143_gene + MyoD => miR143_gene_MyoD; kbinmiR143geneMyoD*miR143_gene*MyoD;
  miR143_gene_MyoD_release: miR143_gene_MyoD => miR143_gene + MyoD; krelmiR143geneMyoD*miR143_gene_MyoD;
  miR143_synthesis: miR143_gene_MyoD => miR143_gene_MyoD + miR143; ksynmiR143*miR143_gene_MyoD;
  miR143_degradation: miR143 => $Sink; kdegmiR143*miR143;
  IL6_synthesis: $Source => IL6; ksynIL6*Source;
  IL6_degradation: IL6 => $Sink; kdegIL6*IL6;
  miR143_gene_IL6_binding: miR143_gene + IL6 => miR143_gene_IL6; kbinmiR143geneIL6*miR143_gene*IL6;
  miR143_gene_IL6_release: miR143_gene_IL6 => miR143_gene + IL6; krelmiR143geneIL6*miR143_gene_IL6;
  Igfbp5_transcription: $Source => Igfbp5_mRNA; ksynIgfbp5mRNA*Source;
  Igfbp5_mRNA_degradation: Igfbp5_mRNA => $Sink; kdegIgfbp5mRNA*Igfbp5_mRNA;
  Igfbp5_mRNA_miR143_binding: Igfbp5_mRNA + miR143 => Igfbp5_mRNA_miR143; kbinmiR143Igfbp5mRNA*Igfbp5_mRNA*miR143;
  Igfbp5_mRNA_miR143_release: Igfbp5_mRNA_miR143 => Igfbp5_mRNA + miR143; krelmiR143Igfbp5mRNA*Igfbp5_mRNA_miR143;
  Igfbp5_mRNA_degradation_by_miR143: Igfbp5_mRNA_miR143 => miR143; kdegIgfbp5mRNAmiR143*Igfbp5_mRNA_miR143;
  Igfbp5_translation: Igfbp5_mRNA => Igfbp5_mRNA + Igfbp5; ksynIgfbp5*Igfbp5_mRNA;
  Igfbp5_degradation: Igfbp5 => $Sink; kdegIgfbp5*Igfbp5;
  Igf2_Igfbp5_binding: Igf2 + Igfbp5 => Igf2_Igfbp5; kbinIgf2Igfbp5*Igf2*Igfbp5;
  Igf2_Igfbp5_release: Igf2_Igfbp5 => Igf2 + Igfbp5; krelIgf2Igfbp5*Igf2_Igfbp5;
  Akt_phosphorylation: Igf2_Igfbp5 + Akt => Igf2_Igfbp5 + Akt_P; kphosAkt*Igf2_Igfbp5*Akt;
  Akt_dephosphorylation: Akt_P => Akt; kdephosAkt*Akt_P;
  Myogenin_synthesis: Akt_P => Akt_P + Myogenin; ksynMyogenin*Akt_P;
  Myogenin_degradation: Myogenin => $Sink; kdegMyogenin*Myogenin;

  // Unit definitions:
  unit substance = item;
end
