// SBML level 2 version 4

model Model_1()
  // Sips2015 - Glucose and non-esterified fatty acids (NEFA) metabolism
  // This a model from the article:
  // Model-Based Quantification of the Systemic Interplay between Glucose and Fatty Acids in the Postprandial State.
  // Fianne L. P. Sips, Elin Nyman, Martin Adiels, Peter A. J. Hilbers, Peter Strålfors, Natal A. W. van Riel, Gunnar Cedersund.PLoS ONE 10(9): e0135665. link,

  // Compartments:
  compartment Compartment1 = 1; Compartment1 is "default";

  // Species:
  species $G_p in Compartment1 = G_b*V_G;
  species $G_t in Compartment1 = (U_ii - EGP + k_1*G_p)/k_2;
  species $I_l in Compartment1 = (S_b - I_p*m_4)/m_3;
  species $I_p in Compartment1 = I_b*V_I;
  species $Q_sto1 in Compartment1 = D;
  species $Q_gut in Compartment1 = 0;
  species $I_1 in Compartment1 = I_b;
  species $I_d in Compartment1 = I_b;
  species $X in Compartment1 = 0;
  species $I_po in Compartment1 = S_b/gamma;
  species $Y in Compartment1 = 0;
  species $Q_sto2 in Compartment1 = 0;
  species $I_d4 in Compartment1 = I_b;
  species $I_d5 in Compartment1 = I_b;
  species $I_d6 in Compartment1 = I_b;
  species $NEFA in Compartment1 = NEFA_b;
  species $N_d1 in Compartment1 = p_H*((NEFA_b - p_G)/p_F) + p_G;
  species $I_d7 in Compartment1 = I_b;

  // Parameters:
  V_G = 1.821433;
  k_1 = 0.065;
  k_2 = 0.079;
  G_b = 78.151;
  V_I = 0.05;
  m_1 = 0.19;
  m_5 = 0.0304;
  HE_b = 0.6;
  I_b = 50.4638;
  S_b = 1.55;
  k_max = 0.0558;
  k_min = 0.0125129;
  k_abs = 16.75093;
  k_gri = 0.0558;
  f = 0.8026352;
  b = 0.9386079;
  d = 0.2321857;
  BW = 78;
  k_p2 = 0.0021;
  k_p3 = 1.573986e-11;
  k_p4 = 0.1377685;
  k_i = 0.0079;
  U_ii = 1;
  V_mX = 0.047;
  K_m0 = 198.2366;
  p_2U = 0.0331;
  part = 0;
  K = 2.3;
  alpha = 0.05;
  beta = 0.11;
  gamma = 0.5;
  k_e1 = 0.0005;
  k_e2 = 339;
  D = 100000;
  EGP_b = 1.9;
  ins_inf = 0;
  k_egp5 = 0.0004044815;
  k_uid3 = 20.76355;
  V_N = 3;
  p_A = 0.00336303;
  p_B = 1.001827;
  p_C = -10.36677;
  p_D = 0.17;
  p_E = 1e-5;
  p_F = 0.03;
  p_G = 380;
  p_H = 0.02;
  A_spill = 17.31177;
  B_spill = 16.00849;
  LPL_max = 350;
  K_lpl = 3000;
  K_p = 200;
  tau_lpl = 240;
  var P;
  NEFA_b = 410.0189;
  var J_A;
  var J_B;
  var J_C;
  var J_D;
  var spill;
  var J_lpl;
  var TG;
  p_TG1 = 1.130712e-7;
  p_TG2 = -4.488203e-5;
  p_TG3 = -0.001040949;
  p_TG4 = 0.9595797;
  p_TG5 = 1091.87;
  var EGP_a0;
  var plot1tot2;
  var plot2togut;
  I_p_0 = 2.52319;
  N_d1_0 = 400.0126;
  I_po_0 = 3.1;
  I_d_0 = 50.4638;
  G_p_0 = 142.3468;
  G_t_0 = 105.7284;

  // Assignment rules:
  m_4 := 2/5*(S_b/I_p_0)*(1 - HE_b);
  m_2 := (S_b/I_p_0 - m_4/(1 - HE_b))*((1 - HE_b)/HE_b);
  m_6 := m_5*S_b + HE_b;
  S_b_minus := -1*S_b;
  k_p1 := EGP_b + k_p2*G_p_0 + k_p3*I_d_0 + k_p4*I_po_0 - k_egp5*N_d1_0;
  V_m0 := (EGP_b - U_ii)*(K_m0 + G_t_0)/G_t_0;
  aa := 5/2/(1 - b)/D;
  cc := 5/2/d/D;
  EGP := k_p1 - k_p2*G_p - k_p3*I_d - k_p4*(I_po + ins_inf/gamma) + k_egp5*N_d1;
  V_mmax := (1 - part)*(V_m0 + k_uid3*X/N_d1);
  E := 0;
  S := gamma*I_po;
  I := I_p/V_I;
  G := G_p/V_G;
  HE := -m_5*S + m_6;
  m_3 := HE*m_1/(1 - HE);
  Q_sto := Q_sto1 + Q_sto2;
  Ra := f*k_abs*Q_gut/BW;
  k_empt := k_min + (k_max - k_min)/2*(tanh(aa*(Q_sto - b*D)) - tanh(cc*(Q_sto - d*D)) + 2);
  U_idm := V_mmax*G_t/(K_m0 + G_t);
  U_id := U_idm;
  U := U_ii + U_id;
  P := (K_p + I_b)/I_b;
  J_A := p_A*NEFA;
  J_B := p_B*(I_d7 - I_b)*NEFA;
  J_C := p_C;
  spill := (A_spill + B_spill*(I_b/I_d6))/100;
  TG := p_TG1*time^4 + p_TG2*time^3 + p_TG3*time^2 + p_TG4*time + p_TG5;
  J_lpl := LPL_max*TG/(K_lpl + TG)*(P*I_d6/(K_p + I_d6));
  J_D := spill*J_lpl/V_N;
  EGP_a0 := piecewise(0, EGP < 0, EGP);
  S_po := piecewise(Y + S_b, EGP_a0 + Ra - U_ii - k_1*G_p + k_2*G_t < 0, Y + K*(EGP_a0 + Ra - E - U_ii - k_1*G_p + k_2*G_t)/V_G + S_b);
  plot1tot2 := k_gri*Q_sto1;
  plot2togut := k_empt*Q_sto2;

  // Rate rules:
  G_p' = EGP_a0 + Ra - E - U_ii - k_1*G_p + k_2*G_t;
  G_t' = -U_id + k_1*G_p - k_2*G_t;
  I_l' = -m_1*I_l - m_3*I_l + m_2*I_p + S;
  I_p' = -m_2*I_p - m_4*I_p + m_1*I_l;
  Q_sto1' = -k_gri*Q_sto1;
  Q_gut' = -k_abs*Q_gut + k_empt*Q_sto2;
  I_1' = -k_i*(I_1 - I);
  I_d' = -k_i*(I_d - I_1);
  X' = -p_2U*X + p_2U*(I - I_b);
  I_po' = -gamma*I_po + S_po;
  Y' = piecewise(-alpha*(Y + S_b), beta*(G - G_b) < S_b_minus, -alpha*(Y - beta*(G - G_b)));
  Q_sto2' = -k_empt*Q_sto2 + k_gri*Q_sto1;
  I_d4' = 3/tau_lpl*(I - I_d4);
  I_d5' = 3/tau_lpl*(I_d4 - I_d5);
  I_d6' = 3/tau_lpl*(I_d5 - I_d6);
  NEFA' = -J_A - J_B + J_C + J_D;
  N_d1' = p_H*(NEFA - p_G) - p_F*(N_d1 - p_G);
  I_d7' = -1*p_D*(I_d7 - I_b) + p_E*(I - I_b);
end
