// SBML level 2 version 4
// dcterms:bibliographicCitation: urn:miriam:pubmed:1794746

function Constant_flux__irreversible(v)
  v;
end
Constant_flux__irreversible is "Constant flux (irreversible)";

function M(kcat, E, S, Km)
  kcat*E*S/(Km + S);
end

function modifier(k, m, s)
  k*m*s;
end

model Willems1991___Simulating_thrombin_generation()
  // Willems1991 - Simulating thrombin generation
  // Mathematical model of blood coagulation to simulate factor IIa, Va and Xa concentration profiles. Publication also illustrates the effect of hirudin on factor IIa, Va and Xa generation.
  // hasPart interpro:IPR000429
  // isVersionOf GO:0007596
  // isDescribedBy pubmed:1794746

  // Compartments:
  compartment Compartment = 1;

  // Species:
  species Xa in Compartment = 0;
  species ATIII in Compartment = 500;
  species Xa_ATIII in Compartment = 0; Xa_ATIII is "Xa-ATIII";
  species IIa in Compartment = 0;
  species V in Compartment = 30;
  species Va in Compartment = 0;
  species APC in Compartment = 5;
  species Va_inactive in Compartment = 0;
  species Va_Xa in Compartment = 0; Va_Xa is "Va-Xa";
  species II in Compartment = 1000;
  species IIa_ATIII in Compartment = 0; IIa_ATIII is "IIa-ATIII";
  species C in Compartment = 100;
  species APC_inactive in Compartment = 0;
  species Fibrin in Compartment = 0;
  species Fibrinogen in Compartment = 10000;
  species Hirudin in Compartment = 0;
  species IIa_Hirudin in Compartment = 0; IIa_Hirudin is "IIa-Hirudin";

  // Parameters:
  r1a_Q_Xa = 20;
  r1a_alpha = 1;
  r1b_k_i = 0.25;
  r2a_k_cat = 14;
  r2a_K_m = 72;
  r2b_k_cat = 2.6;
  r2b_K_m = 10;
  r2c_k_cat = 24;
  r2c_K_m = 20;
  r3a_k_p = 10;
  r3b_K_i = 0.05;
  r3c_k_cat = 24;
  r3c_K_m = 20;
  r4a_k_cat = 2.3;
  r4a_K_m = 58;
  r4a_K_d = 50;
  r4b_k_cat = 2000;
  r4b_K_m = 210;
  r4b_K_d = 0.01;
  r4c_k_i = 1.3;
  r5a_k = 0.0014;
  r5b_k_i = 0.35;
  r6_K_m = 2000;
  r4a_binding_sites = 1;
  r4b_binding_sites = 1;
  r4a_intermediate_k_off = 50;
  r4b_intermediate_k_off = 50;
  r3a_forward = 10;
  r7_k_hirudin = 2000;
  ModelValue_29 = r4a_intermediate_k_off; ModelValue_29 is "Initial for r4a_intermediate_k_off";
  Initial_for_r4b_K_d = r4b_K_d;
  ModelValue_31 = r4b_intermediate_k_off; ModelValue_31 is "Initial for r4b_intermediate_k_off";

  // Assignment rules:
  F := r1a_Q_Xa*r1a_alpha*exp(-1*r1a_alpha*time);
  Vmax_r4a := r4a_k_cat*r4a_binding_sites;
  Vmax_r4b := r4b_k_cat*r4b_binding_sites;
  r4a_intermediate_k_on := ModelValue_29/r4a_K_d;
  r4b_intermediate_k_on := ModelValue_31/Initial_for_r4b_K_d;
  r3a_reverse := r3a_forward/r3a_k_p;

  // Reactions:
  R1a: => Xa; Compartment*Constant_flux__irreversible(F);
  R1b: Xa + ATIII => Xa_ATIII; Compartment*r1b_k_i*Xa*ATIII;
  R2a: V => Va; Compartment*M(r2a_k_cat, IIa, V, r2a_K_m);  // modifiers: IIa
  R2b: V => Va; Compartment*M(r2b_k_cat, Xa, V, r2b_K_m);  // modifiers: Xa
  R2c: Va => Va_inactive; Compartment*M(r2c_k_cat, APC, Va, r2c_K_m);  // modifiers: APC
  R3a: Va + Xa -> Va_Xa; Compartment*(r3a_forward*Va*Xa - r3a_reverse*Va_Xa);
  R3b: Va_Xa + ATIII => Va + Xa_ATIII; Compartment*r3b_K_i*Va_Xa*ATIII;
  R3c: Va_Xa => Va_inactive + Xa; Compartment*M(r3c_k_cat, APC, Va_Xa, r3c_K_m);  // modifiers: APC
  R4a: II => IIa; Compartment*M(r4a_k_cat, Xa, II, r4a_K_m);  // modifiers: Xa
  R4b: II => IIa; Compartment*M(r4b_k_cat, Va_Xa, II, r4b_K_m);  // modifiers: Va_Xa
  R4c: IIa + ATIII => IIa_ATIII; Compartment*r4c_k_i*IIa*ATIII;
  R5a: C => APC; Compartment*modifier(r5a_k, IIa, C);  // modifiers: IIa
  R5b: APC => APC_inactive; Compartment*r5b_k_i*APC;
  R6a: Fibrinogen => Fibrin; Compartment*M(kcat, IIa, Fibrinogen, r6_K_m);  // modifiers: IIa
    kcat = 1;
  R7: IIa + Hirudin => IIa_Hirudin; Compartment*r7_k_hirudin*IIa*Hirudin;

  // Unit definitions:
  unit volume = 1e-3 litre;
  unit time = 60 second;
  unit substance = 1e-9 mole;
end
