// SBML level 2 version 4
// dcterms:bibliographicCitation: urn:miriam:doi:10.1007/s12046-017-0602-3

model Susree2017___Role_of_platelet_count_and_inhibitors_in_blood_coagulation()
  // Susree2017 - Role of platelet count and inhibitors in blood coagulation
  // Mathematical model of blood coagulation that incorporates platelet binding sites.
  // isVersionOf GO:0007596
  // isDescribedBy doi:10.1007/s12046-017-0602-3

  // Compartments:
  compartment compartment = 1;

  // Species:
  species $TF in compartment = 0.025;
  species $VII in compartment = 10;
  species $TF_VII in compartment = 0; TF_VII is "TF:VII";
  species $VIIa in compartment = 0.1;
  species $TF_VIIa in compartment = 0; TF_VIIa is "TF:VIIa";
  species $IX in compartment = 90;
  species $IXa in compartment = 0.009;
  species $IXa_m in compartment = 0;
  species $X in compartment = 170;
  species $Xa in compartment = 0.017;
  species $X_m in compartment = 0;
  species $Xa_m in compartment = 0;
  species $II in compartment = 1400;
  species $IIa in compartment = 0.14;
  species $II_m in compartment = 0;
  species $IIa_m in compartment = 0;
  species $PL in compartment = 10;
  species $AP in compartment = 0.001;
  species $VIII in compartment = 0.7;
  species $VIIIa in compartment = 7e-5;
  species $VIII_m in compartment = 0;
  species $VIIIa_m in compartment = 0;
  species $VIIIa_m_IXa_m in compartment = 0; VIIIa_m_IXa_m is "VIIIa_m:IXa:m";
  species $V in compartment = 20;
  species $Va in compartment = 0.002;
  species $V_m in compartment = 0;
  species $Va_m in compartment = 0;
  species $Xa_m_Va_m in compartment = 0; Xa_m_Va_m is "Xa_m:Va:m";
  species $I in compartment = 7000;
  species $Ia in compartment = 0.7;
  species $TFPI in compartment = 2.5;
  species $Xa_TFPI in compartment = 0; Xa_TFPI is "Xa:TFPI";
  species $ATIII in compartment = 3400;
  species $IX_m in compartment = 0;

  // Parameters:
  K54__kpp = 0.3; K54__kpp is "K54: kpp";
  K55__kp2 = 0.37; K55__kp2 is "K55: kp2";
  K01__k_T7 = 0.0032; K01__k_T7 is "K01: k_T7+";
  K02__k_T7 = 0.0031; K02__k_T7 is "K02: k_T7-";
  K03__K_T7a = 0.023; K03__K_T7a is "K03: K_T7a+";
  K04__k_T7a = 0.0031; K04__k_T7a is "K04: k_T7a-";
  K05__k_TF7 = 0.00044; K05__k_TF7 is "K05: k_TF7";
  K06__k_10_7 = 0.013; K06__k_10_7 is "K06: k_10,7";
  K07__k_2_7 = 2.3e-5; K07__k_2_7 is "K07: k_2,7";
  K25__h_7_AT = 4.5e-7; K25__h_7_AT is "K25: h_7_AT";
  K21__h_7_TP = 0.05; K21__h_7_TP is "K21: h_7_TP";
  K10__k_9 = 0.26; K10__k_9 is "K10: k_9";
  K11__K_9M = 243; K11__K_9M is "K11: K_9M";
  K23__h_9 = 2.223e-7; K23__h_9 is "K23: h_9";
  K08__k_7_10 = 1.15; K08__k_7_10 is "K08: k_7,10";
  K09__K_7_10M = 450; K09__K_7_10M is "K09: K_7,10M";
  K22__h_10_AT = 3.05e-6; K22__h_10_AT is "K22: h_10_AT";
  K19__h_10_TP = 4.381; K19__h_10_TP is "K19: h_10_TP+";
  K20__h_10_TP = 5.293e-8; K20__h_10_TP is "K20: h_10_TP-";
  K12__k_2t = 7.5e-6; K12__k_2t is "K12: k_2t";
  K24__h_2 = 0.000179; K24__h_2 is "K24: h_2";
  K13__k_8 = 0.9; K13__k_8 is "K13: k_8";
  K14__K_8M = 147; K14__K_8M is "K14: K_8M";
  K36__h_8 = 0.0037; K36__h_8 is "K36: h_8";
  K15__k_5 = 0.233; K15__k_5 is "K15: k_5";
  K16__K_5M = 71.7; K16__K_5M is "K16: K_5M";
  K39__h_5 = 0.0028; K39__h_5 is "K39: h_5";
  K17__k_f = 59; K17__k_f is "K17: k_f";
  K18__K_fM = 3160; K18__K_fM is "K18: K_fM";
  K48__k_9 = 0.01; K48__k_9 is "K48: k_9+";
  K49__k_9 = 0.0257; K49__k_9 is "K49: k_9-";
  K26__k_TEN = 0.01; K26__k_TEN is "K26: k_TEN+";
  K27__k_TEN = 0.005; K27__k_TEN is "K27: k_TEN-";
  K44__k_10 = 0.029; K44__k_10 is "K44: k_10+";
  K45__k_10 = 3.3; K45__k_10 is "K45: k_10-";
  K28__k_10 = 8.33; K28__k_10 is "K28: k_10";
  K29__K_10M = 63; K29__K_10M is "K29: K_10M";
  K30__k_PRO = 0.4; K30__k_PRO is "K30: k_PRO+";
  K31__k_PRO = 0.2; K31__k_PRO is "K31: k_PRO-";
  K46__k_2 = 0.01; K46__k_2 is "K46: k_2+";
  K47__k_2 = 5.9; K47__k_2 is "K47: k_2-";
  K32__k_2 = 22.4; K32__k_2 is "K32: k_2";
  K33__K_2M = 1060; K33__K_2M is "K33: K_2M";
  K50__k_8 = 0.0043; K50__k_8 is "K50: k_8+";
  K51__k_8 = 0.00246; K51__k_8 is "K51: k_8-";
  K40__k_8_m = 0.9; K40__k_8_m is "K40: k_8_m";
  K41__K_8M_m = 147; K41__K_8M_m is "K41: K_8M_m";
  K34__k_8t_m = 0.023; K34__k_8t_m is "K34: k_8t_m";
  K35__K_8tM_m = 20; K35__K_8tM_m is "K35: K_8tM_m";
  K52__k_5 = 0.057; K52__k_5 is "K52: k_5+";
  K53__k_5 = 0.17; K53__k_5 is "K53: k_5-";
  K42__k_5_m = 0.23; K42__k_5_m is "K42: k_5_m";
  K43__K_5M_m = 71.7; K43__K_5M_m is "K43: K_5M_m";
  K37__k_5t_m = 0.046; K37__k_5t_m is "K37: k_5t_m";
  K38__K_5tM_m = 10.4; K38__K_5tM_m is "K38: K_5tM_m";
  N_2 = 2000;
  N_5 = 2700;
  N_8 = 750;
  N_9 = 250;
  N_9a = 550;
  N_10 = 2700;
  var IIa___IIa_m; IIa___IIa_m is "IIa + IIa_m";

  // Assignment rules:
  IIa___IIa_m := IIa + IIa_m;

  // Rate rules:
  TF' = -K01__k_T7*TF*VII + K02__k_T7*TF_VII - K03__K_T7a*TF*VIIIa + K04__k_T7a*TF_VIIa;
  VII' = -K01__k_T7*TF*VII + K02__k_T7*TF_VII - K05__k_TF7*TF_VIIa*VII - K06__k_10_7*Xa*VII - K07__k_2_7*IIa*VII;
  TF_VII' = K01__k_T7*TF*VII - K02__k_T7*TF_VII;
  VIIa' = -K03__K_T7a*TF*VIIa + K04__k_T7a*TF_VIIa + K05__k_TF7*TF_VIIa*VII + K06__k_10_7*Xa*VII + K07__k_2_7*IIa*VII;
  TF_VIIa' = K03__K_T7a*TF*VIIa - K04__k_T7a*TF_VIIa - K21__h_7_TP*Xa_TFPI*TF_VIIa - K25__h_7_AT*ATIII*TF_VIIa;
  IX' = -K10__k_9*TF_VIIa*IX/(K11__K_9M + IX) - K48__k_9*N_9*AP*IX + K49__k_9*IX_m;
  IXa' = K10__k_9*TF_VIIa*IX/(K11__K_9M + IX) - K48__k_9*N_9a*AP*IXa + K49__k_9*IXa_m - K23__h_9*IXa*ATIII;
  IXa_m' = -K26__k_TEN*VIIIa_m*IXa_m + K27__k_TEN*VIIIa_m_IXa_m + K48__k_9*N_9a*AP*IXa - K49__k_9*IXa_m;
  X' = -K08__k_7_10*TF_VIIa*X/(K09__K_7_10M + X) - K44__k_10*N_10*AP*X + K45__k_10*X_m;
  Xa' = K08__k_7_10*TF_VIIa*X/(K09__K_7_10M + X) - K19__h_10_TP*TFPI*Xa + K20__h_10_TP*Xa_TFPI - K22__h_10_AT*ATIII*Xa - K44__k_10*N_10*AP*Xa + K45__k_10*Xa_m;
  X_m' = -K28__k_10*VIIIa_m_IXa_m*X_m/(K29__K_10M + X_m) + K44__k_10*N_10*AP*X - K45__k_10*X_m;
  Xa_m' = K28__k_10*VIIIa_m_IXa_m*X_m/(K29__K_10M + X_m) - K30__k_PRO*Va_m*Xa_m + K31__k_PRO*Xa_m_Va_m + K44__k_10*N_10*AP*Xa - K45__k_10*Xa_m;
  II' = -K12__k_2t*Xa*II - K46__k_2*N_2*AP*II + K47__k_2*II_m;
  IIa' = K12__k_2t*Xa*II - K46__k_2*N_2*AP*IIa + K47__k_2*IIa_m - K24__h_2*ATIII*IIa;
  II_m' = -K32__k_2*Xa_m_Va_m*II_m/(K33__K_2M + II_m) + K46__k_2*N_2*AP*II - K47__k_2*II_m;
  IIa_m' = K32__k_2*Xa_m_Va_m*II_m/(K33__K_2M + II_m) + K46__k_2*N_2*AP*IIa - K47__k_2*IIa_m;
  PL' = -K54__kpp*PL*AP - K55__kp2*PL*IIa/(1 + IIa);
  AP' = K54__kpp*PL*AP + K55__kp2*PL*IIa/(1 + IIa);
  VIII' = -K13__k_8*IIa*VIII/(K14__K_8M + VIII) - K50__k_8*N_8*AP*VIII + K51__k_8*VIII_m;
  VIIIa' = K13__k_8*IIa*VIII/(K41__K_8M_m + VIII) - K50__k_8*N_8*AP*VIIIa + K51__k_8*VIIIa_m - K36__h_8*VIIIa;
  VIII_m' = -K40__k_8_m*IIa_m*VIII_m/(K41__K_8M_m + VIII_m) - K34__k_8t_m*Xa*VIII_m/(K35__K_8tM_m + VIII_m) + K50__k_8*N_8*AP*VIII - K51__k_8*VIII_m;
  VIIIa_m' = K40__k_8_m*IIa*VIII_m/(K41__K_8M_m + VIII_m) + K34__k_8t_m*Xa*VIII_m/(K35__K_8tM_m + VIII_m) + K50__k_8*N_8*AP*VIIIa - K51__k_8*VIIIa_m - K26__k_TEN*VIIIa_m*IXa_m + K27__k_TEN*VIIIa_m_IXa_m;
  VIIIa_m_IXa_m' = K26__k_TEN*VIIIa_m*IXa_m - K27__k_TEN*VIIIa_m_IXa_m;
  V' = -K15__k_5*IIa*V/(K16__K_5M + V) - K52__k_5*N_5*AP*V + K53__k_5*V_m;
  Va' = K15__k_5*IIa*V/(K16__K_5M + V) - K52__k_5*N_5*AP*Va + K53__k_5*Va_m - K39__h_5*Va;
  V_m' = -K42__k_5_m*IIa_m*V_m/(K43__K_5M_m + V_m) - K37__k_5t_m*Xa_m*V_m/(K38__K_5tM_m + V_m) + K52__k_5*N_5*AP*V - K53__k_5*V_m;
  Va_m' = K42__k_5_m*IIa_m*V_m/(K43__K_5M_m + V_m) + K37__k_5t_m*Xa_m*V_m/(K38__K_5tM_m + V_m) - K30__k_PRO*Xa_m*Va_m + K31__k_PRO*Xa_m_Va_m + K52__k_5*N_5*AP*Va - K53__k_5*Va_m;
  Xa_m_Va_m' = K30__k_PRO*Xa_m*Va_m - K31__k_PRO*Xa_m_Va_m;
  I' = -K17__k_f*IIa*I/(K18__K_fM + I);
  Ia' = K17__k_f*IIa*I/(K18__K_fM + I);
  TFPI' = -K19__h_10_TP*Xa*TFPI + K20__h_10_TP*Xa_TFPI;
  Xa_TFPI' = K19__h_10_TP*Xa*TFPI - K20__h_10_TP*Xa_TFPI - K21__h_7_TP*TF_VIIa*Xa_TFPI;
  ATIII' = -ATIII*(K22__h_10_AT*Xa + K23__h_9*IXa + K24__h_2*IIa + K25__h_7_AT)*TF_VIIa;
  IX_m' = K48__k_9*N_9*AP*IX - K49__k_9*IX_m;

  // Unit definitions:
  unit volume = 1e-3 litre;
  unit substance = 1e-9 mole;
end
