// SBML level 2 version 4
// dcterms:bibliographicCitation: urn:miriam:pubmed:22563088

function rateOf(a)
  NaN;
end

model Shibeko2012___Model_of_IIa_generation()
  // Shibeko2012 - Model of IIa generation
  // Mathematical model of blood coagulation investigating the effects of varied rFVIIa and TF concentration.
  // isVersionOf GO:0007596
  // isDescribedBy pubmed:22563088

  // Compartments:
  compartment compartment = 1;

  // Species:
  species $VII in compartment = 100;
  species $VIIa in compartment = 0.1;
  species $X in compartment = 170;
  species $Xa in compartment = 0;
  species $ATIII in compartment = 3400;
  species $VII_TF in compartment = 0; VII_TF is "VII:TF";
  species $VIIa_TF in compartment = 0; VIIa_TF is "VIIa:TF";
  species $TF in compartment = 0.005;
  species $TFPI in compartment = 0.7;
  species $Xa_TFPI in compartment = 0; Xa_TFPI is "Xa:TFPI";
  species $VIIa_TF_Xa_TFPI in compartment = 0; VIIa_TF_Xa_TFPI is "VIIa:TF:Xa:TFPI";
  species $VIIa_i_TF_Xa_TFPI in compartment = 0; VIIa_i_TF_Xa_TFPI is "VIIa_i:TF:Xa:TFPI";
  species $VIIa_i in compartment = 0;
  species $VIIa_i_TF in compartment = 0; VIIa_i_TF is "VIIa_i:TF";
  species $V in compartment = 20;
  species $Va in compartment = 0;
  species $Xa_Va in compartment = 0; Xa_Va is "Xa:Va";
  species $II in compartment = 1400;
  species $IIa in compartment = 0;
  species PL in compartment = 40;

  // Parameters:
  K_act_FVII_FVIIa_TF = 0.026; K_act_FVII_FVIIa_TF is "K_act_FVII,FVIIa:TF*";
  K_act_FVII_FXa = 0.0009; K_act_FVII_FXa is "K_act_FVII,FXa";
  K_act_FX_FVIIa_TF = 2.14; K_act_FX_FVIIa_TF is "K_act_FX,FVIIa:TF*";
  K_act_FVII_TF_FXa = 0.282; K_act_FVII_TF_FXa is "K_act_FVII:TF,FXa*";
  k_a_FVII_TF = 0.052; k_a_FVII_TF is "k_a_FVII,TF*";
  k_a_FVIIa_TF = 0.156; k_a_FVIIa_TF is "k_a_FVIIa,TF*";
  k_a_FVIIai_TF = 0.78; k_a_FVIIai_TF is "k_a_FVIIai,TF";
  k_d_FVII_TF = 0.0138; k_d_FVII_TF is "k_d_FVII:TF*";
  k_d_FVIIa_TF = 0.0138; k_d_FVIIa_TF is "k_d_FVIIa:TF";
  k_d_FVIIai_TF = 0.0138; k_d_FVIIai_TF is "k_d_FVIIai:TF*";
  k_a_FXa_TFPI = 0.054; k_a_FXa_TFPI is "k_a_FXa,TFPI";
  k_a_FVIIa_TF_Xa_TFPI = 0.23; k_a_FVIIa_TF_Xa_TFPI is "k_a_FVIIa:TF,Xa:TFPI";
  k_d_FXa_TFPI = 0.0216; k_d_FXa_TFPI is "k_d_FXa:TFPI";
  k_d_FVIIa_TF_Xa_TFPI = 0.022; k_d_FVIIa_TF_Xa_TFPI is "k_d_FVIIa:TF:Xa:TFPI";
  K_inh_FXa_ATIII = 0.000124; K_inh_FXa_ATIII is "K_inh_FXa,ATIII";
  K_act_pl_FXa_FVIIa = 5e-6; K_act_pl_FXa_FVIIa is "K_act_pl_FXa,FVIIa";
  K_D_FVIIa_PL = 30; K_D_FVIIa_PL is "K_D_FVIIa,PL";
  K_act_FII_FXa = 0.00045; K_act_FII_FXa is "K_act_FII,FXa";
  K_act_FII_FXa_FVa = 3.4; K_act_FII_FXa_FVa is "K_act_FII,FXa:FVa";
  K_act_FV_FIIa = 1.2; K_act_FV_FIIa is "K_act_FV,FIIa";
  k_a_FXa_FVa = 24; k_a_FXa_FVa is "k_a_FXa,FVa";
  k_d_FXa_FVa = 12; k_d_FXa_FVa is "k_d_FXa:FVa";
  K_inh_FIIa_ATIII = 0.000426; K_inh_FIIa_ATIII is "K_inh_FIIa,ATIII";
  k_a_FVIIai_TF_FXa_TFPI = 0.1; k_a_FVIIai_TF_FXa_TFPI is "k_a_FVIIai:TF,FXa:TFPI";
  k_d_FVIIai_TF_Xa_TFPI = 0.01; k_d_FVIIai_TF_Xa_TFPI is "k_d_FVIIai:TF:Xa:TFPI";
  plot_clot_time = 50;
  Initial_for_VIIa = VIIa;

  // Assignment rules:
  plot_log_VIIa := log10(Initial_for_VIIa);

  // Rate rules:
  VII' = -K_act_FVII_FVIIa_TF*VII*VIIa_TF - K_act_FVII_FXa*VII*Xa - k_a_FVII_TF*VII*TF + k_d_FVII_TF*VII_TF;
  VIIa' = K_act_FVII_FVIIa_TF*VII*VIIa_TF + K_act_FVII_FXa*VII*Xa - k_a_FVIIa_TF*VIIa*TF + k_d_FVIIa_TF*VIIa_TF;
  X' = -K_act_FX_FVIIa_TF*X*VIIa_TF - K_act_pl_FXa_FVIIa*X*VIIa*(1 - K_D_FVIIa_PL/(K_D_FVIIa_PL + PL));
  Xa' = K_act_FX_FVIIa_TF*X*VIIa_TF + K_act_pl_FXa_FVIIa*X*VIIa*(1 - K_D_FVIIa_PL/(K_D_FVIIa_PL + PL)) - K_inh_FXa_ATIII*Xa*ATIII - k_a_FXa_TFPI*Xa*TFPI + k_d_FXa_TFPI*Xa_TFPI - k_a_FXa_FVa*Xa*Va + k_d_FXa_FVa*Xa_Va;
  ATIII' = -K_inh_FXa_ATIII*Xa*ATIII - K_inh_FIIa_ATIII*IIa*ATIII;
  VII_TF' = k_a_FVII_TF*VII*TF - k_d_FVII_TF*VII_TF - K_act_FVII_TF_FXa*VII_TF*Xa;
  VIIa_TF' = k_a_FVIIa_TF*VIIa*TF - k_d_FVIIa_TF*VIIa_TF + K_act_FVII_TF_FXa*VII_TF*Xa - k_a_FVIIa_TF_Xa_TFPI*VIIa_TF*Xa_TFPI + k_d_FVIIa_TF_Xa_TFPI*VIIa_TF_Xa_TFPI;
  TF' = -k_a_FVII_TF*VII*TF + k_d_FVII_TF*VII_TF - k_a_FVIIa_TF*VIIa*TF + k_d_FVIIa_TF*VIIa_TF - k_a_FVIIai_TF*VIIa_i*TF + k_d_FVIIai_TF*VIIa_i_TF;
  TFPI' = -k_a_FXa_TFPI*Xa*TFPI + k_d_FXa_TFPI*Xa_TFPI;
  Xa_TFPI' = -k_a_FVIIa_TF_Xa_TFPI*VIIa_TF*Xa_TFPI + k_d_FVIIa_TF_Xa_TFPI*VIIa_TF_Xa_TFPI + k_a_FXa_TFPI*Xa*TFPI - k_d_FXa_TFPI*Xa_TFPI - k_a_FVIIai_TF_FXa_TFPI*VIIa_i_TF*Xa_TFPI + k_d_FVIIai_TF_Xa_TFPI*VIIa_i_TF_Xa_TFPI;
  VIIa_TF_Xa_TFPI' = k_a_FVIIa_TF_Xa_TFPI*VIIa_TF*Xa_TFPI - k_d_FVIIa_TF_Xa_TFPI*VIIa_TF_Xa_TFPI;
  VIIa_i_TF_Xa_TFPI' = k_a_FVIIai_TF_FXa_TFPI*VIIa_i_TF*Xa_TFPI - k_d_FVIIai_TF_Xa_TFPI*VIIa_i_TF_Xa_TFPI;
  VIIa_i' = -k_a_FVIIai_TF*VIIa_i*TF + k_d_FVIIai_TF*VIIa_i_TF;
  VIIa_i_TF' = k_a_FVIIai_TF*VIIa_i*TF - k_d_FVIIai_TF*VIIa_i_TF - k_a_FVIIai_TF_FXa_TFPI*VIIa_i_TF*Xa_TFPI + k_d_FVIIai_TF_Xa_TFPI*VIIa_i_TF_Xa_TFPI;
  V' = -K_act_FV_FIIa*V*IIa;
  Va' = K_act_FV_FIIa*V*IIa - k_a_FXa_FVa*Xa*Va + k_d_FXa_FVa*Xa_Va;
  Xa_Va' = k_a_FXa_FVa*Xa*Va - k_d_FXa_FVa*Xa_Va;
  II' = -K_act_FII_FXa*II*Xa - K_act_FII_FXa_FVa*II*Xa_Va;
  IIa' = K_act_FII_FXa*II*Xa + K_act_FII_FXa_FVa*II*Xa_Va - K_inh_FXa_ATIII*IIa*ATIII;

  // Events:
  Clot_Time: at (rateOf(IIa) < 0): plot_clot_time = time;

  // Unit definitions:
  unit volume = 1e-3 litre;
  unit time = 60 second;
  unit substance = 1e-9 mole;
end
