// SBML level 2 version 4

function Mass_action_with_modulation_2(k1, substare, modulator)
  k1*substare*modulator;
end
Mass_action_with_modulation_2 is "Mass action, modulation, irreversible";

function Hill_modified(V, substrate, Act, h, Shalve)
  V*substrate*Act^h/(Shalve^h + Act^h);
end

function Mass_action_with_modulation(k1, substare, modulator, k2, product)
  k1*substare*modulator - k2*product;
end
Mass_action_with_modulation is "Mass action, modulation, reversible";

model NFkB_activation()
  // TLR4-NFkB-phospho-NF-kB signaling in BMDM
  // The model was constructed to describe TLR4 induced NF-κB activation in native bone marrow-derived macrophages. It included processes of ligand (lipopolysaccharide) recognition, formation of dimer receptor complex and further signal transduction through TRAF6/TAK1 complex that leads to the activation of IKKα/β kinase, which in turn enables the NF-κB transcription factor phosphorylation and translocation in the cell nucleus, and induction of IkB and WIP1 (as an example of induced protein that promotes NF-κB dephosphorylation 2) gene transcription. Models were based on the current knowledge of TLR signaling framework, protein interactions within the TLR4 pathway, and up-to-date mathematical models describing Toll receptor activation. The major important additions were made to TLR4 signaling description: 1) Receptor dimerization process 2) The existence of a basal nuclear NF-κB level (translocation) 3) NF-κB phosphorylation by IKK complex

  // Compartments:
  compartment Cell = 1;
  compartment Outer_space = 1000;

  // Species:
  species CD14 in Cell = 1.275728;
  species TRAF6 in Cell = 0.1;
  species IKK in Cell = 0.09900899;
  species IKK_P in Cell = 0.000627057; IKK_P is "IKK[P]";
  species $source_DNA in Cell = 1;
  species $sink in Cell = 0;
  species IkBa in Cell = 0.006831821;
  species IkBa_NFkB in Cell = 0.1005664; IkBa_NFkB is "IkBa:NFkB";
  species NFkB in Cell = 2.968432e-5;
  species IKK_P_IkBa_NFkB in Cell = 6.949242e-7; IKK_P_IkBa_NFkB is "IKK[P]:IkBa:NFkB";
  species NFkB_nuc in Cell = 0.0001184031; NFkB_nuc is "NFkB(nuc)";
  species IkBa_nuc in Cell = 0.001502697; IkBa_nuc is "IkBa(nuc)";
  species IkBa_NFkB_nuc in Cell = 0.0008525454; IkBa_NFkB_nuc is "IkBa:NFkB(nuc)";
  species IkBa_mRNA in Cell = 0.006847498;
  species IKK_P_IkBa in Cell = 4.720559e-6; IKK_P_IkBa is "IKK[P]:IkBa";
  species TAK1 in Cell = 0.1;
  species CD14LPS in Cell = 0;
  species TLR4LPS_memb in Cell = 0; TLR4LPS_memb is "TLR4LPS(memb)";
  species TLR4_memb in Cell = 0.0157111; TLR4_memb is "TLR4(memb)";
  species CD14LPS_endo in Cell = 0; CD14LPS_endo is "CD14LPS(endo)";
  species TLR4LPS_endo in Cell = 0; TLR4LPS_endo is "TLR4LPS(endo)";
  species TLR4_endo in Cell = 0.0008039816; TLR4_endo is "TLR4(endo)";
  species MYD88 in Cell = 0.1;
  species MYD88_0 in Cell = 0; MYD88_0 is "MYD88*";
  species TRIF in Cell = 0.1;
  species TRIF_0 in Cell = 0; TRIF_0 is "TRIF*";
  species TRAF6_P in Cell = 0; TRAF6_P is "TRAF6[P]";
  species TAK1_P in Cell = 0; TAK1_P is "TAK1[P]";
  species IkBb in Cell = 0.0007851531;
  species IkBb_NFkB in Cell = 0.0004472667; IkBb_NFkB is "IkBb:NFkB";
  species IkBe in Cell = 0.001169188;
  species IkBe_NFkB in Cell = 0.0003886539; IkBe_NFkB is "IkBe:NFkB";
  species IKK_P__IkBb_NFkB in Cell = 3.224906e-7; IKK_P__IkBb_NFkB is "IKK[P]:IkBb:NFkB";
  species IKK_P__IkBe_NFkB in Cell = 2.763414e-7; IKK_P__IkBe_NFkB is "IKK[P]:IkBe:NFkB";
  species IkBb_nuc in Cell = 3.613562e-5; IkBb_nuc is "IkBb(nuc)";
  species IkBb_NFkB_nuc in Cell = 3.099962e-7; IkBb_NFkB_nuc is "IkBb:NFkB(nuc)";
  species IkBe_nuc in Cell = 8.157972e-67; IkBe_nuc is "IkBe(nuc)";
  species IkBe_NFkB_nuc in Cell = -4.674885e-15; IkBe_NFkB_nuc is "IkBe:NFkB(nuc)";
  species IkBb_mRNA in Cell = 0.0005952386;
  species IkBe_mRNA in Cell = 0.0008474683;
  species IKK_P__IkBb in Cell = 1.445028e-7; IKK_P__IkBb is "IKK[P]:IkBb";
  species IKK_P__IkBe in Cell = 3.227516e-7; IKK_P__IkBe is "IKK[P]:IkBe";
  species dimerTLR4LPS_memb in Cell = 0; dimerTLR4LPS_memb is "dimerTLR4LPS(memb)";
  species dimerTLR4LPS_endo in Cell = 0; dimerTLR4LPS_endo is "dimerTLR4LPS(endo)";
  species NFkBDNA_nuc in Cell = 0.01541044; NFkBDNA_nuc is "NFkBDNA(nuc)";
  species NFkB_P in Cell = 9.988053e-5; NFkB_P is "NFkB[P]";
  species NFkB_P__nuc in Cell = 8.848253e-6; NFkB_P__nuc is "NFkB[P](nuc)";
  species IKK_P__IkBa_NFkB_P in Cell = 0.0003574676; IKK_P__IkBa_NFkB_P is "IKK[P]:IkBa:NFkB[P]";
  species NFkBDNA_P__nuc in Cell = 0.006718799; NFkBDNA_P__nuc is "NFkBDNA[P](nuc)";
  species WIP1 in Cell = 0.005009933;
  species WIP1_mRNA in Cell = 0.002504966;
  species LPS in Outer_space = 0.0002557;

  // Parameters:
  var IKK_P__all; IKK_P__all is "IKK[P]_all";
  var NFkB_nuc__all; NFkB_nuc__all is "NFkB(nuc)_all";
  var NFkB_P__all; NFkB_P__all is "NFkB[P]_all";

  // Assignment rules:
  IKK_P__all := IKK_P + IKK_P_IkBa + IKK_P_IkBa_NFkB + IKK_P__IkBa_NFkB_P;
  IkBa_all := IKK_P__IkBa_NFkB_P + IKK_P_IkBa_NFkB + IKK_P_IkBa + IkBa + IkBa_nuc + IkBa_NFkB + IkBa_NFkB_nuc;
  NFkB_P__all := IKK_P__IkBa_NFkB_P + NFkB_P + NFkB_P__nuc + NFkBDNA_P__nuc;
  NFkB_nuc__all := NFkB_nuc + NFkBDNA_nuc + NFkB_P__nuc + NFkBDNA_P__nuc;

  // Reactions:
  Module_3_1a_IkBa_NFkB_Binding: IkBa + NFkB -> IkBa_NFkB; Cell*(Module_3_1a_IkBa_NFkB_Binding_k1*IkBa*NFkB - Module_3_1a_IkBa_NFkB_Binding_k2*IkBa_NFkB); Module_3_1a_IkBa_NFkB_Binding is "Module 3) 1a: IkBa + NFkB Binding";
    Module_3_1a_IkBa_NFkB_Binding_k1 = 30; Module_3_1a_IkBa_NFkB_Binding_k2 = 6e-5;
  reaction_16: IKK_P + IkBa_NFkB -> IKK_P_IkBa_NFkB; Cell*(reaction_16_k1*IKK_P*IkBa_NFkB - reaction_16_k2*IKK_P_IkBa_NFkB); reaction_16 is "Module 3) 12a: IKK[P] + IkBa:NFkB Binding";
    reaction_16_k1 = 11.1; reaction_16_k2 = 0.075;
  reaction_21: IKK_P_IkBa_NFkB => IKK_P + NFkB; Cell*reaction_21_k1*IKK_P_IkBa_NFkB; reaction_21 is "Module 3) 16a: IKK[P]:IkBa:NFkB Catalysis to NFkB";
    reaction_21_k1 = 7.2;
  reaction_24: IkBa_NFkB => NFkB; Cell*reaction_24_k1*IkBa_NFkB; reaction_24 is "Module 3) 7a: IkBa:NFkB Constitutive Degradation";
    reaction_24_k1 = 6e-5;
  reaction_27: NFkB -> NFkB_nuc; Cell*(reaction_27_k1*NFkB - reaction_27_k2*NFkB_nuc); reaction_27 is "Module 3) 18: NFkB Nuclear Import/Export";
    reaction_27_k1 = 5.454; reaction_27_k2 = 0.0048;
  reaction_28: IkBa_nuc + NFkB_nuc -> IkBa_NFkB_nuc; Cell*(reaction_28_k1*IkBa_nuc*NFkB_nuc - reaction_28_k2*IkBa_NFkB_nuc); reaction_28 is "Module 3) 11a: Nuclear IkBa + NFkB Binding";
    reaction_28_k1 = 30; reaction_28_k2 = 6e-5;
  reaction_31: $source_DNA => IkBa_mRNA; Cell*reaction_31_k1*source_DNA; reaction_31 is "Module 3) 2a: Constitutive IkBa mRNA Synthesis";
    reaction_31_k1 = 9.24e-5;
  reaction_32: 2 NFkBDNA_nuc => IkBa_mRNA + 2 NFkBDNA_nuc; Cell*reaction_32_k1*NFkBDNA_nuc^2; reaction_32 is "Module 3) 24a: Inducible IkBa mRNA Synthesis (NFkBDNA(nuc))";
    reaction_32_k1 = 0.377801;
  reaction_33: IkBa_mRNA => $sink; Cell*reaction_33_k1*IkBa_mRNA; reaction_33 is "Module 3) 6a: IkBa mRNA degradation";
    reaction_33_k1 = 0.0348;
  Module_3_10a_IKK_P_IkBa_Binding: IKK_P + IkBa -> IKK_P_IkBa; Cell*(Module_3_10a_IKK_P_IkBa_Binding_k1*IKK_P*IkBa - Module_3_10a_IKK_P_IkBa_Binding_k2*IKK_P_IkBa); Module_3_10a_IKK_P_IkBa_Binding is "Module 3) 10a: IKK[P] + IkBa Binding";
    Module_3_10a_IKK_P_IkBa_Binding_k1 = 1.35; Module_3_10a_IKK_P_IkBa_Binding_k2 = 0.0018;
  Module_3_3a_IkBa_Translation: IkBa_mRNA => IkBa + IkBa_mRNA; Cell*Module_3_3a_IkBa_Translation_k1*IkBa_mRNA; Module_3_3a_IkBa_Translation is "Module 3) 3a: IkBa Translation";
    Module_3_3a_IkBa_Translation_k1 = 0.25;
  Module_3_4a_IkBa_Degradation: IkBa => $sink; Cell*Module_3_4a_IkBa_Degradation_k1*IkBa; Module_3_4a_IkBa_Degradation is "Module 3) 4a: IkBa Degradation";
    Module_3_4a_IkBa_Degradation_k1 = 0.12;
  reaction_41: IkBa -> IkBa_nuc; Cell*(reaction_41_k1*IkBa - reaction_41_k2*IkBa_nuc); reaction_41 is "Module 3) 5a: IkBa Nuclear Import/Export";
    reaction_41_k1 = 0.09; reaction_41_k2 = 0.012;
  reaction_50: IKK_P_IkBa + NFkB -> IKK_P_IkBa_NFkB; Cell*(reaction_50_k1*IKK_P_IkBa*NFkB - reaction_50_k2*IKK_P_IkBa_NFkB); reaction_50 is "Module 3) 13a: IKK[P]:IkBa + NFkB Binding";
    reaction_50_k1 = 30; reaction_50_k2 = 6e-5;
  reaction_51: IkBa_NFkB_nuc -> IkBa_NFkB; Cell*(reaction_51_k1*IkBa_NFkB_nuc - reaction_51_k2*IkBa_NFkB); reaction_51 is "Module 3) 8a: IkBa:NFkB Nuclear Export";
    reaction_51_k1 = 0.828; reaction_51_k2 = 0;
  reaction_56: IKK_P_IkBa => IKK_P; Cell*reaction_56_k1*IKK_P_IkBa; reaction_56 is "Module 3) 15a: IKK[P]:IkBa Catalysis";
    reaction_56_k1 = 1.224;
  Module_3__9a__IkBa_nuc__Degradation: IkBa_nuc => $sink; Cell*Module_3__9a__IkBa_nuc__Degradation_k1*IkBa_nuc; Module_3__9a__IkBa_nuc__Degradation is "Module 3) 9a: IkBa(nuc) Degradation";
    Module_3__9a__IkBa_nuc__Degradation_k1 = 0.12;
  Module_1__8__LPS_CD14_binding: LPS + CD14 -> CD14LPS; Module_1__8__LPS_CD14_binding_k1*LPS*CD14 - Module_1__8__LPS_CD14_binding_k2*CD14LPS; Module_1__8__LPS_CD14_binding is "Module 1) 8: LPS CD14 binding";
    Module_1__8__LPS_CD14_binding_k1 = 8.75; Module_1__8__LPS_CD14_binding_k2 = 0.07;
  Module_1__13__CD14_generation_at_the_membrane: $source_DNA => CD14; Cell*Module_1__13__CD14_generation_at_the_membrane_k1*source_DNA; Module_1__13__CD14_generation_at_the_membrane is "Module 1) 13: CD14 generation at the membrane";
    Module_1__13__CD14_generation_at_the_membrane_k1 = 0.00112;
  Module_1__7__CD14_degradation: CD14 => $sink; Cell*Module_1__7__CD14_degradation_k1*CD14; Module_1__7__CD14_degradation is "Module 1) 7: CD14 degradation";
    Module_1__7__CD14_degradation_k1 = 0.00087793;
  Module_1__5__Association_of_CD14LPS_and_TLR4_atn_the_plamsa_membrane: CD14LPS + TLR4_memb -> TLR4LPS_memb; Cell*(Module_1__5__Association_of_CD14LPS_and_TLR4_atn_the_plamsa_membrane_k1*CD14LPS*TLR4_memb - Module_1__5__Association_of_CD14LPS_and_TLR4_atn_the_plamsa_membrane_k2*TLR4LPS_memb); Module_1__5__Association_of_CD14LPS_and_TLR4_atn_the_plamsa_membrane is "Module 1) 5: Association of CD14LPS and TLR4 atn the plamsa membrane";
    Module_1__5__Association_of_CD14LPS_and_TLR4_atn_the_plamsa_membrane_k1 = 5.543; Module_1__5__Association_of_CD14LPS_and_TLR4_atn_the_plamsa_membrane_k2 = 0.295059;
  Module_1__6__Association_of_CD14LPSen_and_TLR4__in_the_endosome: CD14LPS_endo + TLR4_endo -> TLR4LPS_endo; Cell*(Module_1__6__Association_of_CD14LPSen_and_TLR4__in_the_endosome_k1*CD14LPS_endo*TLR4_endo - Module_1__6__Association_of_CD14LPSen_and_TLR4__in_the_endosome_k2*TLR4LPS_endo); Module_1__6__Association_of_CD14LPSen_and_TLR4__in_the_endosome is "Module 1) 6: Association of CD14LPSen and TLR4 in the endosome";
    Module_1__6__Association_of_CD14LPSen_and_TLR4__in_the_endosome_k1 = 5.543; Module_1__6__Association_of_CD14LPSen_and_TLR4__in_the_endosome_k2 = 0.295059;
  Module_1__3__TLR4_memb__generation: $source_DNA => TLR4_memb; Cell*Module_1__3__TLR4_memb__generation_k1*source_DNA; Module_1__3__TLR4_memb__generation is "Module 1) 3: TLR4(memb) generation";
    Module_1__3__TLR4_memb__generation_k1 = 5.25e-5;
  Module_1__1__CD14LPS_translocation: CD14LPS -> CD14LPS_endo; Cell*(Module_1__1__CD14LPS_translocation_k1*CD14LPS - Module_1__1__CD14LPS_translocation_k2*CD14LPS_endo); Module_1__1__CD14LPS_translocation is "Module 1) 1: CD14LPS translocation";
    Module_1__1__CD14LPS_translocation_k1 = 0.065681; Module_1__1__CD14LPS_translocation_k2 = 0.04;
  Module_1__9__TLR4_translocation: TLR4_memb -> TLR4_endo; Cell*(Module_1__9__TLR4_translocation_k1*TLR4_memb - Module_1__9__TLR4_translocation_k2*TLR4_endo); Module_1__9__TLR4_translocation is "Module 1) 9: TLR4 translocation";
    Module_1__9__TLR4_translocation_k1 = 0.028928; Module_1__9__TLR4_translocation_k2 = 0.5;
  Module_1__15__TLR4LPS_memb__endocytosis: TLR4LPS_memb -> TLR4LPS_endo; Cell*(Module_1__15__TLR4LPS_memb__endocytosis_k1*TLR4LPS_memb - Module_1__15__TLR4LPS_memb__endocytosis_k2*TLR4LPS_endo); Module_1__15__TLR4LPS_memb__endocytosis is "Module 1) 15: TLR4LPS(memb) endocytosis";
    Module_1__15__TLR4LPS_memb__endocytosis_k1 = 0.065681; Module_1__15__TLR4LPS_memb__endocytosis_k2 = 0.04;
  Module_1__2__CD14LPS_endo__degradation: CD14LPS_endo => $sink; Cell*Module_1__2__CD14LPS_endo__degradation_k1*CD14LPS_endo; Module_1__2__CD14LPS_endo__degradation is "Module 1) 2: CD14LPS(endo) degradation";
    Module_1__2__CD14LPS_endo__degradation_k1 = 0.03;
  Module_1__10__TLR4_endo__degradation: TLR4_endo => $sink; Cell*Module_1__10__TLR4_endo__degradation_k1*TLR4_endo; Module_1__10__TLR4_endo__degradation is "Module 1) 10: TLR4(endo) degradation";
    Module_1__10__TLR4_endo__degradation_k1 = 0.0653;
  Module_1__4__TLR4LSP_endo__degradation: TLR4LPS_endo => $sink; Cell*Module_1__4__TLR4LSP_endo__degradation_k1*TLR4LPS_endo; Module_1__4__TLR4LSP_endo__degradation is "Module 1) 4: TLR4LSP(endo) degradation";
    Module_1__4__TLR4LSP_endo__degradation_k1 = 0.0145;
  Module_2__1__MYD88_Activation_by_dimerTLR4LPS_memb: MYD88 => MYD88_0; Cell*Hill_modified(V, MYD88, dimerTLR4LPS_memb, h, Shalve); Module_2__1__MYD88_Activation_by_dimerTLR4LPS_memb is "Module 2) 1: MYD88 Activation by dimerTLR4LPS(memb)";  // modifiers: dimerTLR4LPS_memb
    V = 52.8978; h = 3; Shalve = 0.00175;
  Module_2__2__MYD88_Deactivation: MYD88_0 => MYD88; Cell*Module_2__2__MYD88_Deactivation_k1*MYD88_0; Module_2__2__MYD88_Deactivation is "Module 2) 2: MYD88 Deactivation";
    Module_2__2__MYD88_Deactivation_k1 = 150.701;
  Module_2__3__TRIF_activation_by_dimerTLR4LPS_endo: TRIF -> TRIF_0; Cell*Mass_action_with_modulation(Module_2__3__TRIF_activation_by_dimerTLR4LPS_endo_k1, TRIF, dimerTLR4LPS_endo, Module_2__3__TRIF_activation_by_dimerTLR4LPS_endo_k2, TRIF_0); Module_2__3__TRIF_activation_by_dimerTLR4LPS_endo is "Module 2) 3: TRIF activation by dimerTLR4LPS(endo)";  // modifiers: dimerTLR4LPS_endo
    Module_2__3__TRIF_activation_by_dimerTLR4LPS_endo_k1 = 250; Module_2__3__TRIF_activation_by_dimerTLR4LPS_endo_k2 = 1.45783;
  Module_2__4__TRAF6_activation_by_MYD88: TRAF6 => TRAF6_P; Cell*Mass_action_with_modulation_2(Module_2__4__TRAF6_activation_by_MYD88_k1, TRAF6, MYD88_0); Module_2__4__TRAF6_activation_by_MYD88 is "Module 2) 4: TRAF6 activation by MYD88";  // modifiers: MYD88_0
    Module_2__4__TRAF6_activation_by_MYD88_k1 = 200;
  Module_2__5__TRAF6_activation_by_TRIF: TRAF6 => TRAF6_P; Cell*Mass_action_with_modulation_2(Module_2__5__TRAF6_activation_by_TRIF_k1, TRAF6, TRIF_0); Module_2__5__TRAF6_activation_by_TRIF is "Module 2) 5: TRAF6 activation by TRIF";  // modifiers: TRIF_0
    Module_2__5__TRAF6_activation_by_TRIF_k1 = 50;
  Module_2__7__TRAF6_deactivation: TRAF6_P => TRAF6; Cell*Module_2__7__TRAF6_deactivation_k1*TRAF6_P; Module_2__7__TRAF6_deactivation is "Module 2) 7: TRAF6 deactivation";
    Module_2__7__TRAF6_deactivation_k1 = 10;
  Module_2__6__TAK1_activation_by_TRAF6: TAK1 -> TAK1_P; Cell*Mass_action_with_modulation(Module_2__6__TAK1_activation_by_TRAF6_k1, TAK1, TRAF6_P, Module_2__6__TAK1_activation_by_TRAF6_k2, TAK1_P); Module_2__6__TAK1_activation_by_TRAF6 is "Module 2) 6: TAK1 activation by TRAF6";  // modifiers: TRAF6_P
    Module_2__6__TAK1_activation_by_TRAF6_k1 = 8; Module_2__6__TAK1_activation_by_TRAF6_k2 = 3.87385;
  Module_2__8__IKK_activation_by_TAK1: IKK => IKK_P; Cell*Mass_action_with_modulation_2(Module_2__8__IKK_activation_by_TAK1_k1, IKK, TAK1_P); Module_2__8__IKK_activation_by_TAK1 is "Module 2) 8: IKK activation by TAK1";  // modifiers: TAK1_P
    Module_2__8__IKK_activation_by_TAK1_k1 = 200;
  Module_2__10__IKK_deactivation: IKK_P => IKK; Cell*Module_2__10__IKK_deactivation_k1*IKK_P; Module_2__10__IKK_deactivation is "Module 2) 9: IKK deactivation";
    Module_2__10__IKK_deactivation_k1 = 6;
  Module_2__9__IKK_activation_by_unknown_signal: IKK => IKK_P; Cell*Module_2__9__IKK_activation_by_unknown_signal_k1*IKK; Module_2__9__IKK_activation_by_unknown_signal is "Module 2) 8: IKK activation by unknown signal";
    Module_2__9__IKK_activation_by_unknown_signal_k1 = 0.038;
  Module_3__1b__IkBb___NFkB_Binding: IkBb + NFkB -> IkBb_NFkB; Cell*(Module_3__1b__IkBb___NFkB_Binding_k1*IkBb*NFkB - Module_3__1b__IkBb___NFkB_Binding_k2*IkBb_NFkB); Module_3__1b__IkBb___NFkB_Binding is "Module 3) 1b: IkBb + NFkB Binding";
    Module_3__1b__IkBb___NFkB_Binding_k1 = 30; Module_3__1b__IkBb___NFkB_Binding_k2 = 6e-5;
  Module_3__1e__IkBe___NFkB_Binding: IkBe + NFkB -> IkBe_NFkB; Cell*(Module_3__1e__IkBe___NFkB_Binding_k1*IkBe*NFkB - Module_3__1e__IkBe___NFkB_Binding_k2*IkBe_NFkB); Module_3__1e__IkBe___NFkB_Binding is "Module 3) 1e: IkBe + NFkB Binding";
    Module_3__1e__IkBe___NFkB_Binding_k1 = 30; Module_3__1e__IkBe___NFkB_Binding_k2 = 6e-5;
  Module_3__12b__IKK_P____IkBb_NFkB_Binding: IKK_P + IkBb_NFkB -> IKK_P__IkBb_NFkB; Cell*(Module_3__12b__IKK_P____IkBb_NFkB_Binding_k1*IKK_P*IkBb_NFkB - Module_3__12b__IKK_P____IkBb_NFkB_Binding_k2*IKK_P__IkBb_NFkB); Module_3__12b__IKK_P____IkBb_NFkB_Binding is "Module 3) 12b: IKK[P] + IkBb:NFkB Binding";
    Module_3__12b__IKK_P____IkBb_NFkB_Binding_k1 = 2.88; Module_3__12b__IKK_P____IkBb_NFkB_Binding_k2 = 0.105;
  Module_3__12e__IKK_P____IkBe_NFkB_Binding: IKK_P + IkBe_NFkB -> IKK_P__IkBe_NFkB; Cell*(Module_3__12e__IKK_P____IkBe_NFkB_Binding_k1*IKK_P*IkBe_NFkB - Module_3__12e__IKK_P____IkBe_NFkB_Binding_k2*IKK_P__IkBe_NFkB); Module_3__12e__IKK_P____IkBe_NFkB_Binding is "Module 3) 12e: IKK[P] + IkBe:NFkB Binding";
    Module_3__12e__IKK_P____IkBe_NFkB_Binding_k1 = 4.2; Module_3__12e__IKK_P____IkBe_NFkB_Binding_k2 = 0.105;
  Module_3__16b__IKK_P__IkBb_NFkB_Catalysis_to_NFkB: IKK_P__IkBb_NFkB => IKK_P + NFkB; Cell*Module_3__16b__IKK_P__IkBb_NFkB_Catalysis_to_NFkB_k1*IKK_P__IkBb_NFkB; Module_3__16b__IKK_P__IkBb_NFkB_Catalysis_to_NFkB is "Module 3) 16b: IKK[P]:IkBb:NFkB Catalysis to NFkB";
    Module_3__16b__IKK_P__IkBb_NFkB_Catalysis_to_NFkB_k1 = 2.4;
  Module_3__16e__IKK_P__IkBe_NFkB_Catalysis_to_NFkB: IKK_P__IkBe_NFkB => IKK_P + NFkB; Cell*Module_3__16e__IKK_P__IkBe_NFkB_Catalysis_to_NFkB_k1*IKK_P__IkBe_NFkB; Module_3__16e__IKK_P__IkBe_NFkB_Catalysis_to_NFkB is "Module 3) 16e: IKK[P]:IkBe:NFkB Catalysis to NFkB";
    Module_3__16e__IKK_P__IkBe_NFkB_Catalysis_to_NFkB_k1 = 3.6;
  Module_3__7b__IkBb_NFkB_Constitutive_Degradation: IkBb_NFkB => NFkB; Cell*Module_3__7b__IkBb_NFkB_Constitutive_Degradation_k1*IkBb_NFkB; Module_3__7b__IkBb_NFkB_Constitutive_Degradation is "Module 3) 7b: IkBb:NFkB Constitutive Degradation";
    Module_3__7b__IkBb_NFkB_Constitutive_Degradation_k1 = 6e-5;
  Module_3__7e__IkBe_NFkB_Constitutive_Degradation: IkBe_NFkB => NFkB; Cell*Module_3__7e__IkBe_NFkB_Constitutive_Degradation_k1*IkBe_NFkB; Module_3__7e__IkBe_NFkB_Constitutive_Degradation is "Module 3) 7e: IkBe:NFkB Constitutive Degradation";
    Module_3__7e__IkBe_NFkB_Constitutive_Degradation_k1 = 6e-5;
  Module_3__11b__Nuclear_IkBb___NFkB_Binding: IkBb_nuc + NFkB_nuc -> IkBb_NFkB_nuc; Cell*(Module_3__11b__Nuclear_IkBb___NFkB_Binding_k1*IkBb_nuc*NFkB_nuc - Module_3__11b__Nuclear_IkBb___NFkB_Binding_k2*IkBb_NFkB_nuc); Module_3__11b__Nuclear_IkBb___NFkB_Binding is "Module 3) 11b: Nuclear IkBb + NFkB Binding";
    Module_3__11b__Nuclear_IkBb___NFkB_Binding_k1 = 30; Module_3__11b__Nuclear_IkBb___NFkB_Binding_k2 = 6e-5;
  Module_3__11e__Nuclear_IkBe___NFkB_Binding: IkBe_nuc + NFkB_nuc -> IkBe_NFkB_nuc; Cell*(Module_3__11e__Nuclear_IkBe___NFkB_Binding_k1*IkBe_nuc*NFkB_nuc - Module_3__11e__Nuclear_IkBe___NFkB_Binding_k2*IkBe_NFkB_nuc); Module_3__11e__Nuclear_IkBe___NFkB_Binding is "Module 3) 11e: Nuclear IkBe + NFkB Binding";
    Module_3__11e__Nuclear_IkBe___NFkB_Binding_k1 = 30; Module_3__11e__Nuclear_IkBe___NFkB_Binding_k2 = 6e-5;
  Module_3__2b__Constitutive_IkBb_mRNA_Synthesis: $source_DNA => IkBb_mRNA; Cell*Module_3__2b__Constitutive_IkBb_mRNA_Synthesis_k1*source_DNA; Module_3__2b__Constitutive_IkBb_mRNA_Synthesis is "Module 3) 2b: Constitutive IkBb mRNA Synthesis";
    Module_3__2b__Constitutive_IkBb_mRNA_Synthesis_k1 = 1e-5;
  Module_3__2e__Constitutive_IkBe_mRNA_Synthesis: $source_DNA => IkBe_mRNA; Cell*Module_3__2e__Constitutive_IkBe_mRNA_Synthesis_k1*source_DNA; Module_3__2e__Constitutive_IkBe_mRNA_Synthesis is "Module 3) 2e: Constitutive IkBe mRNA Synthesis";
    Module_3__2e__Constitutive_IkBe_mRNA_Synthesis_k1 = 1e-5;
  Module_3__24b__Inducible_IkBb_mRNA_Synthesis: 2 NFkB_nuc => IkBb_mRNA + 2 NFkBDNA_nuc; Cell*Module_3__24b__Inducible_IkBb_mRNA_Synthesis_k1*NFkB_nuc^2; Module_3__24b__Inducible_IkBb_mRNA_Synthesis is "Module 3) 24b: Inducible IkBb mRNA Synthesis";
    Module_3__24b__Inducible_IkBb_mRNA_Synthesis_k1 = 0.0006;
  Module_3__24e__Inducible_IkBe_mRNA_Synthesis: 2 NFkB_nuc => IkBe_mRNA + 2 NFkBDNA_nuc; Cell*Module_3__24e__Inducible_IkBe_mRNA_Synthesis_k1*NFkB_nuc^2; Module_3__24e__Inducible_IkBe_mRNA_Synthesis is "Module 3) 24e: Inducible IkBe mRNA Synthesis";
    Module_3__24e__Inducible_IkBe_mRNA_Synthesis_k1 = 0.009;
  Module_3__6b__IkBb_mRNA_degradation: IkBb_mRNA => $sink; Cell*Module_3__6b__IkBb_mRNA_degradation_k1*IkBb_mRNA; Module_3__6b__IkBb_mRNA_degradation is "Module 3) 6b: IkBb mRNA degradation";
    Module_3__6b__IkBb_mRNA_degradation_k1 = 0.0168;
  Module_3__6e__IkBe_mRNA_degradation: IkBe_mRNA => $sink; Cell*Module_3__6e__IkBe_mRNA_degradation_k1*IkBe_mRNA; Module_3__6e__IkBe_mRNA_degradation is "Module 3) 6e: IkBe mRNA degradation";
    Module_3__6e__IkBe_mRNA_degradation_k1 = 0.0118;
  Module_3__10b__IKK_P____IkBb_Binding: IKK_P + IkBb -> IKK_P__IkBb; Cell*(Module_3__10b__IKK_P____IkBb_Binding_k1*IKK_P*IkBb - Module_3__10b__IKK_P____IkBb_Binding_k2*IKK_P__IkBb); Module_3__10b__IKK_P____IkBb_Binding is "Module 3) 10b: IKK[P] + IkBb Binding";
    Module_3__10b__IKK_P____IkBb_Binding_k1 = 0.36; Module_3__10b__IKK_P____IkBb_Binding_k2 = 0.0018;
  Module_3__10e__IKK_P____IkBe_Binding: IKK_P + IkBe -> IKK_P__IkBe; Cell*(Module_3__10e__IKK_P____IkBe_Binding_k1*IKK_P*IkBe - Module_3__10e__IKK_P____IkBe_Binding_k2*IKK_P__IkBe); Module_3__10e__IKK_P____IkBe_Binding is "Module 3) 10e: IKK[P] + IkBe Binding";
    Module_3__10e__IKK_P____IkBe_Binding_k1 = 0.54; Module_3__10e__IKK_P____IkBe_Binding_k2 = 0.0018;
  Module_3__3b__IkBb_Translation: IkBb_mRNA => IkBb + IkBb_mRNA; Cell*Module_3__3b__IkBb_Translation_k1*IkBb_mRNA; Module_3__3b__IkBb_Translation is "Module 3) 3b: IkBb Translation";
    Module_3__3b__IkBb_Translation_k1 = 0.25;
  Module_3__3e__IkBe_Translation: IkBe_mRNA => IkBe + IkBe_mRNA; Cell*Module_3__3e__IkBe_Translation_k1*IkBe_mRNA; Module_3__3e__IkBe_Translation is "Module 3) 3e: IkBe Translation";
    Module_3__3e__IkBe_Translation_k1 = 0.25;
  Module_3__4e__IkBe_Degradation: IkBe => $sink; Cell*Module_3__4e__IkBe_Degradation_k1*IkBe; Module_3__4e__IkBe_Degradation is "Module 3) 4e: IkBe Degradation";
    Module_3__4e__IkBe_Degradation_k1 = 0.18;
  Module_3__4b__IkBb_Degradation: IkBb => $sink; Cell*Module_3__4b__IkBb_Degradation_k1*IkBb; Module_3__4b__IkBb_Degradation is "Module 3) 4b: IkBb Degradation";
    Module_3__4b__IkBb_Degradation_k1 = 0.18;
  Module_3__9b__IkBb_nuc__Degradation: IkBb_nuc => $sink; Cell*Module_3__9b__IkBb_nuc__Degradation_k1*IkBb_nuc; Module_3__9b__IkBb_nuc__Degradation is "Module 3) 9b: IkBb(nuc) Degradation";
    Module_3__9b__IkBb_nuc__Degradation_k1 = 0.18;
  Module_3__9e__IkBe_nuc__Degradation: IkBe_nuc => $sink; Cell*Module_3__9e__IkBe_nuc__Degradation_k1*IkBe_nuc; Module_3__9e__IkBe_nuc__Degradation is "Module 3) 9e: IkBe(nuc) Degradation";
    Module_3__9e__IkBe_nuc__Degradation_k1 = 0.18;
  Module_3__5b__IkBb_Nuclear_Import_Export: IkBb -> IkBb_nuc; Cell*(Module_3__5b__IkBb_Nuclear_Import_Export_k1*IkBb - Module_3__5b__IkBb_Nuclear_Import_Export_k2*IkBb_nuc); Module_3__5b__IkBb_Nuclear_Import_Export is "Module 3) 5b: IkBb Nuclear Import/Export";
    Module_3__5b__IkBb_Nuclear_Import_Export_k1 = 0.009; Module_3__5b__IkBb_Nuclear_Import_Export_k2 = 0.012;
  Module_3__5e__IkBe_Nuclear_Import_Export: IkBa -> IkBa_nuc; Cell*(Module_3__5e__IkBe_Nuclear_Import_Export_k1*IkBa - Module_3__5e__IkBe_Nuclear_Import_Export_k2*IkBa_nuc); Module_3__5e__IkBe_Nuclear_Import_Export is "Module 3) 5e: IkBe Nuclear Import/Export";
    Module_3__5e__IkBe_Nuclear_Import_Export_k1 = 0.045; Module_3__5e__IkBe_Nuclear_Import_Export_k2 = 0.012;
  Module_3__13b__IKK_P__IkBb___NFkB_Binding: IKK_P__IkBb + NFkB -> IKK_P__IkBb_NFkB; Cell*(Module_3__13b__IKK_P__IkBb___NFkB_Binding_k1*IKK_P__IkBb*NFkB - Module_3__13b__IKK_P__IkBb___NFkB_Binding_k2*IKK_P__IkBb_NFkB); Module_3__13b__IKK_P__IkBb___NFkB_Binding is "Module 3) 13b: IKK[P]:IkBb + NFkB Binding";
    Module_3__13b__IKK_P__IkBb___NFkB_Binding_k1 = 30; Module_3__13b__IKK_P__IkBb___NFkB_Binding_k2 = 6e-5;
  Module_3__13e__IKK_P__IkBe___NFkB_Binding: IKK_P__IkBe + NFkB -> IKK_P__IkBe_NFkB; Cell*(Module_3__13e__IKK_P__IkBe___NFkB_Binding_k1*IKK_P__IkBe*NFkB - Module_3__13e__IKK_P__IkBe___NFkB_Binding_k2*IKK_P__IkBe_NFkB); Module_3__13e__IKK_P__IkBe___NFkB_Binding is "Module 3) 13e: IKK[P]:IkBe + NFkB Binding";
    Module_3__13e__IKK_P__IkBe___NFkB_Binding_k1 = 30; Module_3__13e__IKK_P__IkBe___NFkB_Binding_k2 = 6e-5;
  Module_3__8b__IkBb_NFkB_Nuclear_Export: IkBb_NFkB_nuc -> IkBb_NFkB; Cell*(Module_3__8b__IkBb_NFkB_Nuclear_Export_k1*IkBb_NFkB_nuc - Module_3__8b__IkBb_NFkB_Nuclear_Export_k2*IkBb_NFkB); Module_3__8b__IkBb_NFkB_Nuclear_Export is "Module 3) 8b: IkBb:NFkB Nuclear Export";
    Module_3__8b__IkBb_NFkB_Nuclear_Export_k1 = 0.414; Module_3__8b__IkBb_NFkB_Nuclear_Export_k2 = 0;
  Module_3__8e__IkBe_NFkB_Nuclear_Export: IkBe_NFkB_nuc -> IkBe_NFkB; Cell*(Module_3__8e__IkBe_NFkB_Nuclear_Export_k1*IkBe_NFkB_nuc - Module_3__8e__IkBe_NFkB_Nuclear_Export_k2*IkBe_NFkB); Module_3__8e__IkBe_NFkB_Nuclear_Export is "Module 3) 8e: IkBe:NFkB Nuclear Export";
    Module_3__8e__IkBe_NFkB_Nuclear_Export_k1 = 0.414; Module_3__8e__IkBe_NFkB_Nuclear_Export_k2 = 0;
  Module_3__15b__IKK_P__IkBb_Catalysis: IKK_P__IkBb => IKK_P; Cell*Module_3__15b__IKK_P__IkBb_Catalysis_k1*IKK_P__IkBb; Module_3__15b__IKK_P__IkBb_Catalysis is "Module 3) 15b: IKK[P]:IkBb Catalysis";
    Module_3__15b__IKK_P__IkBb_Catalysis_k1 = 1.224;
  Module_3__15e__IKK_P__IkBe_Catalysis: IKK_P__IkBe => IKK_P; Cell*Module_3__15e__IKK_P__IkBe_Catalysis_k1*IKK_P__IkBe; Module_3__15e__IKK_P__IkBe_Catalysis is "Module 3) 15e: IKK[P]:IkBe Catalysis";
    Module_3__15e__IKK_P__IkBe_Catalysis_k1 = 1.224;
  Module_1__12__TLR4LPS_memb__dimerization: 2 TLR4LPS_memb -> dimerTLR4LPS_memb; Cell*(Module_1__12__TLR4LPS_memb__dimerization_k1*TLR4LPS_memb^2 - Module_1__12__TLR4LPS_memb__dimerization_k2*dimerTLR4LPS_memb); Module_1__12__TLR4LPS_memb__dimerization is "Module 1) 12: TLR4LPS(memb) dimerization";
    Module_1__12__TLR4LPS_memb__dimerization_k1 = 21; Module_1__12__TLR4LPS_memb__dimerization_k2 = 0.5;
  Module_1__11__TLR4LPS_endo__dimerization: 2 TLR4LPS_endo -> dimerTLR4LPS_endo; Cell*(Module_1__11__TLR4LPS_endo__dimerization_k1*TLR4LPS_endo^2 - Module_1__11__TLR4LPS_endo__dimerization_k2*dimerTLR4LPS_endo); Module_1__11__TLR4LPS_endo__dimerization is "Module 1) 11: TLR4LPS(endo) dimerization";
    Module_1__11__TLR4LPS_endo__dimerization_k1 = 21; Module_1__11__TLR4LPS_endo__dimerization_k2 = 0.5;
  Module_1__14__dimerTLR4LPS_memb__endocytosis: dimerTLR4LPS_memb -> dimerTLR4LPS_endo; Cell*(Module_1__14__dimerTLR4LPS_memb__endocytosis_k1*dimerTLR4LPS_memb - Module_1__14__dimerTLR4LPS_memb__endocytosis_k2*dimerTLR4LPS_endo); Module_1__14__dimerTLR4LPS_memb__endocytosis is "Module 1) 14: dimerTLR4LPS(memb) endocytosis";
    Module_1__14__dimerTLR4LPS_memb__endocytosis_k1 = 0.131; Module_1__14__dimerTLR4LPS_memb__endocytosis_k2 = 0.08;
  Module_3__20__NFkB_to_DNA_binding: NFkB_nuc -> NFkBDNA_nuc; Cell*(Module_3__20__NFkB_to_DNA_binding_k1*NFkB_nuc - Module_3__20__NFkB_to_DNA_binding_k2*NFkBDNA_nuc); Module_3__20__NFkB_to_DNA_binding is "Module 3) 20: NFkB to DNA binding";
    Module_3__20__NFkB_to_DNA_binding_k1 = 60; Module_3__20__NFkB_to_DNA_binding_k2 = 0.45;
  Module_3__19__NFkB_P__Nuclear_Import_Export: NFkB_P -> NFkB_P__nuc; Cell*(Module_3__19__NFkB_P__Nuclear_Import_Export_k1*NFkB_P - Module_3__19__NFkB_P__Nuclear_Import_Export_k2*NFkB_P__nuc); Module_3__19__NFkB_P__Nuclear_Import_Export is "Module 3) 19: NFkB[P] Nuclear Import/Export";
    Module_3__19__NFkB_P__Nuclear_Import_Export_k1 = 5.454; Module_3__19__NFkB_P__Nuclear_Import_Export_k2 = 0.0048;
  Module_3__11aP__Nuclear_IkBa___NFkB_P__Binding: IkBa_nuc + NFkB_P__nuc -> IkBa_NFkB_nuc; Cell*(Module_3__11aP__Nuclear_IkBa___NFkB_P__Binding_k1*IkBa_nuc*NFkB_P__nuc - Module_3__11aP__Nuclear_IkBa___NFkB_P__Binding_k2*IkBa_NFkB_nuc); Module_3__11aP__Nuclear_IkBa___NFkB_P__Binding is "Module 3) 11aP: Nuclear IkBa + NFkB[P] Binding";
    Module_3__11aP__Nuclear_IkBa___NFkB_P__Binding_k1 = 30; Module_3__11aP__Nuclear_IkBa___NFkB_P__Binding_k2 = 6e-5;
  Module_3__21__NFkB_P__to_DNA_binding: NFkB_P__nuc -> NFkBDNA_P__nuc; Cell*(Module_3__21__NFkB_P__to_DNA_binding_k1*NFkB_P__nuc - Module_3__21__NFkB_P__to_DNA_binding_k2*NFkBDNA_P__nuc); Module_3__21__NFkB_P__to_DNA_binding is "Module 3) 21: NFkB[P] to DNA binding";
    Module_3__21__NFkB_P__to_DNA_binding_k1 = 60; Module_3__21__NFkB_P__to_DNA_binding_k2 = 1.63763e-5;
  Module_3__1aP__IkBa___NFkB_P__Binding: IkBa + NFkB_P -> IkBa_NFkB; Cell*(Module_3__1aP__IkBa___NFkB_P__Binding_k1*IkBa*NFkB_P - Module_3__1aP__IkBa___NFkB_P__Binding_k2*IkBa_NFkB); Module_3__1aP__IkBa___NFkB_P__Binding is "Module 3) 1aP: IkBa + NFkB[P] Binding";
    Module_3__1aP__IkBa___NFkB_P__Binding_k1 = 0; Module_3__1aP__IkBa___NFkB_P__Binding_k2 = 0;
  Module_3__23__NFkB_P__nuc__dephosphorylation: NFkB_P__nuc => NFkB_nuc; Cell*Module_3__23__NFkB_P__nuc__dephosphorylation_k1*NFkB_P__nuc; Module_3__23__NFkB_P__nuc__dephosphorylation is "Module 3) 23: NFkB[P](nuc) dephosphorylation";
    Module_3__23__NFkB_P__nuc__dephosphorylation_k1 = 0.031;
  Module_3__17__IKK_P__IkBa_NFkB_P__Catalysis_to_NFkB_P: IKK_P__IkBa_NFkB_P => IKK_P + NFkB_P; Cell*Module_3__17__IKK_P__IkBa_NFkB_P__Catalysis_to_NFkB_P_k1*IKK_P__IkBa_NFkB_P; Module_3__17__IKK_P__IkBa_NFkB_P__Catalysis_to_NFkB_P is "Module 3) 17: IKK[P]:IkBa:NFkB[P] Catalysis to NFkB[P]";
    Module_3__17__IKK_P__IkBa_NFkB_P__Catalysis_to_NFkB_P_k1 = 1.944;
  Module_3__11aP2__IKK_P__IkBa___NFkB_P__Binding: IKK_P_IkBa + NFkB_P -> IKK_P__IkBa_NFkB_P; Cell*(Module_3__11aP2__IKK_P__IkBa___NFkB_P__Binding_k1*IKK_P_IkBa*NFkB_P - Module_3__11aP2__IKK_P__IkBa___NFkB_P__Binding_k2*IKK_P__IkBa_NFkB_P); Module_3__11aP2__IKK_P__IkBa___NFkB_P__Binding is "Module 3) 13aP: IKK[P]:IkBa + NFkB[P] Binding";
    Module_3__11aP2__IKK_P__IkBa___NFkB_P__Binding_k1 = 30; Module_3__11aP2__IKK_P__IkBa___NFkB_P__Binding_k2 = 6e-5;
  Module_3__14__IKK_P__IkBa_NFkB_phosphorylation: IKK_P_IkBa_NFkB => IKK_P__IkBa_NFkB_P; Cell*Module_3__14__IKK_P__IkBa_NFkB_phosphorylation_k1*IKK_P_IkBa_NFkB; Module_3__14__IKK_P__IkBa_NFkB_phosphorylation is "Module 3) 14: IKK[P]:IkBa:NFkB phosphorylation";
    Module_3__14__IKK_P__IkBa_NFkB_phosphorylation_k1 = 1000;
  Module_3__22__NFkB_P__dephosphorylation: NFkB_P => NFkB; Cell*Module_3__22__NFkB_P__dephosphorylation_k1*NFkB_P; Module_3__22__NFkB_P__dephosphorylation is "Module 3) 22: NFkB[P] dephosphorylation";
    Module_3__22__NFkB_P__dephosphorylation_k1 = 0.001;
  TNF_mRNA_syntesis_module__Inducible_TNFa_mRNA_Synthesis_DNA: 2 NFkBDNA_nuc => WIP1_mRNA + 2 NFkBDNA_nuc; Cell*TNF_mRNA_syntesis_module__Inducible_TNFa_mRNA_Synthesis_DNA_k1*NFkBDNA_nuc^2; TNF_mRNA_syntesis_module__Inducible_TNFa_mRNA_Synthesis_DNA is "Proposal module) 25: Inducible WIP1 mRNA Synthesis DNA";
    TNF_mRNA_syntesis_module__Inducible_TNFa_mRNA_Synthesis_DNA_k1 = 0.680996;
  TNF_mRNA_syntesis_module__TNFa_mRNA_degradation: WIP1_mRNA => $sink; Cell*TNF_mRNA_syntesis_module__TNFa_mRNA_degradation_k1*WIP1_mRNA; TNF_mRNA_syntesis_module__TNFa_mRNA_degradation is "Proposal module) 27: WIP1 mRNA degradation";
    TNF_mRNA_syntesis_module__TNFa_mRNA_degradation_k1 = 0.0927095;
  Module_3__23___DNA__NFkBDNA_P__nuc__dephosphorylation: NFkBDNA_P__nuc => NFkBDNA_nuc; Cell*Module_3__23___DNA__NFkBDNA_P__nuc__dephosphorylation_k1*NFkBDNA_P__nuc; Module_3__23___DNA__NFkBDNA_P__nuc__dephosphorylation is "Module 3) 23 - DNA: NFkBDNA[P](nuc) dephosphorylation";
    Module_3__23___DNA__NFkBDNA_P__nuc__dephosphorylation_k1 = 0.079;
  Module_3__24aPP__Inducible_IkBa_mRNA_Synthesis__NFkBDNA_P__nuc_: 2 NFkBDNA_P__nuc => IkBa_mRNA + 2 NFkBDNA_P__nuc; Cell*Module_3__24aPP__Inducible_IkBa_mRNA_Synthesis__NFkBDNA_P__nuc__k1*NFkBDNA_P__nuc^2; Module_3__24aPP__Inducible_IkBa_mRNA_Synthesis__NFkBDNA_P__nuc_ is "Module 3) 24aPP: Inducible IkBa mRNA Synthesis (NFkBDNA[P](nuc))";
    Module_3__24aPP__Inducible_IkBa_mRNA_Synthesis__NFkBDNA_P__nuc__k1 = 0.377801;
  Module_3__11___DNA__Nuclear_IkBa___NFkBDNA_Binding: IkBa_nuc + NFkBDNA_nuc -> IkBa_NFkB_nuc; Cell*(Module_3__11___DNA__Nuclear_IkBa___NFkBDNA_Binding_k1*IkBa_nuc*NFkBDNA_nuc - Module_3__11___DNA__Nuclear_IkBa___NFkBDNA_Binding_k2*IkBa_NFkB_nuc); Module_3__11___DNA__Nuclear_IkBa___NFkBDNA_Binding is "Module 3) 11 - DNA: Nuclear IkBa + NFkBDNA Binding";
    Module_3__11___DNA__Nuclear_IkBa___NFkBDNA_Binding_k1 = 30.24; Module_3__11___DNA__Nuclear_IkBa___NFkBDNA_Binding_k2 = 1e-6;
  Module_3__24aP__Inducible_IkBa_mRNA_Synthesis: NFkBDNA_P__nuc + NFkBDNA_nuc => IkBa_mRNA + NFkBDNA_P__nuc + NFkBDNA_nuc; Cell*Module_3__24aP__Inducible_IkBa_mRNA_Synthesis_k1*NFkBDNA_P__nuc*NFkBDNA_nuc; Module_3__24aP__Inducible_IkBa_mRNA_Synthesis is "Module 3) 24aP: Inducible IkBa mRNA Synthesis";
    Module_3__24aP__Inducible_IkBa_mRNA_Synthesis_k1 = 0.377801;
  Proposal_module__29__WIP1_synthesis: WIP1_mRNA => WIP1 + WIP1_mRNA; Cell*Proposal_module__29__WIP1_synthesis_k1*WIP1_mRNA; Proposal_module__29__WIP1_synthesis is "Proposal module) 29: WIP1 synthesis";
    Proposal_module__29__WIP1_synthesis_k1 = 0.2;
  Proposal_module__28__WIP1_degradation: WIP1 => $sink; Cell*Proposal_module__28__WIP1_degradation_k1*WIP1; Proposal_module__28__WIP1_degradation is "Proposal module) 28: WIP1 degradation";
    Proposal_module__28__WIP1_degradation_k1 = 0.1;
  Proposal_module__26__Inducible_WIP1_mRNA_Synthesis_DNA__NFkBDNA_P_: NFkBDNA_P__nuc + NFkBDNA_nuc => WIP1_mRNA + NFkBDNA_P__nuc + NFkBDNA_nuc; Cell*Proposal_module__26__Inducible_WIP1_mRNA_Synthesis_DNA__NFkBDNA_P__k1*NFkBDNA_P__nuc*NFkBDNA_nuc; Proposal_module__26__Inducible_WIP1_mRNA_Synthesis_DNA__NFkBDNA_P_ is "Proposal module) 26: Inducible WIP1 mRNA Synthesis DNA (NFkBDNA[P])";
    Proposal_module__26__Inducible_WIP1_mRNA_Synthesis_DNA__NFkBDNA_P__k1 = 0.680996;
  Module_3__23__NFkB_P__nuc__dephosphorylation_by_WIP1: NFkB_P__nuc => NFkB_nuc; Cell*Mass_action_with_modulation_2(Module_3__23__NFkB_P__nuc__dephosphorylation_by_WIP1_k1, NFkB_P__nuc, WIP1); Module_3__23__NFkB_P__nuc__dephosphorylation_by_WIP1 is "Module 3) 23: NFkB[P](nuc) dephosphorylation by WIP1";  // modifiers: WIP1
    Module_3__23__NFkB_P__nuc__dephosphorylation_by_WIP1_k1 = 300;
  Module_3__22__NFkB_P__dephosphorylation_by_WIP1: NFkB_P => NFkB; Cell*Mass_action_with_modulation_2(Module_3__22__NFkB_P__dephosphorylation_by_WIP1_k1, NFkB_P, WIP1); Module_3__22__NFkB_P__dephosphorylation_by_WIP1 is "Module 3) 22: NFkB[P] dephosphorylation by WIP1";  // modifiers: WIP1
    Module_3__22__NFkB_P__dephosphorylation_by_WIP1_k1 = 300;

  // Unit definitions:
  unit time = 60 second;
  unit substance = 1e-6 mole;
end
