// SBML level 2 version 4

model New_Model()
  // Mushayabasa2011- Modeling gonirrhea and HIV co-interaction
  // A mathematical model was designed to explore the co-interaction of gonorrhea and HIV in the presence of antiretroviral therapy and gonorrhea treatment. Qualitative and comprehensive mathematical techniques have been used to analyse the model.
  // hasProperty mamo:MAMO_0000046

  // Compartments:
  compartment compartment = 1;

  // Species:
  species $S in compartment = 500;
  species $I_G in compartment = 50000;
  species $I_H in compartment = 0;
  species $I_GH in compartment = 0;
  species $A_H in compartment = 0;
  species $A_GH in compartment = 0;
  species $A_HT in compartment = 0;
  species $A_GHT in compartment = 0;

  // Parameters:
  LAMBDA = 100000;
  mu = 0.025;
  v = 0.333;
  gamma = 0.125;
  beta_H = 0.015;
  beta_G = 0.051;
  V = 0.4;
  phi = 0.5;
  epsilon1 = 1.19;
  epsilon2 = 1.2;
  kappa = 1.02;
  sigma = 1.21;
  alpha = 1.22;
  eta = 1.15;
  thetaA = 1.25;
  thetaGH = 1.3;
  PHI1 = 0.1;
  PHI2 = 0.025;
  PHI3 = 0.003;
  PHI4 = 0.0031;
  tau = 0.4;
  omega = 0.4;

  // Assignment rules:
  N := S + I_H + I_GH + A_H + A_GH + A_HT + A_GHT;
  lambda_G := beta_G*(I_G + thetaGH*(I_GH + epsilon2*A_GH) + phi*A_GHT)/N;
  lambda_H := beta_H*(I_H + eta*I_GH + thetaA*(A_H + epsilon1*A_GH) + V*A_HT + phi*A_GHT)/N;

  // Rate rules:
  S' = LAMBDA + PHI1*I_G - lambda_G*S - lambda_H*S - mu*S;
  I_G' = lambda_G*S - alpha*lambda_H*I_G - (PHI1 + mu)*I_G;
  I_H' = lambda_H*S + PHI2*I_GH - sigma*lambda_G*I_H - (gamma + mu)*I_H;
  I_GH' = alpha*lambda_H*I_G + sigma*lambda_G*I_H - (kappa*gamma + PHI2 + mu)*I_GH;
  A_H' = gamma*I_H + PHI3*A_GH - sigma*lambda_G*A_H - (omega + mu + v)*A_H;
  A_GH' = kappa*gamma*I_GH + sigma*lambda_G*A_H - (omega + PHI3 + mu + v)*A_GH;
  A_HT' = omega*A_H + PHI4*A_GHT - sigma*lambda_G*A_HT - (mu + tau*v)*A_HT;
  A_GHT' = omega*A_GH + sigma*lambda_G*A_HT - (PHI4 + v + tau*v)*A_GHT;

  // Unit definitions:
  unit volume = 1e-3 litre;
  unit time = 86400 second;
  unit substance = 1e-3 mole;
end
