// SBML level 2 version 4

model New_Model()
  // Pawelek2016 - Within-Host Models of High and Low Pathogenic Influenza Virus Infections
  // a possible mechanism of MP in determining HP versus LP outcomes, and how different interventions might affect infection dynamics
  // hasProperty mamo:MAMO_0000046

  // Compartments:
  compartment compartment = 1;

  // Species:
  species $T in compartment = 7e9;
  species $I in compartment = 0;
  species $V in compartment = 100;
  species $M_R in compartment = s/delta_MR;
  species $M_A in compartment = 0;
  species $M_I in compartment = 0;
  species $A in compartment = 0;

  // Parameters:
  s = 5.087252e5;
  delta_I = 2;
  beta = 8.4e-9;
  alpha = 0.22;
  V50 = 0.00039;
  gamma = 0.0022;
  p = 4.6;
  p_M = 0.2;
  mu = 2.5e-9;
  rho = 1;
  kappa = 260;
  c = 3;
  epsilon1 = 0;
  epsilon2 = 0;

  // Assignment rules:
  delta_MI := 1/25;
  Macrophages := M_A + M_I;
  log := ln(V);
  delta_MR := 1/25;
  delta_MA := 1/25;

  // Rate rules:
  T' = -beta*T*V;
  I' = beta*T*V - delta_I*I;
  V' = (1 - epsilon1)*(p*I + p_M*M_I) - c*V - kappa*A*V - beta*T*V;
  M_R' = s - (1 - epsilon2)*alpha*V*M_R/(V50 + V) - delta_MR*M_R;
  M_A' = (1 - epsilon2)*alpha*V*M_R/(V50 + V) - gamma*M_A*V - delta_MA*M_A;
  M_I' = gamma*M_A*V - delta_MI*M_I;
  A' = mu*M_A + rho*A;

  // Unit definitions:
  unit volume = 1e-3 litre;
  unit time = 86400 second;
  unit substance = 1e-3 mole;
end
