// SBML level 3 version 1

function MAX(a, b)
  piecewise(a, a >= b, b);
end

function Constant_flux_irreversible(v)
  v;
end
Constant_flux_irreversible is "Constant flux (irreversible)";

function function_2(substrate, Km, V)
  V*substrate/(Km + substrate);
end
function_2 is "Henri-Michaelis-Menten (irreversible)";

function Henri_Michaelis_Menten_withGlobalEnzyme__irreversible(GlobalEnzyme, kcat, substrate, km)
  GlobalEnzyme*kcat*substrate/(km + substrate);
end
Henri_Michaelis_Menten_withGlobalEnzyme__irreversible is "Henri-Michaelis-Menten-withGlobalEnzyme (irreversible)";

model Li2019()
  // Li2019 - Neurogranin stimulates Ca/calmodulin-dependent kinase II by inhibiting Calcineurin
  // Calmodulin sits at the center of molecular mechanisms underlying learning and memory. Its complex, and sometimes opposite, influences via the binding to various proteins are yet to be fully understood. Calcium/calmodulin-dependent protein kinase II (CaMKII) and calcineurin (CaN) both bind open calmodulin, favoring Long-term-potentiation (LTP) or depression (LTD) respectively. Neurogranin binds to the closed conformation of calmodulin and its impact on synaptic plasticity is less clear. We set up a mechanistic computational model based on allosteric principles to simulate calmodulin state transitions and its interaction with calcium ions and the three binding partners mentioned above. We simulated calcium spikes at various frequencies and show that neurogranin regulates synaptic plasticity along three modalities. At low spike frequencies, neurogranin inhibits the onset of LTD by limiting CaN activation. At intermediate frequencies, neurogranin limits LTP by precluding binding of CaMKII with calmodulin. Finally, at high spike frequencies, neurogranin promotes LTP by enhancing CaMKII autophosphorylation. While neurogranin might act as a calmodulin buffer, it does not significantly preclude the calmodulin opening by calcium. On the contrary, neurogranin synchronizes the opening of calmodulin's two lobes and promotes their activation at specific frequencies, increasing the chance of CaMKII trans-autophosphorylation. Importantly, the positive effect of neurogranin on CaMKII activation is mediated via CaN, and too few or too much CaN will abolish this effect. Furthermore, the amount of neurogranin itself differentially regulates the levels of CaN and CaMKII activities, as well as the frequencies at which the balance switch from one to the other.
  // model units - substance: substance, time: time, volume: volume, area: area, length: length, extent: substance

  // Compartments:
  compartment cytosol = 1e-15 volume; cytosol is "dendritic_spine";

  // Species:
  species cam_RR_0_0 in cytosol = 0; cam_RR_0_0 is "CaM_RR_0_0";
  species cam_RR_0_PP2BCa2 in cytosol = 0; cam_RR_0_PP2BCa2 is "CaM_RR_0_CaNCa4";
  species cam_RR_0_CaMKII in cytosol = 0; cam_RR_0_CaMKII is "CaM_RR_0_CaMKII";
  species cam_RR_0_CaMKIIp in cytosol = 0; cam_RR_0_CaMKIIp is "CaM_RR_0_CaMKIIp";
  species cam_RR_A_0 in cytosol = 0; cam_RR_A_0 is "CaM_RR_a_0";
  species cam_RR_A_PP2BCa2 in cytosol = 0; cam_RR_A_PP2BCa2 is "CaM_RR_a_CaNCa4";
  species cam_RR_A_CaMKII in cytosol = 0; cam_RR_A_CaMKII is "CaM_RR_a_CaMKII";
  species cam_RR_A_CaMKIIp in cytosol = 0; cam_RR_A_CaMKIIp is "CaM_RR_a_CaMKIIp";
  species cam_RR_B_0 in cytosol = 0; cam_RR_B_0 is "CaM_RR_b_0";
  species cam_RR_B_PP2BCa2 in cytosol = 0; cam_RR_B_PP2BCa2 is "CaM_RR_b_CaNCa4";
  species cam_RR_B_CaMKII in cytosol = 0; cam_RR_B_CaMKII is "CaM_RR_b_CaMKII";
  species cam_RR_B_CaMKIIp in cytosol = 0; cam_RR_B_CaMKIIp is "CaM_RR_b_CaMKIIp";
  species cam_RR_C_0 in cytosol = 0; cam_RR_C_0 is "CaM_RR_c_0";
  species cam_RR_C_PP2BCa2 in cytosol = 0; cam_RR_C_PP2BCa2 is "CaM_RR_c_CaNCa4";
  species cam_RR_C_CaMKII in cytosol = 0; cam_RR_C_CaMKII is "CaM_RR_c_CaMKII";
  species cam_RR_C_CaMKIIp in cytosol = 0; cam_RR_C_CaMKIIp is "CaM_RR_c_CaMKIIp";
  species cam_RR_D_0 in cytosol = 0; cam_RR_D_0 is "CaM_RR_d_0";
  species cam_RR_D_PP2BCa2 in cytosol = 0; cam_RR_D_PP2BCa2 is "CaM_RR_d_CaNCa4";
  species cam_RR_D_CaMKII in cytosol = 0; cam_RR_D_CaMKII is "CaM_RR_d_CaMKII";
  species cam_RR_D_CaMKIIp in cytosol = 0; cam_RR_D_CaMKIIp is "CaM_RR_d_CaMKIIp";
  species cam_RR_AB_0 in cytosol = 0; cam_RR_AB_0 is "CaM_RR_ab_0";
  species cam_RR_AB_PP2BCa2 in cytosol = 0; cam_RR_AB_PP2BCa2 is "CaM_RR_ab_CaNCa4";
  species cam_RR_AB_CaMKII in cytosol = 0; cam_RR_AB_CaMKII is "CaM_RR_ab_CaMKII";
  species cam_RR_AB_CaMKIIp in cytosol = 0; cam_RR_AB_CaMKIIp is "CaM_RR_ab_CaMKIIp";
  species cam_RR_AC_0 in cytosol = 0; cam_RR_AC_0 is "CaM_RR_ac_0";
  species cam_RR_AC_PP2BCa2 in cytosol = 0; cam_RR_AC_PP2BCa2 is "CaM_RR_ac_CaNCa4";
  species cam_RR_AC_CaMKII in cytosol = 0; cam_RR_AC_CaMKII is "CaM_RR_ac_CaMKII";
  species cam_RR_AC_CaMKIIp in cytosol = 0; cam_RR_AC_CaMKIIp is "CaM_RR_ac_CaMKIIp";
  species cam_RR_AD_0 in cytosol = 0; cam_RR_AD_0 is "CaM_RR_ad_0";
  species cam_RR_AD_PP2BCa2 in cytosol = 0; cam_RR_AD_PP2BCa2 is "CaM_RR_ad_CaNCa4";
  species cam_RR_AD_CaMKII in cytosol = 0; cam_RR_AD_CaMKII is "CaM_RR_ad_CaMKII";
  species cam_RR_AD_CaMKIIp in cytosol = 0; cam_RR_AD_CaMKIIp is "CaM_RR_ad_CaMKIIp";
  species cam_RR_BC_0 in cytosol = 0; cam_RR_BC_0 is "CaM_RR_bc_0";
  species cam_RR_BC_PP2BCa2 in cytosol = 0; cam_RR_BC_PP2BCa2 is "CaM_RR_bc_CaNCa4";
  species cam_RR_BC_CaMKII in cytosol = 0; cam_RR_BC_CaMKII is "CaM_RR_bc_CaMKII";
  species cam_RR_BC_CaMKIIp in cytosol = 0; cam_RR_BC_CaMKIIp is "CaM_RR_bc_CaMKIIp";
  species cam_RR_BD_0 in cytosol = 0; cam_RR_BD_0 is "CaM_RR_bd_0";
  species cam_RR_BD_PP2BCa2 in cytosol = 0; cam_RR_BD_PP2BCa2 is "CaM_RR_bd_CaNCa4";
  species cam_RR_BD_CaMKII in cytosol = 0; cam_RR_BD_CaMKII is "CaM_RR_bd_CaMKII";
  species cam_RR_BD_CaMKIIp in cytosol = 0; cam_RR_BD_CaMKIIp is "CaM_RR_bd_CaMKIIp";
  species cam_RR_CD_0 in cytosol = 0; cam_RR_CD_0 is "CaM_RR_cd_0";
  species cam_RR_CD_PP2BCa2 in cytosol = 0; cam_RR_CD_PP2BCa2 is "CaM_RR_cd_CaNCa4";
  species cam_RR_CD_CaMKII in cytosol = 0; cam_RR_CD_CaMKII is "CaM_RR_cd_CaMKII";
  species cam_RR_CD_CaMKIIp in cytosol = 0; cam_RR_CD_CaMKIIp is "CaM_RR_cd_CaMKIIp";
  species cam_RR_ABC_0 in cytosol = 0; cam_RR_ABC_0 is "CaM_RR_abc_0";
  species cam_RR_ABC_PP2BCa2 in cytosol = 0; cam_RR_ABC_PP2BCa2 is "CaM_RR_abc_CaNCa4";
  species cam_RR_ABC_CaMKII in cytosol = 0; cam_RR_ABC_CaMKII is "CaM_RR_abc_CaMKII";
  species cam_RR_ABC_CaMKIIp in cytosol = 0; cam_RR_ABC_CaMKIIp is "CaM_RR_abc_CaMKIIp";
  species cam_RR_ABD_0 in cytosol = 0; cam_RR_ABD_0 is "CaM_RR_abd_0";
  species cam_RR_ABD_PP2BCa2 in cytosol = 0; cam_RR_ABD_PP2BCa2 is "CaM_RR_abd_CaNCa4";
  species cam_RR_ABD_CaMKII in cytosol = 0; cam_RR_ABD_CaMKII is "CaM_RR_abd_CaMKII";
  species cam_RR_ABD_CaMKIIp in cytosol = 0; cam_RR_ABD_CaMKIIp is "CaM_RR_abd_CaMKIIp";
  species cam_RR_ACD_0 in cytosol = 0; cam_RR_ACD_0 is "CaM_RR_acd_0";
  species cam_RR_ACD_PP2BCa2 in cytosol = 0; cam_RR_ACD_PP2BCa2 is "CaM_RR_acd_CaNCa4";
  species cam_RR_ACD_CaMKII in cytosol = 0; cam_RR_ACD_CaMKII is "CaM_RR_acd_CaMKII";
  species cam_RR_ACD_CaMKIIp in cytosol = 0; cam_RR_ACD_CaMKIIp is "CaM_RR_acd_CaMKIIp";
  species cam_RR_BCD_0 in cytosol = 0; cam_RR_BCD_0 is "CaM_RR_bcd_0";
  species cam_RR_BCD_PP2BCa2 in cytosol = 0; cam_RR_BCD_PP2BCa2 is "CaM_RR_bcd_CaNCa4";
  species cam_RR_BCD_CaMKII in cytosol = 0; cam_RR_BCD_CaMKII is "CaM_RR_bcd_CaMKII";
  species cam_RR_BCD_CaMKIIp in cytosol = 0; cam_RR_BCD_CaMKIIp is "CaM_RR_bcd_CaMKIIp";
  species cam_RR_ABCD_0 in cytosol = 0; cam_RR_ABCD_0 is "CaM_RR_abcd_0";
  species cam_RR_ABCD_PP2BCa2 in cytosol = 0; cam_RR_ABCD_PP2BCa2 is "CaM_RR_abcd_CaNCa4";
  species cam_RR_ABCD_CaMKII in cytosol = 0; cam_RR_ABCD_CaMKII is "CaM_RR_abcd_CaMKII";
  species cam_RR_ABCD_CaMKIIp in cytosol = 0; cam_RR_ABCD_CaMKIIp is "CaM_RR_abcd_CaMKIIp";
  species cam_RT_0_0 in cytosol = 0; cam_RT_0_0 is "CaM_RT_0_0";
  species cam_RT_0_Ng in cytosol = 0; cam_RT_0_Ng is "CaM_RT_0_Ng";
  species cam_RT_A_0 in cytosol = 0; cam_RT_A_0 is "CaM_RT_a_0";
  species cam_RT_A_Ng in cytosol = 0; cam_RT_A_Ng is "CaM_RT_a_Ng";
  species cam_RT_B_0 in cytosol = 0; cam_RT_B_0 is "CaM_RT_b_0";
  species cam_RT_B_Ng in cytosol = 0; cam_RT_B_Ng is "CaM_RT_b_Ng";
  species cam_RT_C_0 in cytosol = 0; cam_RT_C_0 is "CaM_RT_c_0";
  species cam_RT_C_Ng in cytosol = 0; cam_RT_C_Ng is "CaM_RT_c_Ng";
  species cam_RT_D_0 in cytosol = 0; cam_RT_D_0 is "CaM_RT_d_0";
  species cam_RT_D_Ng in cytosol = 0; cam_RT_D_Ng is "CaM_RT_d_Ng";
  species cam_RT_AB_0 in cytosol = 0; cam_RT_AB_0 is "CaM_RT_ab_0";
  species cam_RT_AB_Ng in cytosol = 0; cam_RT_AB_Ng is "CaM_RT_ab_Ng";
  species cam_RT_AC_0 in cytosol = 0; cam_RT_AC_0 is "CaM_RT_ac_0";
  species cam_RT_AC_Ng in cytosol = 0; cam_RT_AC_Ng is "CaM_RT_ac_Ng";
  species cam_RT_AD_0 in cytosol = 0; cam_RT_AD_0 is "CaM_RT_ad_0";
  species cam_RT_AD_Ng in cytosol = 0; cam_RT_AD_Ng is "CaM_RT_ad_Ng";
  species cam_RT_BC_0 in cytosol = 0; cam_RT_BC_0 is "CaM_RT_bc_0";
  species cam_RT_BC_Ng in cytosol = 0; cam_RT_BC_Ng is "CaM_RT_bc_Ng";
  species cam_RT_BD_0 in cytosol = 0; cam_RT_BD_0 is "CaM_RT_bd_0";
  species cam_RT_BD_Ng in cytosol = 0; cam_RT_BD_Ng is "CaM_RT_bd_Ng";
  species cam_RT_CD_0 in cytosol = 0; cam_RT_CD_0 is "CaM_RT_cd_0";
  species cam_RT_CD_Ng in cytosol = 0; cam_RT_CD_Ng is "CaM_RT_cd_Ng";
  species cam_RT_ABC_0 in cytosol = 0; cam_RT_ABC_0 is "CaM_RT_abc_0";
  species cam_RT_ABC_Ng in cytosol = 0; cam_RT_ABC_Ng is "CaM_RT_abc_Ng";
  species cam_RT_ABD_0 in cytosol = 0; cam_RT_ABD_0 is "CaM_RT_abd_0";
  species cam_RT_ABD_Ng in cytosol = 0; cam_RT_ABD_Ng is "CaM_RT_abd_Ng";
  species cam_RT_ACD_0 in cytosol = 0; cam_RT_ACD_0 is "CaM_RT_acd_0";
  species cam_RT_ACD_Ng in cytosol = 0; cam_RT_ACD_Ng is "CaM_RT_acd_Ng";
  species cam_RT_BCD_0 in cytosol = 0; cam_RT_BCD_0 is "CaM_RT_bcd_0";
  species cam_RT_BCD_Ng in cytosol = 0; cam_RT_BCD_Ng is "CaM_RT_bcd_Ng";
  species cam_RT_ABCD_0 in cytosol = 0; cam_RT_ABCD_0 is "CaM_RT_abcd_0";
  species cam_RT_ABCD_Ng in cytosol = 0; cam_RT_ABCD_Ng is "CaM_RT_abcd_Ng";
  species cam_TR_0_0 in cytosol = 0; cam_TR_0_0 is "CaM_TR_0_0";
  species cam_TR_A_0 in cytosol = 0; cam_TR_A_0 is "CaM_TR_a_0";
  species cam_TR_B_0 in cytosol = 0; cam_TR_B_0 is "CaM_TR_b_0";
  species cam_TR_C_0 in cytosol = 0; cam_TR_C_0 is "CaM_TR_c_0";
  species cam_TR_D_0 in cytosol = 0; cam_TR_D_0 is "CaM_TR_d_0";
  species cam_TR_AB_0 in cytosol = 0; cam_TR_AB_0 is "CaM_TR_ab_0";
  species cam_TR_AC_0 in cytosol = 0; cam_TR_AC_0 is "CaM_TR_ac_0";
  species cam_TR_AD_0 in cytosol = 0; cam_TR_AD_0 is "CaM_TR_ad_0";
  species cam_TR_BC_0 in cytosol = 0; cam_TR_BC_0 is "CaM_TR_bc_0";
  species cam_TR_BD_0 in cytosol = 0; cam_TR_BD_0 is "CaM_TR_bd_0";
  species cam_TR_CD_0 in cytosol = 0; cam_TR_CD_0 is "CaM_TR_cd_0";
  species cam_TR_ABC_0 in cytosol = 0; cam_TR_ABC_0 is "CaM_TR_abc_0";
  species cam_TR_ABD_0 in cytosol = 0; cam_TR_ABD_0 is "CaM_TR_abd_0";
  species cam_TR_ACD_0 in cytosol = 0; cam_TR_ACD_0 is "CaM_TR_acd_0";
  species cam_TR_BCD_0 in cytosol = 0; cam_TR_BCD_0 is "CaM_TR_bcd_0";
  species cam_TR_ABCD_0 in cytosol = 0; cam_TR_ABCD_0 is "CaM_TR_abcd_0";
  species cam_TT_0_0 in cytosol = 4e-5; cam_TT_0_0 is "CaM_TT_0_0";
  species cam_TT_0_Ng in cytosol = 0; cam_TT_0_Ng is "CaM_TT_0_Ng";
  species cam_TT_A_0 in cytosol = 0; cam_TT_A_0 is "CaM_TT_a_0";
  species cam_TT_A_Ng in cytosol = 0; cam_TT_A_Ng is "CaM_TT_a_Ng";
  species cam_TT_B_0 in cytosol = 0; cam_TT_B_0 is "CaM_TT_b_0";
  species cam_TT_B_Ng in cytosol = 0; cam_TT_B_Ng is "CaM_TT_b_Ng";
  species cam_TT_C_0 in cytosol = 0; cam_TT_C_0 is "CaM_TT_c_0";
  species cam_TT_C_Ng in cytosol = 0; cam_TT_C_Ng is "CaM_TT_c_Ng";
  species cam_TT_D_0 in cytosol = 0; cam_TT_D_0 is "CaM_TT_d_0";
  species cam_TT_D_Ng in cytosol = 0; cam_TT_D_Ng is "CaM_TT_d_Ng";
  species cam_TT_AB_0 in cytosol = 0; cam_TT_AB_0 is "CaM_TT_ab_0";
  species cam_TT_AB_Ng in cytosol = 0; cam_TT_AB_Ng is "CaM_TT_ab_Ng";
  species cam_TT_AC_0 in cytosol = 0; cam_TT_AC_0 is "CaM_TT_ac_0";
  species cam_TT_AC_Ng in cytosol = 0; cam_TT_AC_Ng is "CaM_TT_ac_Ng";
  species cam_TT_AD_0 in cytosol = 0; cam_TT_AD_0 is "CaM_TT_ad_0";
  species cam_TT_AD_Ng in cytosol = 0; cam_TT_AD_Ng is "CaM_TT_ad_Ng";
  species cam_TT_BC_0 in cytosol = 0; cam_TT_BC_0 is "CaM_TT_bc_0";
  species cam_TT_BC_Ng in cytosol = 0; cam_TT_BC_Ng is "CaM_TT_bc_Ng";
  species cam_TT_BD_0 in cytosol = 0; cam_TT_BD_0 is "CaM_TT_bd_0";
  species cam_TT_BD_Ng in cytosol = 0; cam_TT_BD_Ng is "CaM_TT_bd_Ng";
  species cam_TT_CD_0 in cytosol = 0; cam_TT_CD_0 is "CaM_TT_cd_0";
  species cam_TT_CD_Ng in cytosol = 0; cam_TT_CD_Ng is "CaM_TT_cd_Ng";
  species cam_TT_ABC_0 in cytosol = 0; cam_TT_ABC_0 is "CaM_TT_abc_0";
  species cam_TT_ABC_Ng in cytosol = 0; cam_TT_ABC_Ng is "CaM_TT_abc_Ng";
  species cam_TT_ABD_0 in cytosol = 0; cam_TT_ABD_0 is "CaM_TT_abd_0";
  species cam_TT_ABD_Ng in cytosol = 0; cam_TT_ABD_Ng is "CaM_TT_abd_Ng";
  species cam_TT_ACD_0 in cytosol = 0; cam_TT_ACD_0 is "CaM_TT_acd_0";
  species cam_TT_ACD_Ng in cytosol = 0; cam_TT_ACD_Ng is "CaM_TT_acd_Ng";
  species cam_TT_BCD_0 in cytosol = 0; cam_TT_BCD_0 is "CaM_TT_bcd_0";
  species cam_TT_BCD_Ng in cytosol = 0; cam_TT_BCD_Ng is "CaM_TT_bcd_Ng";
  species cam_TT_ABCD_0 in cytosol = 0; cam_TT_ABCD_0 is "CaM_TT_abcd_0";
  species cam_TT_ABCD_Ng in cytosol = 0; cam_TT_ABCD_Ng is "CaM_TT_abcd_Ng";
  species ca in cytosol = 8e-8; ca is "Ca";
  species Ng in cytosol = 4e-5;
  species PP2BCa2 in cytosol = 0; PP2BCa2 is "CaNCa4";
  species CaMKII in cytosol = 8e-5;
  species CaMKIIp in cytosol = 0;
  species CaNCa3 in cytosol = 0;
  species PP2Bi in cytosol = 8e-6; PP2Bi is "CaN";
  species PP2BiCa1 in cytosol = 0; PP2BiCa1 is "CaNCa";
  species PP2BiCa2 in cytosol = 0; PP2BiCa2 is "CaNCa2";

  // Parameters:
  Kd_Ng_RT = 1.2e-6;
  lC = 195865; lC is "LC";
  lN = 299; lN is "LN";
  Kd_CaMKIIp_RR = 2.26e-12;
  kon_AT = 1.22e10; kon_AT is "kon_aT";
  kon_AR = 1.22e10; kon_AR is "kon_aR";
  kon_CR = 122000000; kon_CR is "kon_cR";
  cN = 0.01;
  cC = 5e-5;
  kon_CT = 122000000; kon_CT is "kon_cT";
  Kd_PP2BCa2_RR = 3.26e-9; Kd_PP2BCa2_RR is "Kd_CaN_RR";
  kon_PP2BCa2 = 23000000; kon_PP2BCa2 is "kon_CaN_RR";
  Kd_Ng_TT = 1.2e-6;
  var k_R2T_C0; k_R2T_C0 is "k_RtoT_C0";
  Kd_CaMKII_RR = 3.83e-7;
  kon_Ng = 1e14;
  kon_CaMKIIp = 38500000;
  KCT = 9.38e-5;
  KAT = 9.38e-5; KAT is "KNT";
  kon_CaMKII = 2870000;
  var k_R2T_N0; k_R2T_N0 is "k_RtoT_N0";
  var kon_BT; kon_BT is "kon_bT";
  var kon_BR; kon_BR is "kon_bR";
  var KAR; KAR is "KNR";
  var k_R2T_N1; k_R2T_N1 is "k_RtoT_N1";
  var koff_BT; koff_BT is "koff_bT";
  var koff_BR; koff_BR is "koff_bR";
  var kon_DR; kon_DR is "kon_dR";
  var kon_DT; kon_DT is "kon_dT";
  var koff_DR; koff_DR is "koff_dR";
  var k_R2T_C1; k_R2T_C1 is "k_RtoT_C1";
  var k_R2T_C2; k_R2T_C2 is "k_RtoT_C2";
  var koff_DT; koff_DT is "koff_dT";
  var koff_CT; koff_CT is "koff_cT";
  var koff_CR; koff_CR is "koff_cR";
  var k_R2T_N2; k_R2T_N2 is "k_RtoT_N2";
  var k_T2R_N2; k_T2R_N2 is "k_TtoR_N2";
  var k_T2R_N1; k_T2R_N1 is "k_TtoR_N1";
  k_T2R_N0 = 316227; k_T2R_N0 is "k_TtoR_N0";
  var koff_AR; koff_AR is "koff_aR";
  var koff_AT; koff_AT is "koff_aT";
  var koff_PP2BCa2_RR; koff_PP2BCa2_RR is "koff_CaN_RR";
  var k_TT2RT_N1_Ng; k_TT2RT_N1_Ng is "k_TTtoRT_N1_Ng";
  var k_TT2RT_N0_Ng; k_TT2RT_N0_Ng is "k_TTtoRT_N0_Ng";
  var k_TT2RT_N2_Ng; k_TT2RT_N2_Ng is "k_TTtoRT_N2_Ng";
  k_T2R_C0 = 316227; k_T2R_C0 is "k_TtoR_C0";
  var k_T2R_C1; k_T2R_C1 is "k_TtoR_C1";
  var k_T2R_C2; k_T2R_C2 is "k_TtoR_C2";
  var cam_Ng_tot; cam_Ng_tot is "CaM_Ng_tot";
  var cam_CaMKII_bound_fraction; cam_CaMKII_bound_fraction is "CaM_CaMKII_bound_fraction";
  // cam bound with CaMKIIp (no cam_CaMKII, no CaMKIIp)
  var cam_CaMKIIp_tot; cam_CaMKIIp_tot is "CaM_CaMKIIp_tot";
  // cam bound CaMKII (no CaMKIIp at all)
  var cam_CaMKII_tot; cam_CaMKII_tot is "CaM_CaMKII_tot";
  var ybar_PP2BCa2; ybar_PP2BCa2 is "ybar_CaN";
  var cam_PP2BCa2_tot; cam_PP2BCa2_tot is "CaM_CaN_tot";
  var ybarC_PP2BCa2; ybarC_PP2BCa2 is "ybarC_CaN";
  var cam_Ng_bound_fraction; cam_Ng_bound_fraction is "CaM_Ng_bound_fraction";
  var cam_PP2BCa2_bound_fraction; cam_PP2BCa2_bound_fraction is "CaM_CaN_bound_fraction";
  var cam_tot; cam_tot is "CaM_tot";
  var cam_CaMKIIp_bound_fraction; cam_CaMKIIp_bound_fraction is "CaM_CaMKIIp_bound_fraction";
  var cam_0_bound_fraction; cam_0_bound_fraction is "CaM_noBindingPartner_fraction";
  Kd_CaN_Ca3_Ca = 4.5e-8;
  var CaMKII_sat_ratio;
  var prob_autophos;
  var CaMKII_autopho_ratio;
  Kd_CaN_Ca2_Ca = 1.76e-8;
  kon_CaN_Ca = 20000000;
  var koff_CaN_Ca2_Ca;
  var koff_CaN_Ca3_Ca;
  // The reason for adding cam_PP2BCa2_tot*2 to ybar_tot*4*cam_tot, is because in ybar_tot you only consider calcium saturation on cam, and you did not include the calcium bound to PP2BCa2 while it is also bound to CaM.
  var Ca_bound;
  var CaN_activity_ratio;
  var CaMKIIp_tot;
  TIME_EQUIL = 5000;
  k_spike_SS = 0;
  var cam_Ng_bound_ratio; cam_Ng_bound_ratio is "CaM_Ng_bound_ratio";
  var cam_CaMKII_CaMKIIp_bound_fraction; cam_CaMKII_CaMKIIp_bound_fraction is "CaM_CaMKII_CaMKIIp_bound_fraction";
  spikeCounter = 0;
  spikeFrequency = 1;
  spikeNumber = 300;
  spikeOn = 0;
  startTime = 0;
  var ca_bound_to_cam; ca_bound_to_cam is "Ca_bound_to_CaM";
  var ca_bound_to_PP2B; ca_bound_to_PP2B is "Ca_bound_to_CaN";
  var k_RT2TT_N0_Ng; k_RT2TT_N0_Ng is "k_RTtoTT_N0_Ng";
  var k_RT2TT_N1_Ng; k_RT2TT_N1_Ng is "k_RTtoTT_N1_Ng";
  var k_RT2TT_N2_Ng; k_RT2TT_N2_Ng is "k_RTtoTT_N2_Ng";
  Kd_CaNBi_1 = 4.6e-10; Kd_CaNBi_1 is "Kd_CaN_Ca";
  Kd_CaNBi_2 = 1.56e-9; Kd_CaNBi_2 is "Kd_CaN_Ca_Ca";
  var koff_CaNBi_1; koff_CaNBi_1 is "koff_CaN_Ca";
  var koff_CaNBi_2; koff_CaNBi_2 is "koff_CaN_Ca_Ca";
  var PP2B_tot; PP2B_tot is "CaN_tot";
  kcat_PP2B_CaMKII = 0.8; kcat_PP2B_CaMKII is "kcat_CaN_CaMKIIp";
  Km_PP2B_CaMKII = 2e-5; Km_PP2B_CaMKII is "Km_CaN_CaMKIIp";
  Initial_for_spikeNumber = spikeNumber;

  // Assignment rules:
  spikeInputDuration := piecewise(1/spikeFrequency, 1/spikeFrequency < 0.008, 0.008);
  k_R2T_C0 := k_T2R_C0*lC;
  k_R2T_N0 := k_T2R_N0*lN;
  kon_BT := kon_AT;
  kon_BR := kon_AR;
  KAR := KAT*cN;
  k_R2T_N1 := k_R2T_N0*sqrt(cN);
  koff_BT := KAT*kon_BT;
  koff_BR := KAR*kon_BR;
  kon_DR := kon_CR;
  kon_DT := kon_CT;
  koff_Ng_RT := Kd_Ng_RT*kon_Ng;
  k_R2T_C1 := k_R2T_C0*sqrt(cC);
  k_R2T_C2 := k_R2T_C0*cC;
  koff_DT := KCT*kon_DT;
  koff_CT := KCT*kon_CT;
  k_R2T_N2 := k_R2T_N0*cN;
  KCR := KCT*cC;
  koff_DR := KCR*kon_DR;
  koff_CR := KCR*kon_CR;
  koff_CaMKIIp_RR := Kd_CaMKIIp_RR*kon_CaMKIIp;
  k_T2R_N2 := k_T2R_N0/cN;
  k_T2R_N1 := k_T2R_N0/sqrt(cN);
  koff_Ng_TT := Kd_Ng_TT*kon_Ng;
  koff_AR := KAR*kon_AR;
  koff_AT := KAT*kon_AT;
  eNT_Ng := Kd_Ng_RT/Kd_Ng_TT;
  koff_PP2BCa2_RR := Kd_PP2BCa2_RR*kon_PP2BCa2;
  k_TT2RT_N1_Ng := k_T2R_N1/sqrt(eNT_Ng);
  k_TT2RT_N0_Ng := k_T2R_N0/sqrt(eNT_Ng);
  koff_CaMKII_RR := Kd_CaMKII_RR*kon_CaMKII;
  k_TT2RT_N2_Ng := k_T2R_N2/sqrt(eNT_Ng);
  k_T2R_C1 := k_T2R_C0/sqrt(cC);
  k_T2R_C2 := k_T2R_C0/cC;
  cam_Ng_tot := cam_RT_0_Ng + cam_RT_A_Ng + cam_RT_B_Ng + cam_RT_C_Ng + cam_RT_D_Ng + cam_RT_AB_Ng + cam_RT_AC_Ng + cam_RT_AD_Ng + cam_RT_BC_Ng + cam_RT_BD_Ng + cam_RT_CD_Ng + cam_RT_ABC_Ng + cam_RT_ABD_Ng + cam_RT_ACD_Ng + cam_RT_BCD_Ng + cam_RT_ABCD_Ng + cam_TT_0_Ng + cam_TT_A_Ng + cam_TT_B_Ng + cam_TT_C_Ng + cam_TT_D_Ng + cam_TT_AB_Ng + cam_TT_AC_Ng + cam_TT_AD_Ng + cam_TT_BC_Ng + cam_TT_BD_Ng + cam_TT_CD_Ng + cam_TT_ABC_Ng + cam_TT_ABD_Ng + cam_TT_ACD_Ng + cam_TT_BCD_Ng + cam_TT_ABCD_Ng;
  TTbar_Ng := (cam_TT_0_Ng + cam_TT_A_Ng + cam_TT_B_Ng + cam_TT_C_Ng + cam_TT_D_Ng + cam_TT_AB_Ng + cam_TT_AC_Ng + cam_TT_AD_Ng + cam_TT_BC_Ng + cam_TT_BD_Ng + cam_TT_CD_Ng + cam_TT_ABC_Ng + cam_TT_ABD_Ng + cam_TT_ACD_Ng + cam_TT_BCD_Ng + cam_TT_ABCD_Ng)/cam_Ng_tot;
  cam_CaMKIIp_tot := cam_RR_0_CaMKIIp + cam_RR_A_CaMKIIp + cam_RR_B_CaMKIIp + cam_RR_C_CaMKIIp + cam_RR_D_CaMKIIp + cam_RR_AB_CaMKIIp + cam_RR_AC_CaMKIIp + cam_RR_AD_CaMKIIp + cam_RR_BC_CaMKIIp + cam_RR_BD_CaMKIIp + cam_RR_CD_CaMKIIp + cam_RR_ABC_CaMKIIp + cam_RR_ABD_CaMKIIp + cam_RR_ACD_CaMKIIp + cam_RR_BCD_CaMKIIp + cam_RR_ABCD_CaMKIIp;
  RTbar_Ng := (cam_RT_0_Ng + cam_RT_A_Ng + cam_RT_B_Ng + cam_RT_C_Ng + cam_RT_D_Ng + cam_RT_AB_Ng + cam_RT_AC_Ng + cam_RT_AD_Ng + cam_RT_BC_Ng + cam_RT_BD_Ng + cam_RT_CD_Ng + cam_RT_ABC_Ng + cam_RT_ABD_Ng + cam_RT_ACD_Ng + cam_RT_BCD_Ng + cam_RT_ABCD_Ng)/cam_Ng_tot;
  cam_CaMKII_tot := cam_RR_0_CaMKII + cam_RR_A_CaMKII + cam_RR_B_CaMKII + cam_RR_C_CaMKII + cam_RR_D_CaMKII + cam_RR_AB_CaMKII + cam_RR_AC_CaMKII + cam_RR_AD_CaMKII + cam_RR_BC_CaMKII + cam_RR_BD_CaMKII + cam_RR_CD_CaMKII + cam_RR_ABC_CaMKII + cam_RR_ABD_CaMKII + cam_RR_ACD_CaMKII + cam_RR_BCD_CaMKII + cam_RR_ABCD_CaMKII;
  ybarN_CaMKII := (1*cam_RR_A_CaMKII + 1*cam_RR_B_CaMKII + 2*cam_RR_AB_CaMKII + 1*cam_RR_AC_CaMKII + 1*cam_RR_AD_CaMKII + 1*cam_RR_BC_CaMKII + 1*cam_RR_BD_CaMKII + 2*cam_RR_ABC_CaMKII + 2*cam_RR_ABD_CaMKII + 1*cam_RR_ACD_CaMKII + 1*cam_RR_BCD_CaMKII + 2*cam_RR_ABCD_CaMKII)/(2*cam_CaMKII_tot);
  ybar_Ng := (1*cam_RT_A_Ng + 1*cam_RT_B_Ng + 1*cam_RT_C_Ng + 1*cam_RT_D_Ng + 2*cam_RT_AB_Ng + 2*cam_RT_AC_Ng + 2*cam_RT_AD_Ng + 2*cam_RT_BC_Ng + 2*cam_RT_BD_Ng + 2*cam_RT_CD_Ng + 3*cam_RT_ABC_Ng + 3*cam_RT_ABD_Ng + 3*cam_RT_ACD_Ng + 3*cam_RT_BCD_Ng + 4*cam_RT_ABCD_Ng + 1*cam_TT_A_Ng + 1*cam_TT_B_Ng + 1*cam_TT_C_Ng + 1*cam_TT_D_Ng + 2*cam_TT_AB_Ng + 2*cam_TT_AC_Ng + 2*cam_TT_AD_Ng + 2*cam_TT_BC_Ng + 2*cam_TT_BD_Ng + 2*cam_TT_CD_Ng + 3*cam_TT_ABC_Ng + 3*cam_TT_ABD_Ng + 3*cam_TT_ACD_Ng + 3*cam_TT_BCD_Ng + 4*cam_TT_ABCD_Ng)/(4*cam_Ng_tot);
  ybar_CaMKII := (1*cam_RR_A_CaMKII + 1*cam_RR_B_CaMKII + 1*cam_RR_C_CaMKII + 1*cam_RR_D_CaMKII + 2*cam_RR_AB_CaMKII + 2*cam_RR_AC_CaMKII + 2*cam_RR_AD_CaMKII + 2*cam_RR_BC_CaMKII + 2*cam_RR_BD_CaMKII + 2*cam_RR_CD_CaMKII + 3*cam_RR_ABC_CaMKII + 3*cam_RR_ABD_CaMKII + 3*cam_RR_ACD_CaMKII + 3*cam_RR_BCD_CaMKII + 4*cam_RR_ABCD_CaMKII)/(4*cam_CaMKII_tot);
  cam_PP2BCa2_tot := cam_RR_0_PP2BCa2 + cam_RR_A_PP2BCa2 + cam_RR_B_PP2BCa2 + cam_RR_C_PP2BCa2 + cam_RR_D_PP2BCa2 + cam_RR_AB_PP2BCa2 + cam_RR_AC_PP2BCa2 + cam_RR_AD_PP2BCa2 + cam_RR_BC_PP2BCa2 + cam_RR_BD_PP2BCa2 + cam_RR_CD_PP2BCa2 + cam_RR_ABC_PP2BCa2 + cam_RR_ABD_PP2BCa2 + cam_RR_ACD_PP2BCa2 + cam_RR_BCD_PP2BCa2 + cam_RR_ABCD_PP2BCa2;
  ybar_PP2BCa2 := (1*cam_RR_A_PP2BCa2 + 1*cam_RR_B_PP2BCa2 + 1*cam_RR_C_PP2BCa2 + 1*cam_RR_D_PP2BCa2 + 2*cam_RR_AB_PP2BCa2 + 2*cam_RR_AC_PP2BCa2 + 2*cam_RR_AD_PP2BCa2 + 2*cam_RR_BC_PP2BCa2 + 2*cam_RR_BD_PP2BCa2 + 2*cam_RR_CD_PP2BCa2 + 3*cam_RR_ABC_PP2BCa2 + 3*cam_RR_ABD_PP2BCa2 + 3*cam_RR_ACD_PP2BCa2 + 3*cam_RR_BCD_PP2BCa2 + 4*cam_RR_ABCD_PP2BCa2)/(4*cam_PP2BCa2_tot);
  ybarC_CaMKIIp := (1*cam_RR_C_CaMKIIp + 1*cam_RR_D_CaMKIIp + 1*cam_RR_AC_CaMKIIp + 1*cam_RR_AD_CaMKIIp + 1*cam_RR_BC_CaMKIIp + 1*cam_RR_BD_CaMKIIp + 2*cam_RR_CD_CaMKIIp + 1*cam_RR_ABC_CaMKIIp + 1*cam_RR_ABD_CaMKIIp + 2*cam_RR_ACD_CaMKIIp + 2*cam_RR_BCD_CaMKIIp + 2*cam_RR_ABCD_CaMKIIp)/(2*cam_CaMKIIp_tot);
  ybarN_CaMKIIp := (1*cam_RR_A_CaMKIIp + 1*cam_RR_B_CaMKIIp + 2*cam_RR_AB_CaMKIIp + 1*cam_RR_AC_CaMKIIp + 1*cam_RR_AD_CaMKIIp + 1*cam_RR_BC_CaMKIIp + 1*cam_RR_BD_CaMKIIp + 2*cam_RR_ABC_CaMKIIp + 2*cam_RR_ABD_CaMKIIp + 1*cam_RR_ACD_CaMKIIp + 1*cam_RR_BCD_CaMKIIp + 2*cam_RR_ABCD_CaMKIIp)/(2*cam_CaMKIIp_tot);
  ybarC_PP2BCa2 := (1*cam_RR_C_PP2BCa2 + 1*cam_RR_D_PP2BCa2 + 1*cam_RR_AC_PP2BCa2 + 1*cam_RR_AD_PP2BCa2 + 1*cam_RR_BC_PP2BCa2 + 1*cam_RR_BD_PP2BCa2 + 2*cam_RR_CD_PP2BCa2 + 1*cam_RR_ABC_PP2BCa2 + 1*cam_RR_ABD_PP2BCa2 + 2*cam_RR_ACD_PP2BCa2 + 2*cam_RR_BCD_PP2BCa2 + 2*cam_RR_ABCD_PP2BCa2)/(2*cam_PP2BCa2_tot);
  ybarC_CaMKII := (1*cam_RR_C_CaMKII + 1*cam_RR_D_CaMKII + 1*cam_RR_AC_CaMKII + 1*cam_RR_AD_CaMKII + 1*cam_RR_BC_CaMKII + 1*cam_RR_BD_CaMKII + 2*cam_RR_CD_CaMKII + 1*cam_RR_ABC_CaMKII + 1*cam_RR_ABD_CaMKII + 2*cam_RR_ACD_CaMKII + 2*cam_RR_BCD_CaMKII + 2*cam_RR_ABCD_CaMKII)/(2*cam_CaMKII_tot);
  ybar_CaMKIIp := (1*cam_RR_A_CaMKIIp + 1*cam_RR_B_CaMKIIp + 1*cam_RR_C_CaMKIIp + 1*cam_RR_D_CaMKIIp + 2*cam_RR_AB_CaMKIIp + 2*cam_RR_AC_CaMKIIp + 2*cam_RR_AD_CaMKIIp + 2*cam_RR_BC_CaMKIIp + 2*cam_RR_BD_CaMKIIp + 2*cam_RR_CD_CaMKIIp + 3*cam_RR_ABC_CaMKIIp + 3*cam_RR_ABD_CaMKIIp + 3*cam_RR_ACD_CaMKIIp + 3*cam_RR_BCD_CaMKIIp + 4*cam_RR_ABCD_CaMKIIp)/(4*cam_CaMKIIp_tot);
  cam_tot := cam_RR_0_0 + cam_RR_0_PP2BCa2 + cam_RR_0_CaMKII + cam_RR_0_CaMKIIp + cam_RR_A_0 + cam_RR_A_PP2BCa2 + cam_RR_A_CaMKII + cam_RR_A_CaMKIIp + cam_RR_B_0 + cam_RR_B_PP2BCa2 + cam_RR_B_CaMKII + cam_RR_B_CaMKIIp + cam_RR_C_0 + cam_RR_C_PP2BCa2 + cam_RR_C_CaMKII + cam_RR_C_CaMKIIp + cam_RR_D_0 + cam_RR_D_PP2BCa2 + cam_RR_D_CaMKII + cam_RR_D_CaMKIIp + cam_RR_AB_0 + cam_RR_AB_PP2BCa2 + cam_RR_AB_CaMKII + cam_RR_AB_CaMKIIp + cam_RR_AC_0 + cam_RR_AC_PP2BCa2 + cam_RR_AC_CaMKII + cam_RR_AC_CaMKIIp + cam_RR_AD_0 + cam_RR_AD_PP2BCa2 + cam_RR_AD_CaMKII + cam_RR_AD_CaMKIIp + cam_RR_BC_0 + cam_RR_BC_PP2BCa2 + cam_RR_BC_CaMKII + cam_RR_BC_CaMKIIp + cam_RR_BD_0 + cam_RR_BD_PP2BCa2 + cam_RR_BD_CaMKII + cam_RR_BD_CaMKIIp + cam_RR_CD_0 + cam_RR_CD_PP2BCa2 + cam_RR_CD_CaMKII + cam_RR_CD_CaMKIIp + cam_RR_ABC_0 + cam_RR_ABC_PP2BCa2 + cam_RR_ABC_CaMKII + cam_RR_ABC_CaMKIIp + cam_RR_ABD_0 + cam_RR_ABD_PP2BCa2 + cam_RR_ABD_CaMKII + cam_RR_ABD_CaMKIIp + cam_RR_ACD_0 + cam_RR_ACD_PP2BCa2 + cam_RR_ACD_CaMKII + cam_RR_ACD_CaMKIIp + cam_RR_BCD_0 + cam_RR_BCD_PP2BCa2 + cam_RR_BCD_CaMKII + cam_RR_BCD_CaMKIIp + cam_RR_ABCD_0 + cam_RR_ABCD_PP2BCa2 + cam_RR_ABCD_CaMKII + cam_RR_ABCD_CaMKIIp + cam_RT_0_0 + cam_RT_0_Ng + cam_RT_A_0 + cam_RT_A_Ng + cam_RT_B_0 + cam_RT_B_Ng + cam_RT_C_0 + cam_RT_C_Ng + cam_RT_D_0 + cam_RT_D_Ng + cam_RT_AB_0 + cam_RT_AB_Ng + cam_RT_AC_0 + cam_RT_AC_Ng + cam_RT_AD_0 + cam_RT_AD_Ng + cam_RT_BC_0 + cam_RT_BC_Ng + cam_RT_BD_0 + cam_RT_BD_Ng + cam_RT_CD_0 + cam_RT_CD_Ng + cam_RT_ABC_0 + cam_RT_ABC_Ng + cam_RT_ABD_0 + cam_RT_ABD_Ng + cam_RT_ACD_0 + cam_RT_ACD_Ng + cam_RT_BCD_0 + cam_RT_BCD_Ng + cam_RT_ABCD_0 + cam_RT_ABCD_Ng + cam_TR_0_0 + cam_TR_A_0 + cam_TR_B_0 + cam_TR_C_0 + cam_TR_D_0 + cam_TR_AB_0 + cam_TR_AC_0 + cam_TR_AD_0 + cam_TR_BC_0 + cam_TR_BD_0 + cam_TR_CD_0 + cam_TR_ABC_0 + cam_TR_ABD_0 + cam_TR_ACD_0 + cam_TR_BCD_0 + cam_TR_ABCD_0 + cam_TT_0_0 + cam_TT_0_Ng + cam_TT_A_0 + cam_TT_A_Ng + cam_TT_B_0 + cam_TT_B_Ng + cam_TT_C_0 + cam_TT_C_Ng + cam_TT_D_0 + cam_TT_D_Ng + cam_TT_AB_0 + cam_TT_AB_Ng + cam_TT_AC_0 + cam_TT_AC_Ng + cam_TT_AD_0 + cam_TT_AD_Ng + cam_TT_BC_0 + cam_TT_BC_Ng + cam_TT_BD_0 + cam_TT_BD_Ng + cam_TT_CD_0 + cam_TT_CD_Ng + cam_TT_ABC_0 + cam_TT_ABC_Ng + cam_TT_ABD_0 + cam_TT_ABD_Ng + cam_TT_ACD_0 + cam_TT_ACD_Ng + cam_TT_BCD_0 + cam_TT_BCD_Ng + cam_TT_ABCD_0 + cam_TT_ABCD_Ng;
  RRbar_tot := (cam_RR_0_0 + cam_RR_0_PP2BCa2 + cam_RR_0_CaMKII + cam_RR_0_CaMKIIp + cam_RR_A_0 + cam_RR_A_PP2BCa2 + cam_RR_A_CaMKII + cam_RR_A_CaMKIIp + cam_RR_B_0 + cam_RR_B_PP2BCa2 + cam_RR_B_CaMKII + cam_RR_B_CaMKIIp + cam_RR_C_0 + cam_RR_C_PP2BCa2 + cam_RR_C_CaMKII + cam_RR_C_CaMKIIp + cam_RR_D_0 + cam_RR_D_PP2BCa2 + cam_RR_D_CaMKII + cam_RR_D_CaMKIIp + cam_RR_AB_0 + cam_RR_AB_PP2BCa2 + cam_RR_AB_CaMKII + cam_RR_AB_CaMKIIp + cam_RR_AC_0 + cam_RR_AC_PP2BCa2 + cam_RR_AC_CaMKII + cam_RR_AC_CaMKIIp + cam_RR_AD_0 + cam_RR_AD_PP2BCa2 + cam_RR_AD_CaMKII + cam_RR_AD_CaMKIIp + cam_RR_BC_0 + cam_RR_BC_PP2BCa2 + cam_RR_BC_CaMKII + cam_RR_BC_CaMKIIp + cam_RR_BD_0 + cam_RR_BD_PP2BCa2 + cam_RR_BD_CaMKII + cam_RR_BD_CaMKIIp + cam_RR_CD_0 + cam_RR_CD_PP2BCa2 + cam_RR_CD_CaMKII + cam_RR_CD_CaMKIIp + cam_RR_ABC_0 + cam_RR_ABC_PP2BCa2 + cam_RR_ABC_CaMKII + cam_RR_ABC_CaMKIIp + cam_RR_ABD_0 + cam_RR_ABD_PP2BCa2 + cam_RR_ABD_CaMKII + cam_RR_ABD_CaMKIIp + cam_RR_ACD_0 + cam_RR_ACD_PP2BCa2 + cam_RR_ACD_CaMKII + cam_RR_ACD_CaMKIIp + cam_RR_BCD_0 + cam_RR_BCD_PP2BCa2 + cam_RR_BCD_CaMKII + cam_RR_BCD_CaMKIIp + cam_RR_ABCD_0 + cam_RR_ABCD_PP2BCa2 + cam_RR_ABCD_CaMKII + cam_RR_ABCD_CaMKIIp)/cam_tot;
  cam_CaMKII_bound_fraction := (cam_RR_0_CaMKII + cam_RR_A_CaMKII + cam_RR_B_CaMKII + cam_RR_C_CaMKII + cam_RR_D_CaMKII + cam_RR_AB_CaMKII + cam_RR_AC_CaMKII + cam_RR_AD_CaMKII + cam_RR_BC_CaMKII + cam_RR_BD_CaMKII + cam_RR_CD_CaMKII + cam_RR_ABC_CaMKII + cam_RR_ABD_CaMKII + cam_RR_ACD_CaMKII + cam_RR_BCD_CaMKII + cam_RR_ABCD_CaMKII)/cam_tot;
  TTbar_tot := (cam_TT_0_0 + cam_TT_0_Ng + cam_TT_A_0 + cam_TT_A_Ng + cam_TT_B_0 + cam_TT_B_Ng + cam_TT_C_0 + cam_TT_C_Ng + cam_TT_D_0 + cam_TT_D_Ng + cam_TT_AB_0 + cam_TT_AB_Ng + cam_TT_AC_0 + cam_TT_AC_Ng + cam_TT_AD_0 + cam_TT_AD_Ng + cam_TT_BC_0 + cam_TT_BC_Ng + cam_TT_BD_0 + cam_TT_BD_Ng + cam_TT_CD_0 + cam_TT_CD_Ng + cam_TT_ABC_0 + cam_TT_ABC_Ng + cam_TT_ABD_0 + cam_TT_ABD_Ng + cam_TT_ACD_0 + cam_TT_ACD_Ng + cam_TT_BCD_0 + cam_TT_BCD_Ng + cam_TT_ABCD_0 + cam_TT_ABCD_Ng)/cam_tot;
  TRbar_tot := (cam_TR_0_0 + cam_TR_A_0 + cam_TR_B_0 + cam_TR_C_0 + cam_TR_D_0 + cam_TR_AB_0 + cam_TR_AC_0 + cam_TR_AD_0 + cam_TR_BC_0 + cam_TR_BD_0 + cam_TR_CD_0 + cam_TR_ABC_0 + cam_TR_ABD_0 + cam_TR_ACD_0 + cam_TR_BCD_0 + cam_TR_ABCD_0)/cam_tot;
  ybarC_tot := (1*cam_RR_C_0 + 1*cam_RR_C_PP2BCa2 + 1*cam_RR_C_CaMKII + 1*cam_RR_C_CaMKIIp + 1*cam_RR_D_0 + 1*cam_RR_D_PP2BCa2 + 1*cam_RR_D_CaMKII + 1*cam_RR_D_CaMKIIp + 1*cam_RR_AC_0 + 1*cam_RR_AC_PP2BCa2 + 1*cam_RR_AC_CaMKII + 1*cam_RR_AC_CaMKIIp + 1*cam_RR_AD_0 + 1*cam_RR_AD_PP2BCa2 + 1*cam_RR_AD_CaMKII + 1*cam_RR_AD_CaMKIIp + 1*cam_RR_BC_0 + 1*cam_RR_BC_PP2BCa2 + 1*cam_RR_BC_CaMKII + 1*cam_RR_BC_CaMKIIp + 1*cam_RR_BD_0 + 1*cam_RR_BD_PP2BCa2 + 1*cam_RR_BD_CaMKII + 1*cam_RR_BD_CaMKIIp + 2*cam_RR_CD_0 + 2*cam_RR_CD_PP2BCa2 + 2*cam_RR_CD_CaMKII + 2*cam_RR_CD_CaMKIIp + 1*cam_RR_ABC_0 + 1*cam_RR_ABC_PP2BCa2 + 1*cam_RR_ABC_CaMKII + 1*cam_RR_ABC_CaMKIIp + 1*cam_RR_ABD_0 + 1*cam_RR_ABD_PP2BCa2 + 1*cam_RR_ABD_CaMKII + 1*cam_RR_ABD_CaMKIIp + 2*cam_RR_ACD_0 + 2*cam_RR_ACD_PP2BCa2 + 2*cam_RR_ACD_CaMKII + 2*cam_RR_ACD_CaMKIIp + 2*cam_RR_BCD_0 + 2*cam_RR_BCD_PP2BCa2 + 2*cam_RR_BCD_CaMKII + 2*cam_RR_BCD_CaMKIIp + 2*cam_RR_ABCD_0 + 2*cam_RR_ABCD_PP2BCa2 + 2*cam_RR_ABCD_CaMKII + 2*cam_RR_ABCD_CaMKIIp + 1*cam_RT_C_0 + 1*cam_RT_C_Ng + 1*cam_RT_D_0 + 1*cam_RT_D_Ng + 1*cam_RT_AC_0 + 1*cam_RT_AC_Ng + 1*cam_RT_AD_0 + 1*cam_RT_AD_Ng + 1*cam_RT_BC_0 + 1*cam_RT_BC_Ng + 1*cam_RT_BD_0 + 1*cam_RT_BD_Ng + 2*cam_RT_CD_0 + 2*cam_RT_CD_Ng + 1*cam_RT_ABC_0 + 1*cam_RT_ABC_Ng + 1*cam_RT_ABD_0 + 1*cam_RT_ABD_Ng + 2*cam_RT_ACD_0 + 2*cam_RT_ACD_Ng + 2*cam_RT_BCD_0 + 2*cam_RT_BCD_Ng + 2*cam_RT_ABCD_0 + 2*cam_RT_ABCD_Ng + 1*cam_TR_C_0 + 1*cam_TR_D_0 + 1*cam_TR_AC_0 + 1*cam_TR_AD_0 + 1*cam_TR_BC_0 + 1*cam_TR_BD_0 + 2*cam_TR_CD_0 + 1*cam_TR_ABC_0 + 1*cam_TR_ABD_0 + 2*cam_TR_ACD_0 + 2*cam_TR_BCD_0 + 2*cam_TR_ABCD_0 + 1*cam_TT_C_0 + 1*cam_TT_C_Ng + 1*cam_TT_D_0 + 1*cam_TT_D_Ng + 1*cam_TT_AC_0 + 1*cam_TT_AC_Ng + 1*cam_TT_AD_0 + 1*cam_TT_AD_Ng + 1*cam_TT_BC_0 + 1*cam_TT_BC_Ng + 1*cam_TT_BD_0 + 1*cam_TT_BD_Ng + 2*cam_TT_CD_0 + 2*cam_TT_CD_Ng + 1*cam_TT_ABC_0 + 1*cam_TT_ABC_Ng + 1*cam_TT_ABD_0 + 1*cam_TT_ABD_Ng + 2*cam_TT_ACD_0 + 2*cam_TT_ACD_Ng + 2*cam_TT_BCD_0 + 2*cam_TT_BCD_Ng + 2*cam_TT_ABCD_0 + 2*cam_TT_ABCD_Ng)/(2*cam_tot);
  ybarN_tot := (1*cam_RR_A_0 + 1*cam_RR_A_PP2BCa2 + 1*cam_RR_A_CaMKII + 1*cam_RR_A_CaMKIIp + 1*cam_RR_B_0 + 1*cam_RR_B_PP2BCa2 + 1*cam_RR_B_CaMKII + 1*cam_RR_B_CaMKIIp + 2*cam_RR_AB_0 + 2*cam_RR_AB_PP2BCa2 + 2*cam_RR_AB_CaMKII + 2*cam_RR_AB_CaMKIIp + 1*cam_RR_AC_0 + 1*cam_RR_AC_PP2BCa2 + 1*cam_RR_AC_CaMKII + 1*cam_RR_AC_CaMKIIp + 1*cam_RR_AD_0 + 1*cam_RR_AD_PP2BCa2 + 1*cam_RR_AD_CaMKII + 1*cam_RR_AD_CaMKIIp + 1*cam_RR_BC_0 + 1*cam_RR_BC_PP2BCa2 + 1*cam_RR_BC_CaMKII + 1*cam_RR_BC_CaMKIIp + 1*cam_RR_BD_0 + 1*cam_RR_BD_PP2BCa2 + 1*cam_RR_BD_CaMKII + 1*cam_RR_BD_CaMKIIp + 2*cam_RR_ABC_0 + 2*cam_RR_ABC_PP2BCa2 + 2*cam_RR_ABC_CaMKII + 2*cam_RR_ABC_CaMKIIp + 2*cam_RR_ABD_0 + 2*cam_RR_ABD_PP2BCa2 + 2*cam_RR_ABD_CaMKII + 2*cam_RR_ABD_CaMKIIp + 1*cam_RR_ACD_0 + 1*cam_RR_ACD_PP2BCa2 + 1*cam_RR_ACD_CaMKII + 1*cam_RR_ACD_CaMKIIp + 1*cam_RR_BCD_0 + 1*cam_RR_BCD_PP2BCa2 + 1*cam_RR_BCD_CaMKII + 1*cam_RR_BCD_CaMKIIp + 2*cam_RR_ABCD_0 + 2*cam_RR_ABCD_PP2BCa2 + 2*cam_RR_ABCD_CaMKII + 2*cam_RR_ABCD_CaMKIIp + 1*cam_RT_A_0 + 1*cam_RT_A_Ng + 1*cam_RT_B_0 + 1*cam_RT_B_Ng + 2*cam_RT_AB_0 + 2*cam_RT_AB_Ng + 1*cam_RT_AC_0 + 1*cam_RT_AC_Ng + 1*cam_RT_AD_0 + 1*cam_RT_AD_Ng + 1*cam_RT_BC_0 + 1*cam_RT_BC_Ng + 1*cam_RT_BD_0 + 1*cam_RT_BD_Ng + 2*cam_RT_ABC_0 + 2*cam_RT_ABC_Ng + 2*cam_RT_ABD_0 + 2*cam_RT_ABD_Ng + 1*cam_RT_ACD_0 + 1*cam_RT_ACD_Ng + 1*cam_RT_BCD_0 + 1*cam_RT_BCD_Ng + 2*cam_RT_ABCD_0 + 2*cam_RT_ABCD_Ng + 1*cam_TR_A_0 + 1*cam_TR_B_0 + 2*cam_TR_AB_0 + 1*cam_TR_AC_0 + 1*cam_TR_AD_0 + 1*cam_TR_BC_0 + 1*cam_TR_BD_0 + 2*cam_TR_ABC_0 + 2*cam_TR_ABD_0 + 1*cam_TR_ACD_0 + 1*cam_TR_BCD_0 + 2*cam_TR_ABCD_0 + 1*cam_TT_A_0 + 1*cam_TT_A_Ng + 1*cam_TT_B_0 + 1*cam_TT_B_Ng + 2*cam_TT_AB_0 + 2*cam_TT_AB_Ng + 1*cam_TT_AC_0 + 1*cam_TT_AC_Ng + 1*cam_TT_AD_0 + 1*cam_TT_AD_Ng + 1*cam_TT_BC_0 + 1*cam_TT_BC_Ng + 1*cam_TT_BD_0 + 1*cam_TT_BD_Ng + 2*cam_TT_ABC_0 + 2*cam_TT_ABC_Ng + 2*cam_TT_ABD_0 + 2*cam_TT_ABD_Ng + 1*cam_TT_ACD_0 + 1*cam_TT_ACD_Ng + 1*cam_TT_BCD_0 + 1*cam_TT_BCD_Ng + 2*cam_TT_ABCD_0 + 2*cam_TT_ABCD_Ng)/(2*cam_tot);
  RTbar_tot := (cam_RT_0_0 + cam_RT_0_Ng + cam_RT_A_0 + cam_RT_A_Ng + cam_RT_B_0 + cam_RT_B_Ng + cam_RT_C_0 + cam_RT_C_Ng + cam_RT_D_0 + cam_RT_D_Ng + cam_RT_AB_0 + cam_RT_AB_Ng + cam_RT_AC_0 + cam_RT_AC_Ng + cam_RT_AD_0 + cam_RT_AD_Ng + cam_RT_BC_0 + cam_RT_BC_Ng + cam_RT_BD_0 + cam_RT_BD_Ng + cam_RT_CD_0 + cam_RT_CD_Ng + cam_RT_ABC_0 + cam_RT_ABC_Ng + cam_RT_ABD_0 + cam_RT_ABD_Ng + cam_RT_ACD_0 + cam_RT_ACD_Ng + cam_RT_BCD_0 + cam_RT_BCD_Ng + cam_RT_ABCD_0 + cam_RT_ABCD_Ng)/cam_tot;
  ybar_tot := (1*cam_RR_A_0 + 1*cam_RR_A_PP2BCa2 + 1*cam_RR_A_CaMKII + 1*cam_RR_A_CaMKIIp + 1*cam_RR_B_0 + 1*cam_RR_B_PP2BCa2 + 1*cam_RR_B_CaMKII + 1*cam_RR_B_CaMKIIp + 1*cam_RR_C_0 + 1*cam_RR_C_PP2BCa2 + 1*cam_RR_C_CaMKII + 1*cam_RR_C_CaMKIIp + 1*cam_RR_D_0 + 1*cam_RR_D_PP2BCa2 + 1*cam_RR_D_CaMKII + 1*cam_RR_D_CaMKIIp + 2*cam_RR_AB_0 + 2*cam_RR_AB_PP2BCa2 + 2*cam_RR_AB_CaMKII + 2*cam_RR_AB_CaMKIIp + 2*cam_RR_AC_0 + 2*cam_RR_AC_PP2BCa2 + 2*cam_RR_AC_CaMKII + 2*cam_RR_AC_CaMKIIp + 2*cam_RR_AD_0 + 2*cam_RR_AD_PP2BCa2 + 2*cam_RR_AD_CaMKII + 2*cam_RR_AD_CaMKIIp + 2*cam_RR_BC_0 + 2*cam_RR_BC_PP2BCa2 + 2*cam_RR_BC_CaMKII + 2*cam_RR_BC_CaMKIIp + 2*cam_RR_BD_0 + 2*cam_RR_BD_PP2BCa2 + 2*cam_RR_BD_CaMKII + 2*cam_RR_BD_CaMKIIp + 2*cam_RR_CD_0 + 2*cam_RR_CD_PP2BCa2 + 2*cam_RR_CD_CaMKII + 2*cam_RR_CD_CaMKIIp + 3*cam_RR_ABC_0 + 3*cam_RR_ABC_PP2BCa2 + 3*cam_RR_ABC_CaMKII + 3*cam_RR_ABC_CaMKIIp + 3*cam_RR_ABD_0 + 3*cam_RR_ABD_PP2BCa2 + 3*cam_RR_ABD_CaMKII + 3*cam_RR_ABD_CaMKIIp + 3*cam_RR_ACD_0 + 3*cam_RR_ACD_PP2BCa2 + 3*cam_RR_ACD_CaMKII + 3*cam_RR_ACD_CaMKIIp + 3*cam_RR_BCD_0 + 3*cam_RR_BCD_PP2BCa2 + 3*cam_RR_BCD_CaMKII + 3*cam_RR_BCD_CaMKIIp + 4*cam_RR_ABCD_0 + 4*cam_RR_ABCD_PP2BCa2 + 4*cam_RR_ABCD_CaMKII + 4*cam_RR_ABCD_CaMKIIp + 1*cam_RT_A_0 + 1*cam_RT_A_Ng + 1*cam_RT_B_0 + 1*cam_RT_B_Ng + 1*cam_RT_C_0 + 1*cam_RT_C_Ng + 1*cam_RT_D_0 + 1*cam_RT_D_Ng + 2*cam_RT_AB_0 + 2*cam_RT_AB_Ng + 2*cam_RT_AC_0 + 2*cam_RT_AC_Ng + 2*cam_RT_AD_0 + 2*cam_RT_AD_Ng + 2*cam_RT_BC_0 + 2*cam_RT_BC_Ng + 2*cam_RT_BD_0 + 2*cam_RT_BD_Ng + 2*cam_RT_CD_0 + 2*cam_RT_CD_Ng + 3*cam_RT_ABC_0 + 3*cam_RT_ABC_Ng + 3*cam_RT_ABD_0 + 3*cam_RT_ABD_Ng + 3*cam_RT_ACD_0 + 3*cam_RT_ACD_Ng + 3*cam_RT_BCD_0 + 3*cam_RT_BCD_Ng + 4*cam_RT_ABCD_0 + 4*cam_RT_ABCD_Ng + 1*cam_TR_A_0 + 1*cam_TR_B_0 + 1*cam_TR_C_0 + 1*cam_TR_D_0 + 2*cam_TR_AB_0 + 2*cam_TR_AC_0 + 2*cam_TR_AD_0 + 2*cam_TR_BC_0 + 2*cam_TR_BD_0 + 2*cam_TR_CD_0 + 3*cam_TR_ABC_0 + 3*cam_TR_ABD_0 + 3*cam_TR_ACD_0 + 3*cam_TR_BCD_0 + 4*cam_TR_ABCD_0 + 1*cam_TT_A_0 + 1*cam_TT_A_Ng + 1*cam_TT_B_0 + 1*cam_TT_B_Ng + 1*cam_TT_C_0 + 1*cam_TT_C_Ng + 1*cam_TT_D_0 + 1*cam_TT_D_Ng + 2*cam_TT_AB_0 + 2*cam_TT_AB_Ng + 2*cam_TT_AC_0 + 2*cam_TT_AC_Ng + 2*cam_TT_AD_0 + 2*cam_TT_AD_Ng + 2*cam_TT_BC_0 + 2*cam_TT_BC_Ng + 2*cam_TT_BD_0 + 2*cam_TT_BD_Ng + 2*cam_TT_CD_0 + 2*cam_TT_CD_Ng + 3*cam_TT_ABC_0 + 3*cam_TT_ABC_Ng + 3*cam_TT_ABD_0 + 3*cam_TT_ABD_Ng + 3*cam_TT_ACD_0 + 3*cam_TT_ACD_Ng + 3*cam_TT_BCD_0 + 3*cam_TT_BCD_Ng + 4*cam_TT_ABCD_0 + 4*cam_TT_ABCD_Ng)/(4*cam_tot);
  cam_Ng_bound_fraction := (cam_RT_0_Ng + cam_RT_A_Ng + cam_RT_B_Ng + cam_RT_C_Ng + cam_RT_D_Ng + cam_RT_AB_Ng + cam_RT_AC_Ng + cam_RT_AD_Ng + cam_RT_BC_Ng + cam_RT_BD_Ng + cam_RT_CD_Ng + cam_RT_ABC_Ng + cam_RT_ABD_Ng + cam_RT_ACD_Ng + cam_RT_BCD_Ng + cam_RT_ABCD_Ng + cam_TT_0_Ng + cam_TT_A_Ng + cam_TT_B_Ng + cam_TT_C_Ng + cam_TT_D_Ng + cam_TT_AB_Ng + cam_TT_AC_Ng + cam_TT_AD_Ng + cam_TT_BC_Ng + cam_TT_BD_Ng + cam_TT_CD_Ng + cam_TT_ABC_Ng + cam_TT_ABD_Ng + cam_TT_ACD_Ng + cam_TT_BCD_Ng + cam_TT_ABCD_Ng)/cam_tot;
  cam_PP2BCa2_bound_fraction := (cam_RR_0_PP2BCa2 + cam_RR_A_PP2BCa2 + cam_RR_B_PP2BCa2 + cam_RR_C_PP2BCa2 + cam_RR_D_PP2BCa2 + cam_RR_AB_PP2BCa2 + cam_RR_AC_PP2BCa2 + cam_RR_AD_PP2BCa2 + cam_RR_BC_PP2BCa2 + cam_RR_BD_PP2BCa2 + cam_RR_CD_PP2BCa2 + cam_RR_ABC_PP2BCa2 + cam_RR_ABD_PP2BCa2 + cam_RR_ACD_PP2BCa2 + cam_RR_BCD_PP2BCa2 + cam_RR_ABCD_PP2BCa2)/cam_tot;
  cam_CaMKIIp_bound_fraction := (cam_RR_0_CaMKIIp + cam_RR_A_CaMKIIp + cam_RR_B_CaMKIIp + cam_RR_C_CaMKIIp + cam_RR_D_CaMKIIp + cam_RR_AB_CaMKIIp + cam_RR_AC_CaMKIIp + cam_RR_AD_CaMKIIp + cam_RR_BC_CaMKIIp + cam_RR_BD_CaMKIIp + cam_RR_CD_CaMKIIp + cam_RR_ABC_CaMKIIp + cam_RR_ABD_CaMKIIp + cam_RR_ACD_CaMKIIp + cam_RR_BCD_CaMKIIp + cam_RR_ABCD_CaMKIIp)/cam_tot;
  cam_0_bound_fraction := (cam_RR_0_0 + cam_RR_A_0 + cam_RR_B_0 + cam_RR_C_0 + cam_RR_D_0 + cam_RR_AB_0 + cam_RR_AC_0 + cam_RR_AD_0 + cam_RR_BC_0 + cam_RR_BD_0 + cam_RR_CD_0 + cam_RR_ABC_0 + cam_RR_ABD_0 + cam_RR_ACD_0 + cam_RR_BCD_0 + cam_RR_ABCD_0 + cam_RT_0_0 + cam_RT_A_0 + cam_RT_B_0 + cam_RT_C_0 + cam_RT_D_0 + cam_RT_AB_0 + cam_RT_AC_0 + cam_RT_AD_0 + cam_RT_BC_0 + cam_RT_BD_0 + cam_RT_CD_0 + cam_RT_ABC_0 + cam_RT_ABD_0 + cam_RT_ACD_0 + cam_RT_BCD_0 + cam_RT_ABCD_0 + cam_TR_0_0 + cam_TR_A_0 + cam_TR_B_0 + cam_TR_C_0 + cam_TR_D_0 + cam_TR_AB_0 + cam_TR_AC_0 + cam_TR_AD_0 + cam_TR_BC_0 + cam_TR_BD_0 + cam_TR_CD_0 + cam_TR_ABC_0 + cam_TR_ABD_0 + cam_TR_ACD_0 + cam_TR_BCD_0 + cam_TR_ABCD_0 + cam_TT_0_0 + cam_TT_A_0 + cam_TT_B_0 + cam_TT_C_0 + cam_TT_D_0 + cam_TT_AB_0 + cam_TT_AC_0 + cam_TT_AD_0 + cam_TT_BC_0 + cam_TT_BD_0 + cam_TT_CD_0 + cam_TT_ABC_0 + cam_TT_ABD_0 + cam_TT_ACD_0 + cam_TT_BCD_0 + cam_TT_ABCD_0)/cam_tot;
  koff_CaN_Ca2_Ca := Kd_CaN_Ca2_Ca*kon_CaN_Ca;
  koff_CaN_Ca3_Ca := Kd_CaN_Ca3_Ca*kon_CaN_Ca;
  Ca_bound := ybar_tot*4*cam_tot + CaNCa3*3 + PP2BCa2*4 + cam_PP2BCa2_tot*4 + PP2BiCa1 + PP2BiCa2*2;
  CaMKIIp_tot := cam_CaMKIIp_tot + CaMKIIp;
  TIME_SPIKE := TIME_EQUIL + 0.05;
  cam_CaMKII_CaMKIIp_bound_fraction := cam_CaMKII_bound_fraction + cam_CaMKIIp_bound_fraction;
  spikeInput := piecewise(0.0004*0.008*spikeFrequency, 1/spikeFrequency < 0.008, 0.0004);
  ca_bound_to_cam := ybar_tot*4*cam_tot;
  ca_bound_to_PP2B := CaNCa3*3 + 4*PP2BCa2 + cam_PP2BCa2_tot*4 + PP2BiCa1 + PP2BiCa2*2;
  RT_Ng := RTbar_Ng*cam_Ng_tot;
  TT_Ng := TTbar_Ng*cam_Ng_tot;
  k_RT2TT_N0_Ng := k_R2T_N0*sqrt(eNT_Ng);
  k_RT2TT_N1_Ng := k_R2T_N1*sqrt(eNT_Ng);
  k_RT2TT_N2_Ng := k_R2T_N2*sqrt(eNT_Ng);
  koff_CaNBi_1 := kon_CaN_Ca*Kd_CaNBi_1;
  koff_CaNBi_2 := kon_CaN_Ca*Kd_CaNBi_2;
  CaMKIItot_tot := cam_CaMKII_tot + cam_CaMKIIp_tot + CaMKII + CaMKIIp;
  CaMKII_sat_ratio := piecewise((cam_CaMKII_tot + cam_CaMKIIp_tot)/(cam_CaMKII_tot + cam_CaMKIIp_tot + CaMKII + CaMKIIp), CaMKIItot_tot != 0, 0);
  CaMKII_autopho_ratio := piecewise((CaMKIIp + cam_CaMKIIp_tot)/(CaMKIIp + CaMKII + cam_CaMKII_tot + cam_CaMKIIp_tot), CaMKIItot_tot != 0, 0);
  CaMKII_active_ratio := piecewise((cam_CaMKII_tot + cam_CaMKIIp_tot + CaMKIIp)/(cam_CaMKII_tot + cam_CaMKIIp_tot + CaMKII + CaMKIIp), CaMKIItot_tot != 0, 0);
  prob_autophos := MAX(0.38*CaMKII_active_ratio^5 - 0.8354*CaMKII_active_ratio^4 + 0.2942*CaMKII_active_ratio^3 + 1.158*CaMKII_active_ratio^2 + 0.002378*CaMKII_active_ratio - 3.676e-5, 0);
  k_camkii_pho := prob_autophos*6.3;
  CaMKIIp_alone_ratio := piecewise(CaMKIIp/(cam_CaMKII_tot + cam_CaMKIIp_tot + CaMKII + CaMKIIp), CaMKIItot_tot != 0, 0);
  CaMKIIp_sat_ratio := piecewise(cam_CaMKIIp_tot/(cam_CaMKIIp_tot + cam_CaMKII_tot + CaMKII + CaMKIIp), CaMKIItot_tot != 0, 0);
  CaMKIInonp_sat_ratio := piecewise(cam_CaMKII_tot/(cam_CaMKII_tot + cam_CaMKIIp_tot + CaMKII + CaMKIIp), CaMKIItot_tot != 0, 0);
  Ng_tot := cam_Ng_tot + Ng;
  cam_Ng_bound_ratio := piecewise(cam_Ng_tot/(cam_Ng_tot + Ng), Ng_tot != 0, 0);
  PP2B_tot := cam_PP2BCa2_tot + CaNCa3 + PP2BCa2 + PP2Bi + PP2BiCa1 + PP2BiCa2;
  CaN_activity_ratio := piecewise(cam_PP2BCa2_tot/(cam_PP2BCa2_tot + PP2BCa2 + CaNCa3 + PP2BiCa1 + PP2BiCa2 + PP2Bi), PP2B_tot != 0, 0);

  // Reactions:
  PP2BCa2_binding_to_cam_RR_0_0: PP2BCa2 + cam_RR_0_0 -> cam_RR_0_PP2BCa2; cytosol*(kon_PP2BCa2*PP2BCa2*cam_RR_0_0 - koff_PP2BCa2_RR*cam_RR_0_PP2BCa2); PP2BCa2_binding_to_cam_RR_0_0 is "CaNCa4 binding to CaM_RR_0_0";
  CaMKII_binding_to_cam_RR_0_0: CaMKII + cam_RR_0_0 -> cam_RR_0_CaMKII; cytosol*(kon_CaMKII*CaMKII*cam_RR_0_0 - koff_CaMKII_RR*cam_RR_0_CaMKII); CaMKII_binding_to_cam_RR_0_0 is "CaMKII binding to CaM_RR_0_0";
  CaMKIIp_binding_to_cam_RR_0_0: CaMKIIp + cam_RR_0_0 -> cam_RR_0_CaMKIIp; cytosol*(kon_CaMKIIp*CaMKIIp*cam_RR_0_0 - koff_CaMKIIp_RR*cam_RR_0_CaMKIIp); CaMKIIp_binding_to_cam_RR_0_0 is "CaMKIIp binding to CaM_RR_0_0";
  ca_binding_to_cam_RR_0_0_on_site_A: ca + cam_RR_0_0 -> cam_RR_A_0; cytosol*(kon_AR*ca*cam_RR_0_0 - koff_AR*cam_RR_A_0); ca_binding_to_cam_RR_0_0_on_site_A is "Ca binding to CaM_RR_0_0 on site a";
  PP2BCa2_binding_to_cam_RR_A_0: PP2BCa2 + cam_RR_A_0 -> cam_RR_A_PP2BCa2; cytosol*(kon_PP2BCa2*PP2BCa2*cam_RR_A_0 - koff_PP2BCa2_RR*cam_RR_A_PP2BCa2); PP2BCa2_binding_to_cam_RR_A_0 is "CaNCa4 binding to CaM_RR_a_0";
  ca_binding_to_cam_RR_0_PP2BCa2_on_site_A: ca + cam_RR_0_PP2BCa2 -> cam_RR_A_PP2BCa2; cytosol*(kon_AR*ca*cam_RR_0_PP2BCa2 - koff_AR*cam_RR_A_PP2BCa2); ca_binding_to_cam_RR_0_PP2BCa2_on_site_A is "Ca binding to CaM_RR_0_CaNCa4 on site a";
  CaMKII_binding_to_cam_RR_A_0: CaMKII + cam_RR_A_0 -> cam_RR_A_CaMKII; cytosol*(kon_CaMKII*CaMKII*cam_RR_A_0 - koff_CaMKII_RR*cam_RR_A_CaMKII); CaMKII_binding_to_cam_RR_A_0 is "CaMKII binding to CaM_RR_a_0";
  ca_binding_to_cam_RR_0_CaMKII_on_site_A: ca + cam_RR_0_CaMKII -> cam_RR_A_CaMKII; cytosol*(kon_AR*ca*cam_RR_0_CaMKII - koff_AR*cam_RR_A_CaMKII); ca_binding_to_cam_RR_0_CaMKII_on_site_A is "Ca binding to CaM_RR_0_CaMKII on site a";
  CaMKIIp_binding_to_cam_RR_A_0: CaMKIIp + cam_RR_A_0 -> cam_RR_A_CaMKIIp; cytosol*(kon_CaMKIIp*CaMKIIp*cam_RR_A_0 - koff_CaMKIIp_RR*cam_RR_A_CaMKIIp); CaMKIIp_binding_to_cam_RR_A_0 is "CaMKIIp binding to CaM_RR_a_0";
  ca_binding_to_cam_RR_0_CaMKIIp_on_site_A: ca + cam_RR_0_CaMKIIp -> cam_RR_A_CaMKIIp; cytosol*(kon_AR*ca*cam_RR_0_CaMKIIp - koff_AR*cam_RR_A_CaMKIIp); ca_binding_to_cam_RR_0_CaMKIIp_on_site_A is "Ca binding to CaM_RR_0_CaMKIIp on site a";
  ca_binding_to_cam_RR_0_0_on_site_B: ca + cam_RR_0_0 -> cam_RR_B_0; cytosol*(kon_BR*ca*cam_RR_0_0 - koff_BR*cam_RR_B_0); ca_binding_to_cam_RR_0_0_on_site_B is "Ca binding to CaM_RR_0_0 on site b";
  PP2BCa2_binding_to_cam_RR_B_0: PP2BCa2 + cam_RR_B_0 -> cam_RR_B_PP2BCa2; cytosol*(kon_PP2BCa2*PP2BCa2*cam_RR_B_0 - koff_PP2BCa2_RR*cam_RR_B_PP2BCa2); PP2BCa2_binding_to_cam_RR_B_0 is "CaNCa4 binding to CaM_RR_b_0";
  ca_binding_to_cam_RR_0_PP2BCa2_on_site_B: ca + cam_RR_0_PP2BCa2 -> cam_RR_B_PP2BCa2; cytosol*(kon_BR*ca*cam_RR_0_PP2BCa2 - koff_BR*cam_RR_B_PP2BCa2); ca_binding_to_cam_RR_0_PP2BCa2_on_site_B is "Ca binding to CaM_RR_0_CaNCa4 on site b";
  CaMKII_binding_to_cam_RR_B_0: CaMKII + cam_RR_B_0 -> cam_RR_B_CaMKII; cytosol*(kon_CaMKII*CaMKII*cam_RR_B_0 - koff_CaMKII_RR*cam_RR_B_CaMKII); CaMKII_binding_to_cam_RR_B_0 is "CaMKII binding to CaM_RR_b_0";
  ca_binding_to_cam_RR_0_CaMKII_on_site_B: ca + cam_RR_0_CaMKII -> cam_RR_B_CaMKII; cytosol*(kon_BR*ca*cam_RR_0_CaMKII - koff_BR*cam_RR_B_CaMKII); ca_binding_to_cam_RR_0_CaMKII_on_site_B is "Ca binding to CaM_RR_0_CaMKII on site b";
  CaMKIIp_binding_to_cam_RR_B_0: CaMKIIp + cam_RR_B_0 -> cam_RR_B_CaMKIIp; cytosol*(kon_CaMKIIp*CaMKIIp*cam_RR_B_0 - koff_CaMKIIp_RR*cam_RR_B_CaMKIIp); CaMKIIp_binding_to_cam_RR_B_0 is "CaMKIIp binding to CaM_RR_b_0";
  ca_binding_to_cam_RR_0_CaMKIIp_on_site_B: ca + cam_RR_0_CaMKIIp -> cam_RR_B_CaMKIIp; cytosol*(kon_BR*ca*cam_RR_0_CaMKIIp - koff_BR*cam_RR_B_CaMKIIp); ca_binding_to_cam_RR_0_CaMKIIp_on_site_B is "Ca binding to CaM_RR_0_CaMKIIp on site b";
  ca_binding_to_cam_RR_0_0_on_site_C: ca + cam_RR_0_0 -> cam_RR_C_0; cytosol*(kon_CR*ca*cam_RR_0_0 - koff_CR*cam_RR_C_0); ca_binding_to_cam_RR_0_0_on_site_C is "Ca binding to CaM_RR_0_0 on site c";
  PP2BCa2_binding_to_cam_RR_C_0: PP2BCa2 + cam_RR_C_0 -> cam_RR_C_PP2BCa2; cytosol*(kon_PP2BCa2*PP2BCa2*cam_RR_C_0 - koff_PP2BCa2_RR*cam_RR_C_PP2BCa2); PP2BCa2_binding_to_cam_RR_C_0 is "CaNCa4 binding to CaM_RR_c_0";
  ca_binding_to_cam_RR_0_PP2BCa2_on_site_C: ca + cam_RR_0_PP2BCa2 -> cam_RR_C_PP2BCa2; cytosol*(kon_CR*ca*cam_RR_0_PP2BCa2 - koff_CR*cam_RR_C_PP2BCa2); ca_binding_to_cam_RR_0_PP2BCa2_on_site_C is "Ca binding to CaM_RR_0_CaNCa4 on site c";
  CaMKII_binding_to_cam_RR_C_0: CaMKII + cam_RR_C_0 -> cam_RR_C_CaMKII; cytosol*(kon_CaMKII*CaMKII*cam_RR_C_0 - koff_CaMKII_RR*cam_RR_C_CaMKII); CaMKII_binding_to_cam_RR_C_0 is "CaMKII binding to CaM_RR_c_0";
  ca_binding_to_cam_RR_0_CaMKII_on_site_C: ca + cam_RR_0_CaMKII -> cam_RR_C_CaMKII; cytosol*(kon_CR*ca*cam_RR_0_CaMKII - koff_CR*cam_RR_C_CaMKII); ca_binding_to_cam_RR_0_CaMKII_on_site_C is "Ca binding to CaM_RR_0_CaMKII on site c";
  CaMKIIp_binding_to_cam_RR_C_0: CaMKIIp + cam_RR_C_0 -> cam_RR_C_CaMKIIp; cytosol*(kon_CaMKIIp*CaMKIIp*cam_RR_C_0 - koff_CaMKIIp_RR*cam_RR_C_CaMKIIp); CaMKIIp_binding_to_cam_RR_C_0 is "CaMKIIp binding to CaM_RR_c_0";
  ca_binding_to_cam_RR_0_CaMKIIp_on_site_C: ca + cam_RR_0_CaMKIIp -> cam_RR_C_CaMKIIp; cytosol*(kon_CR*ca*cam_RR_0_CaMKIIp - koff_CR*cam_RR_C_CaMKIIp); ca_binding_to_cam_RR_0_CaMKIIp_on_site_C is "Ca binding to CaM_RR_0_CaMKIIp on site c";
  ca_binding_to_cam_RR_0_0_on_site_D: ca + cam_RR_0_0 -> cam_RR_D_0; cytosol*(kon_DR*ca*cam_RR_0_0 - koff_DR*cam_RR_D_0); ca_binding_to_cam_RR_0_0_on_site_D is "Ca binding to CaM_RR_0_0 on site d";
  PP2BCa2_binding_to_cam_RR_D_0: PP2BCa2 + cam_RR_D_0 -> cam_RR_D_PP2BCa2; cytosol*(kon_PP2BCa2*PP2BCa2*cam_RR_D_0 - koff_PP2BCa2_RR*cam_RR_D_PP2BCa2); PP2BCa2_binding_to_cam_RR_D_0 is "CaNCa4 binding to CaM_RR_d_0";
  ca_binding_to_cam_RR_0_PP2BCa2_on_site_D: ca + cam_RR_0_PP2BCa2 -> cam_RR_D_PP2BCa2; cytosol*(kon_DR*ca*cam_RR_0_PP2BCa2 - koff_DR*cam_RR_D_PP2BCa2); ca_binding_to_cam_RR_0_PP2BCa2_on_site_D is "Ca binding to CaM_RR_0_CaNCa4 on site d";
  CaMKII_binding_to_cam_RR_D_0: CaMKII + cam_RR_D_0 -> cam_RR_D_CaMKII; cytosol*(kon_CaMKII*CaMKII*cam_RR_D_0 - koff_CaMKII_RR*cam_RR_D_CaMKII); CaMKII_binding_to_cam_RR_D_0 is "CaMKII binding to CaM_RR_d_0";
  ca_binding_to_cam_RR_0_CaMKII_on_site_D: ca + cam_RR_0_CaMKII -> cam_RR_D_CaMKII; cytosol*(kon_DR*ca*cam_RR_0_CaMKII - koff_DR*cam_RR_D_CaMKII); ca_binding_to_cam_RR_0_CaMKII_on_site_D is "Ca binding to CaM_RR_0_CaMKII on site d";
  CaMKIIp_binding_to_cam_RR_D_0: CaMKIIp + cam_RR_D_0 -> cam_RR_D_CaMKIIp; cytosol*(kon_CaMKIIp*CaMKIIp*cam_RR_D_0 - koff_CaMKIIp_RR*cam_RR_D_CaMKIIp); CaMKIIp_binding_to_cam_RR_D_0 is "CaMKIIp binding to CaM_RR_d_0";
  ca_binding_to_cam_RR_0_CaMKIIp_on_site_D: ca + cam_RR_0_CaMKIIp -> cam_RR_D_CaMKIIp; cytosol*(kon_DR*ca*cam_RR_0_CaMKIIp - koff_DR*cam_RR_D_CaMKIIp); ca_binding_to_cam_RR_0_CaMKIIp_on_site_D is "Ca binding to CaM_RR_0_CaMKIIp on site d";
  ca_binding_to_cam_RR_B_0_on_site_A: ca + cam_RR_B_0 -> cam_RR_AB_0; cytosol*(kon_AR*ca*cam_RR_B_0 - koff_AR*cam_RR_AB_0); ca_binding_to_cam_RR_B_0_on_site_A is "Ca binding to CaM_RR_b_0 on site a";
  ca_binding_to_cam_RR_A_0_on_site_B: ca + cam_RR_A_0 -> cam_RR_AB_0; cytosol*(kon_BR*ca*cam_RR_A_0 - koff_BR*cam_RR_AB_0); ca_binding_to_cam_RR_A_0_on_site_B is "Ca binding to CaM_RR_a_0 on site b";
  PP2BCa2_binding_to_cam_RR_AB_0: PP2BCa2 + cam_RR_AB_0 -> cam_RR_AB_PP2BCa2; cytosol*(kon_PP2BCa2*PP2BCa2*cam_RR_AB_0 - koff_PP2BCa2_RR*cam_RR_AB_PP2BCa2); PP2BCa2_binding_to_cam_RR_AB_0 is "CaNCa4 binding to CaM_RR_ab_0";
  ca_binding_to_cam_RR_B_PP2BCa2_on_site_A: ca + cam_RR_B_PP2BCa2 -> cam_RR_AB_PP2BCa2; cytosol*(kon_AR*ca*cam_RR_B_PP2BCa2 - koff_AR*cam_RR_AB_PP2BCa2); ca_binding_to_cam_RR_B_PP2BCa2_on_site_A is "Ca binding to CaM_RR_b_CaNCa4 on site a";
  ca_binding_to_cam_RR_A_PP2BCa2_on_site_B: ca + cam_RR_A_PP2BCa2 -> cam_RR_AB_PP2BCa2; cytosol*(kon_BR*ca*cam_RR_A_PP2BCa2 - koff_BR*cam_RR_AB_PP2BCa2); ca_binding_to_cam_RR_A_PP2BCa2_on_site_B is "Ca binding to CaM_RR_a_CaNCa4 on site b";
  CaMKII_binding_to_cam_RR_AB_0: CaMKII + cam_RR_AB_0 -> cam_RR_AB_CaMKII; cytosol*(kon_CaMKII*CaMKII*cam_RR_AB_0 - koff_CaMKII_RR*cam_RR_AB_CaMKII); CaMKII_binding_to_cam_RR_AB_0 is "CaMKII binding to CaM_RR_ab_0";
  ca_binding_to_cam_RR_B_CaMKII_on_site_A: ca + cam_RR_B_CaMKII -> cam_RR_AB_CaMKII; cytosol*(kon_AR*ca*cam_RR_B_CaMKII - koff_AR*cam_RR_AB_CaMKII); ca_binding_to_cam_RR_B_CaMKII_on_site_A is "Ca binding to CaM_RR_b_CaMKII on site a";
  ca_binding_to_cam_RR_A_CaMKII_on_site_B: ca + cam_RR_A_CaMKII -> cam_RR_AB_CaMKII; cytosol*(kon_BR*ca*cam_RR_A_CaMKII - koff_BR*cam_RR_AB_CaMKII); ca_binding_to_cam_RR_A_CaMKII_on_site_B is "Ca binding to CaM_RR_a_CaMKII on site b";
  CaMKIIp_binding_to_cam_RR_AB_0: CaMKIIp + cam_RR_AB_0 -> cam_RR_AB_CaMKIIp; cytosol*(kon_CaMKIIp*CaMKIIp*cam_RR_AB_0 - koff_CaMKIIp_RR*cam_RR_AB_CaMKIIp); CaMKIIp_binding_to_cam_RR_AB_0 is "CaMKIIp binding to CaM_RR_ab_0";
  ca_binding_to_cam_RR_B_CaMKIIp_on_site_A: ca + cam_RR_B_CaMKIIp -> cam_RR_AB_CaMKIIp; cytosol*(kon_AR*ca*cam_RR_B_CaMKIIp - koff_AR*cam_RR_AB_CaMKIIp); ca_binding_to_cam_RR_B_CaMKIIp_on_site_A is "Ca binding to CaM_RR_b_CaMKIIp on site a";
  ca_binding_to_cam_RR_A_CaMKIIp_on_site_B: ca + cam_RR_A_CaMKIIp -> cam_RR_AB_CaMKIIp; cytosol*(kon_BR*ca*cam_RR_A_CaMKIIp - koff_BR*cam_RR_AB_CaMKIIp); ca_binding_to_cam_RR_A_CaMKIIp_on_site_B is "Ca binding to CaM_RR_a_CaMKIIp on site b";
  ca_binding_to_cam_RR_C_0_on_site_A: ca + cam_RR_C_0 -> cam_RR_AC_0; cytosol*(kon_AR*ca*cam_RR_C_0 - koff_AR*cam_RR_AC_0); ca_binding_to_cam_RR_C_0_on_site_A is "Ca binding to CaM_RR_c_0 on site a";
  ca_binding_to_cam_RR_A_0_on_site_C: ca + cam_RR_A_0 -> cam_RR_AC_0; cytosol*(kon_CR*ca*cam_RR_A_0 - koff_CR*cam_RR_AC_0); ca_binding_to_cam_RR_A_0_on_site_C is "Ca binding to CaM_RR_a_0 on site c";
  PP2BCa2_binding_to_cam_RR_AC_0: PP2BCa2 + cam_RR_AC_0 -> cam_RR_AC_PP2BCa2; cytosol*(kon_PP2BCa2*PP2BCa2*cam_RR_AC_0 - koff_PP2BCa2_RR*cam_RR_AC_PP2BCa2); PP2BCa2_binding_to_cam_RR_AC_0 is "CaNCa4 binding to CaM_RR_ac_0";
  ca_binding_to_cam_RR_C_PP2BCa2_on_site_A: ca + cam_RR_C_PP2BCa2 -> cam_RR_AC_PP2BCa2; cytosol*(kon_AR*ca*cam_RR_C_PP2BCa2 - koff_AR*cam_RR_AC_PP2BCa2); ca_binding_to_cam_RR_C_PP2BCa2_on_site_A is "Ca binding to CaM_RR_c_CaNCa4 on site a";
  ca_binding_to_cam_RR_A_PP2BCa2_on_site_C: ca + cam_RR_A_PP2BCa2 -> cam_RR_AC_PP2BCa2; cytosol*(kon_CR*ca*cam_RR_A_PP2BCa2 - koff_CR*cam_RR_AC_PP2BCa2); ca_binding_to_cam_RR_A_PP2BCa2_on_site_C is "Ca binding to CaM_RR_a_CaNCa4 on site c";
  CaMKII_binding_to_cam_RR_AC_0: CaMKII + cam_RR_AC_0 -> cam_RR_AC_CaMKII; cytosol*(kon_CaMKII*CaMKII*cam_RR_AC_0 - koff_CaMKII_RR*cam_RR_AC_CaMKII); CaMKII_binding_to_cam_RR_AC_0 is "CaMKII binding to CaM_RR_ac_0";
  ca_binding_to_cam_RR_C_CaMKII_on_site_A: ca + cam_RR_C_CaMKII -> cam_RR_AC_CaMKII; cytosol*(kon_AR*ca*cam_RR_C_CaMKII - koff_AR*cam_RR_AC_CaMKII); ca_binding_to_cam_RR_C_CaMKII_on_site_A is "Ca binding to CaM_RR_c_CaMKII on site a";
  ca_binding_to_cam_RR_A_CaMKII_on_site_C: ca + cam_RR_A_CaMKII -> cam_RR_AC_CaMKII; cytosol*(kon_CR*ca*cam_RR_A_CaMKII - koff_CR*cam_RR_AC_CaMKII); ca_binding_to_cam_RR_A_CaMKII_on_site_C is "Ca binding to CaM_RR_a_CaMKII on site c";
  CaMKIIp_binding_to_cam_RR_AC_0: CaMKIIp + cam_RR_AC_0 -> cam_RR_AC_CaMKIIp; cytosol*(kon_CaMKIIp*CaMKIIp*cam_RR_AC_0 - koff_CaMKIIp_RR*cam_RR_AC_CaMKIIp); CaMKIIp_binding_to_cam_RR_AC_0 is "CaMKIIp binding to CaM_RR_ac_0";
  ca_binding_to_cam_RR_C_CaMKIIp_on_site_A: ca + cam_RR_C_CaMKIIp -> cam_RR_AC_CaMKIIp; cytosol*(kon_AR*ca*cam_RR_C_CaMKIIp - koff_AR*cam_RR_AC_CaMKIIp); ca_binding_to_cam_RR_C_CaMKIIp_on_site_A is "Ca binding to CaM_RR_c_CaMKIIp on site a";
  ca_binding_to_cam_RR_A_CaMKIIp_on_site_C: ca + cam_RR_A_CaMKIIp -> cam_RR_AC_CaMKIIp; cytosol*(kon_CR*ca*cam_RR_A_CaMKIIp - koff_CR*cam_RR_AC_CaMKIIp); ca_binding_to_cam_RR_A_CaMKIIp_on_site_C is "Ca binding to CaM_RR_a_CaMKIIp on site c";
  ca_binding_to_cam_RR_D_0_on_site_A: ca + cam_RR_D_0 -> cam_RR_AD_0; cytosol*(kon_AR*ca*cam_RR_D_0 - koff_AR*cam_RR_AD_0); ca_binding_to_cam_RR_D_0_on_site_A is "Ca binding to CaM_RR_d_0 on site a";
  ca_binding_to_cam_RR_A_0_on_site_D: ca + cam_RR_A_0 -> cam_RR_AD_0; cytosol*(kon_DR*ca*cam_RR_A_0 - koff_DR*cam_RR_AD_0); ca_binding_to_cam_RR_A_0_on_site_D is "Ca binding to CaM_RR_a_0 on site d";
  PP2BCa2_binding_to_cam_RR_AD_0: PP2BCa2 + cam_RR_AD_0 -> cam_RR_AD_PP2BCa2; cytosol*(kon_PP2BCa2*PP2BCa2*cam_RR_AD_0 - koff_PP2BCa2_RR*cam_RR_AD_PP2BCa2); PP2BCa2_binding_to_cam_RR_AD_0 is "CaNCa4 binding to CaM_RR_ad_0";
  ca_binding_to_cam_RR_D_PP2BCa2_on_site_A: ca + cam_RR_D_PP2BCa2 -> cam_RR_AD_PP2BCa2; cytosol*(kon_AR*ca*cam_RR_D_PP2BCa2 - koff_AR*cam_RR_AD_PP2BCa2); ca_binding_to_cam_RR_D_PP2BCa2_on_site_A is "Ca binding to CaM_RR_d_CaNCa4 on site a";
  ca_binding_to_cam_RR_A_PP2BCa2_on_site_D: ca + cam_RR_A_PP2BCa2 -> cam_RR_AD_PP2BCa2; cytosol*(kon_DR*ca*cam_RR_A_PP2BCa2 - koff_DR*cam_RR_AD_PP2BCa2); ca_binding_to_cam_RR_A_PP2BCa2_on_site_D is "Ca binding to CaM_RR_a_CaNCa4 on site d";
  CaMKII_binding_to_cam_RR_AD_0: CaMKII + cam_RR_AD_0 -> cam_RR_AD_CaMKII; cytosol*(kon_CaMKII*CaMKII*cam_RR_AD_0 - koff_CaMKII_RR*cam_RR_AD_CaMKII); CaMKII_binding_to_cam_RR_AD_0 is "CaMKII binding to CaM_RR_ad_0";
  ca_binding_to_cam_RR_D_CaMKII_on_site_A: ca + cam_RR_D_CaMKII -> cam_RR_AD_CaMKII; cytosol*(kon_AR*ca*cam_RR_D_CaMKII - koff_AR*cam_RR_AD_CaMKII); ca_binding_to_cam_RR_D_CaMKII_on_site_A is "Ca binding to CaM_RR_d_CaMKII on site a";
  ca_binding_to_cam_RR_A_CaMKII_on_site_D: ca + cam_RR_A_CaMKII -> cam_RR_AD_CaMKII; cytosol*(kon_DR*ca*cam_RR_A_CaMKII - koff_DR*cam_RR_AD_CaMKII); ca_binding_to_cam_RR_A_CaMKII_on_site_D is "Ca binding to CaM_RR_a_CaMKII on site d";
  CaMKIIp_binding_to_cam_RR_AD_0: CaMKIIp + cam_RR_AD_0 -> cam_RR_AD_CaMKIIp; cytosol*(kon_CaMKIIp*CaMKIIp*cam_RR_AD_0 - koff_CaMKIIp_RR*cam_RR_AD_CaMKIIp); CaMKIIp_binding_to_cam_RR_AD_0 is "CaMKIIp binding to CaM_RR_ad_0";
  ca_binding_to_cam_RR_D_CaMKIIp_on_site_A: ca + cam_RR_D_CaMKIIp -> cam_RR_AD_CaMKIIp; cytosol*(kon_AR*ca*cam_RR_D_CaMKIIp - koff_AR*cam_RR_AD_CaMKIIp); ca_binding_to_cam_RR_D_CaMKIIp_on_site_A is "Ca binding to CaM_RR_d_CaMKIIp on site a";
  ca_binding_to_cam_RR_A_CaMKIIp_on_site_D: ca + cam_RR_A_CaMKIIp -> cam_RR_AD_CaMKIIp; cytosol*(kon_DR*ca*cam_RR_A_CaMKIIp - koff_DR*cam_RR_AD_CaMKIIp); ca_binding_to_cam_RR_A_CaMKIIp_on_site_D is "Ca binding to CaM_RR_a_CaMKIIp on site d";
  ca_binding_to_cam_RR_C_0_on_site_B: ca + cam_RR_C_0 -> cam_RR_BC_0; cytosol*(kon_BR*ca*cam_RR_C_0 - koff_BR*cam_RR_BC_0); ca_binding_to_cam_RR_C_0_on_site_B is "Ca binding to CaM_RR_c_0 on site b";
  ca_binding_to_cam_RR_B_0_on_site_C: ca + cam_RR_B_0 -> cam_RR_BC_0; cytosol*(kon_CR*ca*cam_RR_B_0 - koff_CR*cam_RR_BC_0); ca_binding_to_cam_RR_B_0_on_site_C is "Ca binding to CaM_RR_b_0 on site c";
  PP2BCa2_binding_to_cam_RR_BC_0: PP2BCa2 + cam_RR_BC_0 -> cam_RR_BC_PP2BCa2; cytosol*(kon_PP2BCa2*PP2BCa2*cam_RR_BC_0 - koff_PP2BCa2_RR*cam_RR_BC_PP2BCa2); PP2BCa2_binding_to_cam_RR_BC_0 is "CaNCa4 binding to CaM_RR_bc_0";
  ca_binding_to_cam_RR_C_PP2BCa2_on_site_B: ca + cam_RR_C_PP2BCa2 -> cam_RR_BC_PP2BCa2; cytosol*(kon_BR*ca*cam_RR_C_PP2BCa2 - koff_BR*cam_RR_BC_PP2BCa2); ca_binding_to_cam_RR_C_PP2BCa2_on_site_B is "Ca binding to CaM_RR_c_CaNCa4 on site b";
  ca_binding_to_cam_RR_B_PP2BCa2_on_site_C: ca + cam_RR_B_PP2BCa2 -> cam_RR_BC_PP2BCa2; cytosol*(kon_CR*ca*cam_RR_B_PP2BCa2 - koff_CR*cam_RR_BC_PP2BCa2); ca_binding_to_cam_RR_B_PP2BCa2_on_site_C is "Ca binding to CaM_RR_b_CaNCa4 on site c";
  CaMKII_binding_to_cam_RR_BC_0: CaMKII + cam_RR_BC_0 -> cam_RR_BC_CaMKII; cytosol*(kon_CaMKII*CaMKII*cam_RR_BC_0 - koff_CaMKII_RR*cam_RR_BC_CaMKII); CaMKII_binding_to_cam_RR_BC_0 is "CaMKII binding to CaM_RR_bc_0";
  ca_binding_to_cam_RR_C_CaMKII_on_site_B: ca + cam_RR_C_CaMKII -> cam_RR_BC_CaMKII; cytosol*(kon_BR*ca*cam_RR_C_CaMKII - koff_BR*cam_RR_BC_CaMKII); ca_binding_to_cam_RR_C_CaMKII_on_site_B is "Ca binding to CaM_RR_c_CaMKII on site b";
  ca_binding_to_cam_RR_B_CaMKII_on_site_C: ca + cam_RR_B_CaMKII -> cam_RR_BC_CaMKII; cytosol*(kon_CR*ca*cam_RR_B_CaMKII - koff_CR*cam_RR_BC_CaMKII); ca_binding_to_cam_RR_B_CaMKII_on_site_C is "Ca binding to CaM_RR_b_CaMKII on site c";
  CaMKIIp_binding_to_cam_RR_BC_0: CaMKIIp + cam_RR_BC_0 -> cam_RR_BC_CaMKIIp; cytosol*(kon_CaMKIIp*CaMKIIp*cam_RR_BC_0 - koff_CaMKIIp_RR*cam_RR_BC_CaMKIIp); CaMKIIp_binding_to_cam_RR_BC_0 is "CaMKIIp binding to CaM_RR_bc_0";
  ca_binding_to_cam_RR_C_CaMKIIp_on_site_B: ca + cam_RR_C_CaMKIIp -> cam_RR_BC_CaMKIIp; cytosol*(kon_BR*ca*cam_RR_C_CaMKIIp - koff_BR*cam_RR_BC_CaMKIIp); ca_binding_to_cam_RR_C_CaMKIIp_on_site_B is "Ca binding to CaM_RR_c_CaMKIIp on site b";
  ca_binding_to_cam_RR_B_CaMKIIp_on_site_C: ca + cam_RR_B_CaMKIIp -> cam_RR_BC_CaMKIIp; cytosol*(kon_CR*ca*cam_RR_B_CaMKIIp - koff_CR*cam_RR_BC_CaMKIIp); ca_binding_to_cam_RR_B_CaMKIIp_on_site_C is "Ca binding to CaM_RR_b_CaMKIIp on site c";
  ca_binding_to_cam_RR_D_0_on_site_B: ca + cam_RR_D_0 -> cam_RR_BD_0; cytosol*(kon_BR*ca*cam_RR_D_0 - koff_BR*cam_RR_BD_0); ca_binding_to_cam_RR_D_0_on_site_B is "Ca binding to CaM_RR_d_0 on site b";
  ca_binding_to_cam_RR_B_0_on_site_D: ca + cam_RR_B_0 -> cam_RR_BD_0; cytosol*(kon_DR*ca*cam_RR_B_0 - koff_DR*cam_RR_BD_0); ca_binding_to_cam_RR_B_0_on_site_D is "Ca binding to CaM_RR_b_0 on site d";
  PP2BCa2_binding_to_cam_RR_BD_0: PP2BCa2 + cam_RR_BD_0 -> cam_RR_BD_PP2BCa2; cytosol*(kon_PP2BCa2*PP2BCa2*cam_RR_BD_0 - koff_PP2BCa2_RR*cam_RR_BD_PP2BCa2); PP2BCa2_binding_to_cam_RR_BD_0 is "CaNCa4 binding to CaM_RR_bd_0";
  ca_binding_to_cam_RR_D_PP2BCa2_on_site_B: ca + cam_RR_D_PP2BCa2 -> cam_RR_BD_PP2BCa2; cytosol*(kon_BR*ca*cam_RR_D_PP2BCa2 - koff_BR*cam_RR_BD_PP2BCa2); ca_binding_to_cam_RR_D_PP2BCa2_on_site_B is "Ca binding to CaM_RR_d_CaNCa4 on site b";
  ca_binding_to_cam_RR_B_PP2BCa2_on_site_D: ca + cam_RR_B_PP2BCa2 -> cam_RR_BD_PP2BCa2; cytosol*(kon_DR*ca*cam_RR_B_PP2BCa2 - koff_DR*cam_RR_BD_PP2BCa2); ca_binding_to_cam_RR_B_PP2BCa2_on_site_D is "Ca binding to CaM_RR_b_CaNCa4 on site d";
  CaMKII_binding_to_cam_RR_BD_0: CaMKII + cam_RR_BD_0 -> cam_RR_BD_CaMKII; cytosol*(kon_CaMKII*CaMKII*cam_RR_BD_0 - koff_CaMKII_RR*cam_RR_BD_CaMKII); CaMKII_binding_to_cam_RR_BD_0 is "CaMKII binding to CaM_RR_bd_0";
  ca_binding_to_cam_RR_D_CaMKII_on_site_B: ca + cam_RR_D_CaMKII -> cam_RR_BD_CaMKII; cytosol*(kon_BR*ca*cam_RR_D_CaMKII - koff_BR*cam_RR_BD_CaMKII); ca_binding_to_cam_RR_D_CaMKII_on_site_B is "Ca binding to CaM_RR_d_CaMKII on site b";
  ca_binding_to_cam_RR_B_CaMKII_on_site_D: ca + cam_RR_B_CaMKII -> cam_RR_BD_CaMKII; cytosol*(kon_DR*ca*cam_RR_B_CaMKII - koff_DR*cam_RR_BD_CaMKII); ca_binding_to_cam_RR_B_CaMKII_on_site_D is "Ca binding to CaM_RR_b_CaMKII on site d";
  CaMKIIp_binding_to_cam_RR_BD_0: CaMKIIp + cam_RR_BD_0 -> cam_RR_BD_CaMKIIp; cytosol*(kon_CaMKIIp*CaMKIIp*cam_RR_BD_0 - koff_CaMKIIp_RR*cam_RR_BD_CaMKIIp); CaMKIIp_binding_to_cam_RR_BD_0 is "CaMKIIp binding to CaM_RR_bd_0";
  ca_binding_to_cam_RR_D_CaMKIIp_on_site_B: ca + cam_RR_D_CaMKIIp -> cam_RR_BD_CaMKIIp; cytosol*(kon_BR*ca*cam_RR_D_CaMKIIp - koff_BR*cam_RR_BD_CaMKIIp); ca_binding_to_cam_RR_D_CaMKIIp_on_site_B is "Ca binding to CaM_RR_d_CaMKIIp on site b";
  ca_binding_to_cam_RR_B_CaMKIIp_on_site_D: ca + cam_RR_B_CaMKIIp -> cam_RR_BD_CaMKIIp; cytosol*(kon_DR*ca*cam_RR_B_CaMKIIp - koff_DR*cam_RR_BD_CaMKIIp); ca_binding_to_cam_RR_B_CaMKIIp_on_site_D is "Ca binding to CaM_RR_b_CaMKIIp on site d";
  ca_binding_to_cam_RR_D_0_on_site_C: ca + cam_RR_D_0 -> cam_RR_CD_0; cytosol*(kon_CR*ca*cam_RR_D_0 - koff_CR*cam_RR_CD_0); ca_binding_to_cam_RR_D_0_on_site_C is "Ca binding to CaM_RR_d_0 on site c";
  ca_binding_to_cam_RR_C_0_on_site_D: ca + cam_RR_C_0 -> cam_RR_CD_0; cytosol*(kon_DR*ca*cam_RR_C_0 - koff_DR*cam_RR_CD_0); ca_binding_to_cam_RR_C_0_on_site_D is "Ca binding to CaM_RR_c_0 on site d";
  PP2BCa2_binding_to_cam_RR_CD_0: PP2BCa2 + cam_RR_CD_0 -> cam_RR_CD_PP2BCa2; cytosol*(kon_PP2BCa2*PP2BCa2*cam_RR_CD_0 - koff_PP2BCa2_RR*cam_RR_CD_PP2BCa2); PP2BCa2_binding_to_cam_RR_CD_0 is "CaNCa4 binding to CaM_RR_cd_0";
  ca_binding_to_cam_RR_D_PP2BCa2_on_site_C: ca + cam_RR_D_PP2BCa2 -> cam_RR_CD_PP2BCa2; cytosol*(kon_CR*ca*cam_RR_D_PP2BCa2 - koff_CR*cam_RR_CD_PP2BCa2); ca_binding_to_cam_RR_D_PP2BCa2_on_site_C is "Ca binding to CaM_RR_d_CaNCa4 on site c";
  ca_binding_to_cam_RR_C_PP2BCa2_on_site_D: ca + cam_RR_C_PP2BCa2 -> cam_RR_CD_PP2BCa2; cytosol*(kon_DR*ca*cam_RR_C_PP2BCa2 - koff_DR*cam_RR_CD_PP2BCa2); ca_binding_to_cam_RR_C_PP2BCa2_on_site_D is "Ca binding to CaM_RR_c_CaNCa4 on site d";
  CaMKII_binding_to_cam_RR_CD_0: CaMKII + cam_RR_CD_0 -> cam_RR_CD_CaMKII; cytosol*(kon_CaMKII*CaMKII*cam_RR_CD_0 - koff_CaMKII_RR*cam_RR_CD_CaMKII); CaMKII_binding_to_cam_RR_CD_0 is "CaMKII binding to CaM_RR_cd_0";
  ca_binding_to_cam_RR_D_CaMKII_on_site_C: ca + cam_RR_D_CaMKII -> cam_RR_CD_CaMKII; cytosol*(kon_CR*ca*cam_RR_D_CaMKII - koff_CR*cam_RR_CD_CaMKII); ca_binding_to_cam_RR_D_CaMKII_on_site_C is "Ca binding to CaM_RR_d_CaMKII on site c";
  ca_binding_to_cam_RR_C_CaMKII_on_site_D: ca + cam_RR_C_CaMKII -> cam_RR_CD_CaMKII; cytosol*(kon_DR*ca*cam_RR_C_CaMKII - koff_DR*cam_RR_CD_CaMKII); ca_binding_to_cam_RR_C_CaMKII_on_site_D is "Ca binding to CaM_RR_c_CaMKII on site d";
  CaMKIIp_binding_to_cam_RR_CD_0: CaMKIIp + cam_RR_CD_0 -> cam_RR_CD_CaMKIIp; cytosol*(kon_CaMKIIp*CaMKIIp*cam_RR_CD_0 - koff_CaMKIIp_RR*cam_RR_CD_CaMKIIp); CaMKIIp_binding_to_cam_RR_CD_0 is "CaMKIIp binding to CaM_RR_cd_0";
  ca_binding_to_cam_RR_D_CaMKIIp_on_site_C: ca + cam_RR_D_CaMKIIp -> cam_RR_CD_CaMKIIp; cytosol*(kon_CR*ca*cam_RR_D_CaMKIIp - koff_CR*cam_RR_CD_CaMKIIp); ca_binding_to_cam_RR_D_CaMKIIp_on_site_C is "Ca binding to CaM_RR_d_CaMKIIp on site c";
  ca_binding_to_cam_RR_C_CaMKIIp_on_site_D: ca + cam_RR_C_CaMKIIp -> cam_RR_CD_CaMKIIp; cytosol*(kon_DR*ca*cam_RR_C_CaMKIIp - koff_DR*cam_RR_CD_CaMKIIp); ca_binding_to_cam_RR_C_CaMKIIp_on_site_D is "Ca binding to CaM_RR_c_CaMKIIp on site d";
  ca_binding_to_cam_RR_BC_0_on_site_A: ca + cam_RR_BC_0 -> cam_RR_ABC_0; cytosol*(kon_AR*ca*cam_RR_BC_0 - koff_AR*cam_RR_ABC_0); ca_binding_to_cam_RR_BC_0_on_site_A is "Ca binding to CaM_RR_bc_0 on site a";
  ca_binding_to_cam_RR_AC_0_on_site_B: ca + cam_RR_AC_0 -> cam_RR_ABC_0; cytosol*(kon_BR*ca*cam_RR_AC_0 - koff_BR*cam_RR_ABC_0); ca_binding_to_cam_RR_AC_0_on_site_B is "Ca binding to CaM_RR_ac_0 on site b";
  ca_binding_to_cam_RR_AB_0_on_site_C: ca + cam_RR_AB_0 -> cam_RR_ABC_0; cytosol*(kon_CR*ca*cam_RR_AB_0 - koff_CR*cam_RR_ABC_0); ca_binding_to_cam_RR_AB_0_on_site_C is "Ca binding to CaM_RR_ab_0 on site c";
  PP2BCa2_binding_to_cam_RR_ABC_0: PP2BCa2 + cam_RR_ABC_0 -> cam_RR_ABC_PP2BCa2; cytosol*(kon_PP2BCa2*PP2BCa2*cam_RR_ABC_0 - koff_PP2BCa2_RR*cam_RR_ABC_PP2BCa2); PP2BCa2_binding_to_cam_RR_ABC_0 is "CaNCa4 binding to CaM_RR_abc_0";
  ca_binding_to_cam_RR_BC_PP2BCa2_on_site_A: ca + cam_RR_BC_PP2BCa2 -> cam_RR_ABC_PP2BCa2; cytosol*(kon_AR*ca*cam_RR_BC_PP2BCa2 - koff_AR*cam_RR_ABC_PP2BCa2); ca_binding_to_cam_RR_BC_PP2BCa2_on_site_A is "Ca binding to CaM_RR_bc_CaNCa4 on site a";
  ca_binding_to_cam_RR_AC_PP2BCa2_on_site_B: ca + cam_RR_AC_PP2BCa2 -> cam_RR_ABC_PP2BCa2; cytosol*(kon_BR*ca*cam_RR_AC_PP2BCa2 - koff_BR*cam_RR_ABC_PP2BCa2); ca_binding_to_cam_RR_AC_PP2BCa2_on_site_B is "Ca binding to CaM_RR_ac_CaNCa4 on site b";
  ca_binding_to_cam_RR_AB_PP2BCa2_on_site_C: ca + cam_RR_AB_PP2BCa2 -> cam_RR_ABC_PP2BCa2; cytosol*(kon_CR*ca*cam_RR_AB_PP2BCa2 - koff_CR*cam_RR_ABC_PP2BCa2); ca_binding_to_cam_RR_AB_PP2BCa2_on_site_C is "Ca binding to CaM_RR_ab_CaNCa4 on site c";
  CaMKII_binding_to_cam_RR_ABC_0: CaMKII + cam_RR_ABC_0 -> cam_RR_ABC_CaMKII; cytosol*(kon_CaMKII*CaMKII*cam_RR_ABC_0 - koff_CaMKII_RR*cam_RR_ABC_CaMKII); CaMKII_binding_to_cam_RR_ABC_0 is "CaMKII binding to CaM_RR_abc_0";
  ca_binding_to_cam_RR_BC_CaMKII_on_site_A: ca + cam_RR_BC_CaMKII -> cam_RR_ABC_CaMKII; cytosol*(kon_AR*ca*cam_RR_BC_CaMKII - koff_AR*cam_RR_ABC_CaMKII); ca_binding_to_cam_RR_BC_CaMKII_on_site_A is "Ca binding to CaM_RR_bc_CaMKII on site a";
  ca_binding_to_cam_RR_AC_CaMKII_on_site_B: ca + cam_RR_AC_CaMKII -> cam_RR_ABC_CaMKII; cytosol*(kon_BR*ca*cam_RR_AC_CaMKII - koff_BR*cam_RR_ABC_CaMKII); ca_binding_to_cam_RR_AC_CaMKII_on_site_B is "Ca binding to CaM_RR_ac_CaMKII on site b";
  ca_binding_to_cam_RR_AB_CaMKII_on_site_C: ca + cam_RR_AB_CaMKII -> cam_RR_ABC_CaMKII; cytosol*(kon_CR*ca*cam_RR_AB_CaMKII - koff_CR*cam_RR_ABC_CaMKII); ca_binding_to_cam_RR_AB_CaMKII_on_site_C is "Ca binding to CaM_RR_ab_CaMKII on site c";
  CaMKIIp_binding_to_cam_RR_ABC_0: CaMKIIp + cam_RR_ABC_0 -> cam_RR_ABC_CaMKIIp; cytosol*(kon_CaMKIIp*CaMKIIp*cam_RR_ABC_0 - koff_CaMKIIp_RR*cam_RR_ABC_CaMKIIp); CaMKIIp_binding_to_cam_RR_ABC_0 is "CaMKIIp binding to CaM_RR_abc_0";
  ca_binding_to_cam_RR_BC_CaMKIIp_on_site_A: ca + cam_RR_BC_CaMKIIp -> cam_RR_ABC_CaMKIIp; cytosol*(kon_AR*ca*cam_RR_BC_CaMKIIp - koff_AR*cam_RR_ABC_CaMKIIp); ca_binding_to_cam_RR_BC_CaMKIIp_on_site_A is "Ca binding to CaM_RR_bc_CaMKIIp on site a";
  ca_binding_to_cam_RR_AC_CaMKIIp_on_site_B: ca + cam_RR_AC_CaMKIIp -> cam_RR_ABC_CaMKIIp; cytosol*(kon_BR*ca*cam_RR_AC_CaMKIIp - koff_BR*cam_RR_ABC_CaMKIIp); ca_binding_to_cam_RR_AC_CaMKIIp_on_site_B is "Ca binding to CaM_RR_ac_CaMKIIp on site b";
  ca_binding_to_cam_RR_AB_CaMKIIp_on_site_C: ca + cam_RR_AB_CaMKIIp -> cam_RR_ABC_CaMKIIp; cytosol*(kon_CR*ca*cam_RR_AB_CaMKIIp - koff_CR*cam_RR_ABC_CaMKIIp); ca_binding_to_cam_RR_AB_CaMKIIp_on_site_C is "Ca binding to CaM_RR_ab_CaMKIIp on site c";
  ca_binding_to_cam_RR_BD_0_on_site_A: ca + cam_RR_BD_0 -> cam_RR_ABD_0; cytosol*(kon_AR*ca*cam_RR_BD_0 - koff_AR*cam_RR_ABD_0); ca_binding_to_cam_RR_BD_0_on_site_A is "Ca binding to CaM_RR_bd_0 on site a";
  ca_binding_to_cam_RR_AD_0_on_site_B: ca + cam_RR_AD_0 -> cam_RR_ABD_0; cytosol*(kon_BR*ca*cam_RR_AD_0 - koff_BR*cam_RR_ABD_0); ca_binding_to_cam_RR_AD_0_on_site_B is "Ca binding to CaM_RR_ad_0 on site b";
  ca_binding_to_cam_RR_AB_0_on_site_D: ca + cam_RR_AB_0 -> cam_RR_ABD_0; cytosol*(kon_DR*ca*cam_RR_AB_0 - koff_DR*cam_RR_ABD_0); ca_binding_to_cam_RR_AB_0_on_site_D is "Ca binding to CaM_RR_ab_0 on site d";
  PP2BCa2_binding_to_cam_RR_ABD_0: PP2BCa2 + cam_RR_ABD_0 -> cam_RR_ABD_PP2BCa2; cytosol*(kon_PP2BCa2*PP2BCa2*cam_RR_ABD_0 - koff_PP2BCa2_RR*cam_RR_ABD_PP2BCa2); PP2BCa2_binding_to_cam_RR_ABD_0 is "CaNCa4 binding to CaM_RR_abd_0";
  ca_binding_to_cam_RR_BD_PP2BCa2_on_site_A: ca + cam_RR_BD_PP2BCa2 -> cam_RR_ABD_PP2BCa2; cytosol*(kon_AR*ca*cam_RR_BD_PP2BCa2 - koff_AR*cam_RR_ABD_PP2BCa2); ca_binding_to_cam_RR_BD_PP2BCa2_on_site_A is "Ca binding to CaM_RR_bd_CaNCa4 on site a";
  ca_binding_to_cam_RR_AD_PP2BCa2_on_site_B: ca + cam_RR_AD_PP2BCa2 -> cam_RR_ABD_PP2BCa2; cytosol*(kon_BR*ca*cam_RR_AD_PP2BCa2 - koff_BR*cam_RR_ABD_PP2BCa2); ca_binding_to_cam_RR_AD_PP2BCa2_on_site_B is "Ca binding to CaM_RR_ad_CaNCa4 on site b";
  ca_binding_to_cam_RR_AB_PP2BCa2_on_site_D: ca + cam_RR_AB_PP2BCa2 -> cam_RR_ABD_PP2BCa2; cytosol*(kon_DR*ca*cam_RR_AB_PP2BCa2 - koff_DR*cam_RR_ABD_PP2BCa2); ca_binding_to_cam_RR_AB_PP2BCa2_on_site_D is "Ca binding to CaM_RR_ab_CaNCa4 on site d";
  CaMKII_binding_to_cam_RR_ABD_0: CaMKII + cam_RR_ABD_0 -> cam_RR_ABD_CaMKII; cytosol*(kon_CaMKII*CaMKII*cam_RR_ABD_0 - koff_CaMKII_RR*cam_RR_ABD_CaMKII); CaMKII_binding_to_cam_RR_ABD_0 is "CaMKII binding to CaM_RR_abd_0";
  ca_binding_to_cam_RR_BD_CaMKII_on_site_A: ca + cam_RR_BD_CaMKII -> cam_RR_ABD_CaMKII; cytosol*(kon_AR*ca*cam_RR_BD_CaMKII - koff_AR*cam_RR_ABD_CaMKII); ca_binding_to_cam_RR_BD_CaMKII_on_site_A is "Ca binding to CaM_RR_bd_CaMKII on site a";
  ca_binding_to_cam_RR_AD_CaMKII_on_site_B: ca + cam_RR_AD_CaMKII -> cam_RR_ABD_CaMKII; cytosol*(kon_BR*ca*cam_RR_AD_CaMKII - koff_BR*cam_RR_ABD_CaMKII); ca_binding_to_cam_RR_AD_CaMKII_on_site_B is "Ca binding to CaM_RR_ad_CaMKII on site b";
  ca_binding_to_cam_RR_AB_CaMKII_on_site_D: ca + cam_RR_AB_CaMKII -> cam_RR_ABD_CaMKII; cytosol*(kon_DR*ca*cam_RR_AB_CaMKII - koff_DR*cam_RR_ABD_CaMKII); ca_binding_to_cam_RR_AB_CaMKII_on_site_D is "Ca binding to CaM_RR_ab_CaMKII on site d";
  CaMKIIp_binding_to_cam_RR_ABD_0: CaMKIIp + cam_RR_ABD_0 -> cam_RR_ABD_CaMKIIp; cytosol*(kon_CaMKIIp*CaMKIIp*cam_RR_ABD_0 - koff_CaMKIIp_RR*cam_RR_ABD_CaMKIIp); CaMKIIp_binding_to_cam_RR_ABD_0 is "CaMKIIp binding to CaM_RR_abd_0";
  ca_binding_to_cam_RR_BD_CaMKIIp_on_site_A: ca + cam_RR_BD_CaMKIIp -> cam_RR_ABD_CaMKIIp; cytosol*(kon_AR*ca*cam_RR_BD_CaMKIIp - koff_AR*cam_RR_ABD_CaMKIIp); ca_binding_to_cam_RR_BD_CaMKIIp_on_site_A is "Ca binding to CaM_RR_bd_CaMKIIp on site a";
  ca_binding_to_cam_RR_AD_CaMKIIp_on_site_B: ca + cam_RR_AD_CaMKIIp -> cam_RR_ABD_CaMKIIp; cytosol*(kon_BR*ca*cam_RR_AD_CaMKIIp - koff_BR*cam_RR_ABD_CaMKIIp); ca_binding_to_cam_RR_AD_CaMKIIp_on_site_B is "Ca binding to CaM_RR_ad_CaMKIIp on site b";
  ca_binding_to_cam_RR_AB_CaMKIIp_on_site_D: ca + cam_RR_AB_CaMKIIp -> cam_RR_ABD_CaMKIIp; cytosol*(kon_DR*ca*cam_RR_AB_CaMKIIp - koff_DR*cam_RR_ABD_CaMKIIp); ca_binding_to_cam_RR_AB_CaMKIIp_on_site_D is "Ca binding to CaM_RR_ab_CaMKIIp on site d";
  ca_binding_to_cam_RR_CD_0_on_site_A: ca + cam_RR_CD_0 -> cam_RR_ACD_0; cytosol*(kon_AR*ca*cam_RR_CD_0 - koff_AR*cam_RR_ACD_0); ca_binding_to_cam_RR_CD_0_on_site_A is "Ca binding to CaM_RR_cd_0 on site a";
  ca_binding_to_cam_RR_AD_0_on_site_C: ca + cam_RR_AD_0 -> cam_RR_ACD_0; cytosol*(kon_CR*ca*cam_RR_AD_0 - koff_CR*cam_RR_ACD_0); ca_binding_to_cam_RR_AD_0_on_site_C is "Ca binding to CaM_RR_ad_0 on site c";
  ca_binding_to_cam_RR_AC_0_on_site_D: ca + cam_RR_AC_0 -> cam_RR_ACD_0; cytosol*(kon_DR*ca*cam_RR_AC_0 - koff_DR*cam_RR_ACD_0); ca_binding_to_cam_RR_AC_0_on_site_D is "Ca binding to CaM_RR_ac_0 on site d";
  PP2BCa2_binding_to_cam_RR_ACD_0: PP2BCa2 + cam_RR_ACD_0 -> cam_RR_ACD_PP2BCa2; cytosol*(kon_PP2BCa2*PP2BCa2*cam_RR_ACD_0 - koff_PP2BCa2_RR*cam_RR_ACD_PP2BCa2); PP2BCa2_binding_to_cam_RR_ACD_0 is "CaNCa4 binding to CaM_RR_acd_0";
  ca_binding_to_cam_RR_CD_PP2BCa2_on_site_A: ca + cam_RR_CD_PP2BCa2 -> cam_RR_ACD_PP2BCa2; cytosol*(kon_AR*ca*cam_RR_CD_PP2BCa2 - koff_AR*cam_RR_ACD_PP2BCa2); ca_binding_to_cam_RR_CD_PP2BCa2_on_site_A is "Ca binding to CaM_RR_cd_CaNCa4 on site a";
  ca_binding_to_cam_RR_AD_PP2BCa2_on_site_C: ca + cam_RR_AD_PP2BCa2 -> cam_RR_ACD_PP2BCa2; cytosol*(kon_CR*ca*cam_RR_AD_PP2BCa2 - koff_CR*cam_RR_ACD_PP2BCa2); ca_binding_to_cam_RR_AD_PP2BCa2_on_site_C is "Ca binding to CaM_RR_ad_CaNCa4 on site c";
  ca_binding_to_cam_RR_AC_PP2BCa2_on_site_D: ca + cam_RR_AC_PP2BCa2 -> cam_RR_ACD_PP2BCa2; cytosol*(kon_DR*ca*cam_RR_AC_PP2BCa2 - koff_DR*cam_RR_ACD_PP2BCa2); ca_binding_to_cam_RR_AC_PP2BCa2_on_site_D is "Ca binding to CaM_RR_ac_CaNCa4 on site d";
  CaMKII_binding_to_cam_RR_ACD_0: CaMKII + cam_RR_ACD_0 -> cam_RR_ACD_CaMKII; cytosol*(kon_CaMKII*CaMKII*cam_RR_ACD_0 - koff_CaMKII_RR*cam_RR_ACD_CaMKII); CaMKII_binding_to_cam_RR_ACD_0 is "CaMKII binding to CaM_RR_acd_0";
  ca_binding_to_cam_RR_CD_CaMKII_on_site_A: ca + cam_RR_CD_CaMKII -> cam_RR_ACD_CaMKII; cytosol*(kon_AR*ca*cam_RR_CD_CaMKII - koff_AR*cam_RR_ACD_CaMKII); ca_binding_to_cam_RR_CD_CaMKII_on_site_A is "Ca binding to CaM_RR_cd_CaMKII on site a";
  ca_binding_to_cam_RR_AD_CaMKII_on_site_C: ca + cam_RR_AD_CaMKII -> cam_RR_ACD_CaMKII; cytosol*(kon_CR*ca*cam_RR_AD_CaMKII - koff_CR*cam_RR_ACD_CaMKII); ca_binding_to_cam_RR_AD_CaMKII_on_site_C is "Ca binding to CaM_RR_ad_CaMKII on site c";
  ca_binding_to_cam_RR_AC_CaMKII_on_site_D: ca + cam_RR_AC_CaMKII -> cam_RR_ACD_CaMKII; cytosol*(kon_DR*ca*cam_RR_AC_CaMKII - koff_DR*cam_RR_ACD_CaMKII); ca_binding_to_cam_RR_AC_CaMKII_on_site_D is "Ca binding to CaM_RR_ac_CaMKII on site d";
  CaMKIIp_binding_to_cam_RR_ACD_0: CaMKIIp + cam_RR_ACD_0 -> cam_RR_ACD_CaMKIIp; cytosol*(kon_CaMKIIp*CaMKIIp*cam_RR_ACD_0 - koff_CaMKIIp_RR*cam_RR_ACD_CaMKIIp); CaMKIIp_binding_to_cam_RR_ACD_0 is "CaMKIIp binding to CaM_RR_acd_0";
  ca_binding_to_cam_RR_CD_CaMKIIp_on_site_A: ca + cam_RR_CD_CaMKIIp -> cam_RR_ACD_CaMKIIp; cytosol*(kon_AR*ca*cam_RR_CD_CaMKIIp - koff_AR*cam_RR_ACD_CaMKIIp); ca_binding_to_cam_RR_CD_CaMKIIp_on_site_A is "Ca binding to CaM_RR_cd_CaMKIIp on site a";
  ca_binding_to_cam_RR_AD_CaMKIIp_on_site_C: ca + cam_RR_AD_CaMKIIp -> cam_RR_ACD_CaMKIIp; cytosol*(kon_CR*ca*cam_RR_AD_CaMKIIp - koff_CR*cam_RR_ACD_CaMKIIp); ca_binding_to_cam_RR_AD_CaMKIIp_on_site_C is "Ca binding to CaM_RR_ad_CaMKIIp on site c";
  ca_binding_to_cam_RR_AC_CaMKIIp_on_site_D: ca + cam_RR_AC_CaMKIIp -> cam_RR_ACD_CaMKIIp; cytosol*(kon_DR*ca*cam_RR_AC_CaMKIIp - koff_DR*cam_RR_ACD_CaMKIIp); ca_binding_to_cam_RR_AC_CaMKIIp_on_site_D is "Ca binding to CaM_RR_ac_CaMKIIp on site d";
  ca_binding_to_cam_RR_CD_0_on_site_B: ca + cam_RR_CD_0 -> cam_RR_BCD_0; cytosol*(kon_BR*ca*cam_RR_CD_0 - koff_BR*cam_RR_BCD_0); ca_binding_to_cam_RR_CD_0_on_site_B is "Ca binding to CaM_RR_cd_0 on site b";
  ca_binding_to_cam_RR_BD_0_on_site_C: ca + cam_RR_BD_0 -> cam_RR_BCD_0; cytosol*(kon_CR*ca*cam_RR_BD_0 - koff_CR*cam_RR_BCD_0); ca_binding_to_cam_RR_BD_0_on_site_C is "Ca binding to CaM_RR_bd_0 on site c";
  ca_binding_to_cam_RR_BC_0_on_site_D: ca + cam_RR_BC_0 -> cam_RR_BCD_0; cytosol*(kon_DR*ca*cam_RR_BC_0 - koff_DR*cam_RR_BCD_0); ca_binding_to_cam_RR_BC_0_on_site_D is "Ca binding to CaM_RR_bc_0 on site d";
  PP2BCa2_binding_to_cam_RR_BCD_0: PP2BCa2 + cam_RR_BCD_0 -> cam_RR_BCD_PP2BCa2; cytosol*(kon_PP2BCa2*PP2BCa2*cam_RR_BCD_0 - koff_PP2BCa2_RR*cam_RR_BCD_PP2BCa2); PP2BCa2_binding_to_cam_RR_BCD_0 is "CaNCa4 binding to CaM_RR_bcd_0";
  ca_binding_to_cam_RR_CD_PP2BCa2_on_site_B: ca + cam_RR_CD_PP2BCa2 -> cam_RR_BCD_PP2BCa2; cytosol*(kon_BR*ca*cam_RR_CD_PP2BCa2 - koff_BR*cam_RR_BCD_PP2BCa2); ca_binding_to_cam_RR_CD_PP2BCa2_on_site_B is "Ca binding to CaM_RR_cd_CaNCa4 on site b";
  ca_binding_to_cam_RR_BD_PP2BCa2_on_site_C: ca + cam_RR_BD_PP2BCa2 -> cam_RR_BCD_PP2BCa2; cytosol*(kon_CR*ca*cam_RR_BD_PP2BCa2 - koff_CR*cam_RR_BCD_PP2BCa2); ca_binding_to_cam_RR_BD_PP2BCa2_on_site_C is "Ca binding to CaM_RR_bd_CaNCa4 on site c";
  ca_binding_to_cam_RR_BC_PP2BCa2_on_site_D: ca + cam_RR_BC_PP2BCa2 -> cam_RR_BCD_PP2BCa2; cytosol*(kon_DR*ca*cam_RR_BC_PP2BCa2 - koff_DR*cam_RR_BCD_PP2BCa2); ca_binding_to_cam_RR_BC_PP2BCa2_on_site_D is "Ca binding to CaM_RR_bc_CaNCa4 on site d";
  CaMKII_binding_to_cam_RR_BCD_0: CaMKII + cam_RR_BCD_0 -> cam_RR_BCD_CaMKII; cytosol*(kon_CaMKII*CaMKII*cam_RR_BCD_0 - koff_CaMKII_RR*cam_RR_BCD_CaMKII); CaMKII_binding_to_cam_RR_BCD_0 is "CaMKII binding to CaM_RR_bcd_0";
  ca_binding_to_cam_RR_CD_CaMKII_on_site_B: ca + cam_RR_CD_CaMKII -> cam_RR_BCD_CaMKII; cytosol*(kon_BR*ca*cam_RR_CD_CaMKII - koff_BR*cam_RR_BCD_CaMKII); ca_binding_to_cam_RR_CD_CaMKII_on_site_B is "Ca binding to CaM_RR_cd_CaMKII on site b";
  ca_binding_to_cam_RR_BD_CaMKII_on_site_C: ca + cam_RR_BD_CaMKII -> cam_RR_BCD_CaMKII; cytosol*(kon_CR*ca*cam_RR_BD_CaMKII - koff_CR*cam_RR_BCD_CaMKII); ca_binding_to_cam_RR_BD_CaMKII_on_site_C is "Ca binding to CaM_RR_bd_CaMKII on site c";
  ca_binding_to_cam_RR_BC_CaMKII_on_site_D: ca + cam_RR_BC_CaMKII -> cam_RR_BCD_CaMKII; cytosol*(kon_DR*ca*cam_RR_BC_CaMKII - koff_DR*cam_RR_BCD_CaMKII); ca_binding_to_cam_RR_BC_CaMKII_on_site_D is "Ca binding to CaM_RR_bc_CaMKII on site d";
  CaMKIIp_binding_to_cam_RR_BCD_0: CaMKIIp + cam_RR_BCD_0 -> cam_RR_BCD_CaMKIIp; cytosol*(kon_CaMKIIp*CaMKIIp*cam_RR_BCD_0 - koff_CaMKIIp_RR*cam_RR_BCD_CaMKIIp); CaMKIIp_binding_to_cam_RR_BCD_0 is "CaMKIIp binding to CaM_RR_bcd_0";
  ca_binding_to_cam_RR_CD_CaMKIIp_on_site_B: ca + cam_RR_CD_CaMKIIp -> cam_RR_BCD_CaMKIIp; cytosol*(kon_BR*ca*cam_RR_CD_CaMKIIp - koff_BR*cam_RR_BCD_CaMKIIp); ca_binding_to_cam_RR_CD_CaMKIIp_on_site_B is "Ca binding to CaM_RR_cd_CaMKIIp on site b";
  ca_binding_to_cam_RR_BD_CaMKIIp_on_site_C: ca + cam_RR_BD_CaMKIIp -> cam_RR_BCD_CaMKIIp; cytosol*(kon_CR*ca*cam_RR_BD_CaMKIIp - koff_CR*cam_RR_BCD_CaMKIIp); ca_binding_to_cam_RR_BD_CaMKIIp_on_site_C is "Ca binding to CaM_RR_bd_CaMKIIp on site c";
  ca_binding_to_cam_RR_BC_CaMKIIp_on_site_D: ca + cam_RR_BC_CaMKIIp -> cam_RR_BCD_CaMKIIp; cytosol*(kon_DR*ca*cam_RR_BC_CaMKIIp - koff_DR*cam_RR_BCD_CaMKIIp); ca_binding_to_cam_RR_BC_CaMKIIp_on_site_D is "Ca binding to CaM_RR_bc_CaMKIIp on site d";
  ca_binding_to_cam_RR_BCD_0_on_site_A: ca + cam_RR_BCD_0 -> cam_RR_ABCD_0; cytosol*(kon_AR*ca*cam_RR_BCD_0 - koff_AR*cam_RR_ABCD_0); ca_binding_to_cam_RR_BCD_0_on_site_A is "Ca binding to CaM_RR_bcd_0 on site a";
  ca_binding_to_cam_RR_ACD_0_on_site_B: ca + cam_RR_ACD_0 -> cam_RR_ABCD_0; cytosol*(kon_BR*ca*cam_RR_ACD_0 - koff_BR*cam_RR_ABCD_0); ca_binding_to_cam_RR_ACD_0_on_site_B is "Ca binding to CaM_RR_acd_0 on site b";
  ca_binding_to_cam_RR_ABD_0_on_site_C: ca + cam_RR_ABD_0 -> cam_RR_ABCD_0; cytosol*(kon_CR*ca*cam_RR_ABD_0 - koff_CR*cam_RR_ABCD_0); ca_binding_to_cam_RR_ABD_0_on_site_C is "Ca binding to CaM_RR_abd_0 on site c";
  ca_binding_to_cam_RR_ABC_0_on_site_D: ca + cam_RR_ABC_0 -> cam_RR_ABCD_0; cytosol*(kon_DR*ca*cam_RR_ABC_0 - koff_DR*cam_RR_ABCD_0); ca_binding_to_cam_RR_ABC_0_on_site_D is "Ca binding to CaM_RR_abc_0 on site d";
  PP2BCa2_binding_to_cam_RR_ABCD_0: PP2BCa2 + cam_RR_ABCD_0 -> cam_RR_ABCD_PP2BCa2; cytosol*(kon_PP2BCa2*PP2BCa2*cam_RR_ABCD_0 - koff_PP2BCa2_RR*cam_RR_ABCD_PP2BCa2); PP2BCa2_binding_to_cam_RR_ABCD_0 is "CaNCa4 binding to CaM_RR_abcd_0";
  ca_binding_to_cam_RR_BCD_PP2BCa2_on_site_A: ca + cam_RR_BCD_PP2BCa2 -> cam_RR_ABCD_PP2BCa2; cytosol*(kon_AR*ca*cam_RR_BCD_PP2BCa2 - koff_AR*cam_RR_ABCD_PP2BCa2); ca_binding_to_cam_RR_BCD_PP2BCa2_on_site_A is "Ca binding to CaM_RR_bcd_CaNCa4 on site a";
  ca_binding_to_cam_RR_ACD_PP2BCa2_on_site_B: ca + cam_RR_ACD_PP2BCa2 -> cam_RR_ABCD_PP2BCa2; cytosol*(kon_BR*ca*cam_RR_ACD_PP2BCa2 - koff_BR*cam_RR_ABCD_PP2BCa2); ca_binding_to_cam_RR_ACD_PP2BCa2_on_site_B is "Ca binding to CaM_RR_acd_CaNCa4 on site b";
  ca_binding_to_cam_RR_ABD_PP2BCa2_on_site_C: ca + cam_RR_ABD_PP2BCa2 -> cam_RR_ABCD_PP2BCa2; cytosol*(kon_CR*ca*cam_RR_ABD_PP2BCa2 - koff_CR*cam_RR_ABCD_PP2BCa2); ca_binding_to_cam_RR_ABD_PP2BCa2_on_site_C is "Ca binding to CaM_RR_abd_CaNCa4 on site c";
  ca_binding_to_cam_RR_ABC_PP2BCa2_on_site_D: ca + cam_RR_ABC_PP2BCa2 -> cam_RR_ABCD_PP2BCa2; cytosol*(kon_DR*ca*cam_RR_ABC_PP2BCa2 - koff_DR*cam_RR_ABCD_PP2BCa2); ca_binding_to_cam_RR_ABC_PP2BCa2_on_site_D is "Ca binding to CaM_RR_abc_CaNCa4 on site d";
  CaMKII_binding_to_cam_RR_ABCD_0: CaMKII + cam_RR_ABCD_0 -> cam_RR_ABCD_CaMKII; cytosol*(kon_CaMKII*CaMKII*cam_RR_ABCD_0 - koff_CaMKII_RR*cam_RR_ABCD_CaMKII); CaMKII_binding_to_cam_RR_ABCD_0 is "CaMKII binding to CaM_RR_abcd_0";
  ca_binding_to_cam_RR_BCD_CaMKII_on_site_A: ca + cam_RR_BCD_CaMKII -> cam_RR_ABCD_CaMKII; cytosol*(kon_AR*ca*cam_RR_BCD_CaMKII - koff_AR*cam_RR_ABCD_CaMKII); ca_binding_to_cam_RR_BCD_CaMKII_on_site_A is "Ca binding to CaM_RR_bcd_CaMKII on site a";
  ca_binding_to_cam_RR_ACD_CaMKII_on_site_B: ca + cam_RR_ACD_CaMKII -> cam_RR_ABCD_CaMKII; cytosol*(kon_BR*ca*cam_RR_ACD_CaMKII - koff_BR*cam_RR_ABCD_CaMKII); ca_binding_to_cam_RR_ACD_CaMKII_on_site_B is "Ca binding to CaM_RR_acd_CaMKII on site b";
  ca_binding_to_cam_RR_ABD_CaMKII_on_site_C: ca + cam_RR_ABD_CaMKII -> cam_RR_ABCD_CaMKII; cytosol*(kon_CR*ca*cam_RR_ABD_CaMKII - koff_CR*cam_RR_ABCD_CaMKII); ca_binding_to_cam_RR_ABD_CaMKII_on_site_C is "Ca binding to CaM_RR_abd_CaMKII on site c";
  ca_binding_to_cam_RR_ABC_CaMKII_on_site_D: ca + cam_RR_ABC_CaMKII -> cam_RR_ABCD_CaMKII; cytosol*(kon_DR*ca*cam_RR_ABC_CaMKII - koff_DR*cam_RR_ABCD_CaMKII); ca_binding_to_cam_RR_ABC_CaMKII_on_site_D is "Ca binding to CaM_RR_abc_CaMKII on site d";
  CaMKIIp_binding_to_cam_RR_ABCD_0: CaMKIIp + cam_RR_ABCD_0 -> cam_RR_ABCD_CaMKIIp; cytosol*(kon_CaMKIIp*CaMKIIp*cam_RR_ABCD_0 - koff_CaMKIIp_RR*cam_RR_ABCD_CaMKIIp); CaMKIIp_binding_to_cam_RR_ABCD_0 is "CaMKIIp binding to CaM_RR_abcd_0";
  ca_binding_to_cam_RR_BCD_CaMKIIp_on_site_A: ca + cam_RR_BCD_CaMKIIp -> cam_RR_ABCD_CaMKIIp; cytosol*(kon_AR*ca*cam_RR_BCD_CaMKIIp - koff_AR*cam_RR_ABCD_CaMKIIp); ca_binding_to_cam_RR_BCD_CaMKIIp_on_site_A is "Ca binding to CaM_RR_bcd_CaMKIIp on site a";
  ca_binding_to_cam_RR_ACD_CaMKIIp_on_site_B: ca + cam_RR_ACD_CaMKIIp -> cam_RR_ABCD_CaMKIIp; cytosol*(kon_BR*ca*cam_RR_ACD_CaMKIIp - koff_BR*cam_RR_ABCD_CaMKIIp); ca_binding_to_cam_RR_ACD_CaMKIIp_on_site_B is "Ca binding to CaM_RR_acd_CaMKIIp on site b";
  ca_binding_to_cam_RR_ABD_CaMKIIp_on_site_C: ca + cam_RR_ABD_CaMKIIp -> cam_RR_ABCD_CaMKIIp; cytosol*(kon_CR*ca*cam_RR_ABD_CaMKIIp - koff_CR*cam_RR_ABCD_CaMKIIp); ca_binding_to_cam_RR_ABD_CaMKIIp_on_site_C is "Ca binding to CaM_RR_abd_CaMKIIp on site c";
  ca_binding_to_cam_RR_ABC_CaMKIIp_on_site_D: ca + cam_RR_ABC_CaMKIIp -> cam_RR_ABCD_CaMKIIp; cytosol*(kon_DR*ca*cam_RR_ABC_CaMKIIp - koff_DR*cam_RR_ABCD_CaMKIIp); ca_binding_to_cam_RR_ABC_CaMKIIp_on_site_D is "Ca binding to CaM_RR_abc_CaMKIIp on site d";
  Ng_binding_to_cam_RT_0_0: Ng + cam_RT_0_0 -> cam_RT_0_Ng; cytosol*(kon_Ng*Ng*cam_RT_0_0 - koff_Ng_RT*cam_RT_0_Ng); Ng_binding_to_cam_RT_0_0 is "Ng binding to CaM_RT_0_0";
  ca_binding_to_cam_RT_0_0_on_site_A: ca + cam_RT_0_0 -> cam_RT_A_0; cytosol*(kon_AR*ca*cam_RT_0_0 - koff_AR*cam_RT_A_0); ca_binding_to_cam_RT_0_0_on_site_A is "Ca binding to CaM_RT_0_0 on site a";
  Ng_binding_to_cam_RT_A_0: Ng + cam_RT_A_0 -> cam_RT_A_Ng; cytosol*(kon_Ng*Ng*cam_RT_A_0 - koff_Ng_RT*cam_RT_A_Ng); Ng_binding_to_cam_RT_A_0 is "Ng binding to CaM_RT_a_0";
  ca_binding_to_cam_RT_0_Ng_on_site_A: ca + cam_RT_0_Ng -> cam_RT_A_Ng; cytosol*(kon_AR*ca*cam_RT_0_Ng - koff_AR*cam_RT_A_Ng); ca_binding_to_cam_RT_0_Ng_on_site_A is "Ca binding to CaM_RT_0_Ng on site a";
  ca_binding_to_cam_RT_0_0_on_site_B: ca + cam_RT_0_0 -> cam_RT_B_0; cytosol*(kon_BR*ca*cam_RT_0_0 - koff_BR*cam_RT_B_0); ca_binding_to_cam_RT_0_0_on_site_B is "Ca binding to CaM_RT_0_0 on site b";
  Ng_binding_to_cam_RT_B_0: Ng + cam_RT_B_0 -> cam_RT_B_Ng; cytosol*(kon_Ng*Ng*cam_RT_B_0 - koff_Ng_RT*cam_RT_B_Ng); Ng_binding_to_cam_RT_B_0 is "Ng binding to CaM_RT_b_0";
  ca_binding_to_cam_RT_0_Ng_on_site_B: ca + cam_RT_0_Ng -> cam_RT_B_Ng; cytosol*(kon_BR*ca*cam_RT_0_Ng - koff_BR*cam_RT_B_Ng); ca_binding_to_cam_RT_0_Ng_on_site_B is "Ca binding to CaM_RT_0_Ng on site b";
  ca_binding_to_cam_RT_0_0_on_site_C: ca + cam_RT_0_0 -> cam_RT_C_0; cytosol*(kon_CT*ca*cam_RT_0_0 - koff_CT*cam_RT_C_0); ca_binding_to_cam_RT_0_0_on_site_C is "Ca binding to CaM_RT_0_0 on site c";
  Ng_binding_to_cam_RT_C_0: Ng + cam_RT_C_0 -> cam_RT_C_Ng; cytosol*(kon_Ng*Ng*cam_RT_C_0 - koff_Ng_RT*cam_RT_C_Ng); Ng_binding_to_cam_RT_C_0 is "Ng binding to CaM_RT_c_0";
  ca_binding_to_cam_RT_0_Ng_on_site_C: ca + cam_RT_0_Ng -> cam_RT_C_Ng; cytosol*(kon_CT*ca*cam_RT_0_Ng - koff_CT*cam_RT_C_Ng); ca_binding_to_cam_RT_0_Ng_on_site_C is "Ca binding to CaM_RT_0_Ng on site c";
  ca_binding_to_cam_RT_0_0_on_site_D: ca + cam_RT_0_0 -> cam_RT_D_0; cytosol*(kon_DT*ca*cam_RT_0_0 - koff_DT*cam_RT_D_0); ca_binding_to_cam_RT_0_0_on_site_D is "Ca binding to CaM_RT_0_0 on site d";
  Ng_binding_to_cam_RT_D_0: Ng + cam_RT_D_0 -> cam_RT_D_Ng; cytosol*(kon_Ng*Ng*cam_RT_D_0 - koff_Ng_RT*cam_RT_D_Ng); Ng_binding_to_cam_RT_D_0 is "Ng binding to CaM_RT_d_0";
  ca_binding_to_cam_RT_0_Ng_on_site_D: ca + cam_RT_0_Ng -> cam_RT_D_Ng; cytosol*(kon_DT*ca*cam_RT_0_Ng - koff_DT*cam_RT_D_Ng); ca_binding_to_cam_RT_0_Ng_on_site_D is "Ca binding to CaM_RT_0_Ng on site d";
  ca_binding_to_cam_RT_B_0_on_site_A: ca + cam_RT_B_0 -> cam_RT_AB_0; cytosol*(kon_AR*ca*cam_RT_B_0 - koff_AR*cam_RT_AB_0); ca_binding_to_cam_RT_B_0_on_site_A is "Ca binding to CaM_RT_b_0 on site a";
  ca_binding_to_cam_RT_A_0_on_site_B: ca + cam_RT_A_0 -> cam_RT_AB_0; cytosol*(kon_BR*ca*cam_RT_A_0 - koff_BR*cam_RT_AB_0); ca_binding_to_cam_RT_A_0_on_site_B is "Ca binding to CaM_RT_a_0 on site b";
  Ng_binding_to_cam_RT_AB_0: Ng + cam_RT_AB_0 -> cam_RT_AB_Ng; cytosol*(kon_Ng*Ng*cam_RT_AB_0 - koff_Ng_RT*cam_RT_AB_Ng); Ng_binding_to_cam_RT_AB_0 is "Ng binding to CaM_RT_ab_0";
  ca_binding_to_cam_RT_B_Ng_on_site_A: ca + cam_RT_B_Ng -> cam_RT_AB_Ng; cytosol*(kon_AR*ca*cam_RT_B_Ng - koff_AR*cam_RT_AB_Ng); ca_binding_to_cam_RT_B_Ng_on_site_A is "Ca binding to CaM_RT_b_Ng on site a";
  ca_binding_to_cam_RT_A_Ng_on_site_B: ca + cam_RT_A_Ng -> cam_RT_AB_Ng; cytosol*(kon_BR*ca*cam_RT_A_Ng - koff_BR*cam_RT_AB_Ng); ca_binding_to_cam_RT_A_Ng_on_site_B is "Ca binding to CaM_RT_a_Ng on site b";
  ca_binding_to_cam_RT_C_0_on_site_A: ca + cam_RT_C_0 -> cam_RT_AC_0; cytosol*(kon_AR*ca*cam_RT_C_0 - koff_AR*cam_RT_AC_0); ca_binding_to_cam_RT_C_0_on_site_A is "Ca binding to CaM_RT_c_0 on site a";
  ca_binding_to_cam_RT_A_0_on_site_C: ca + cam_RT_A_0 -> cam_RT_AC_0; cytosol*(kon_CT*ca*cam_RT_A_0 - koff_CT*cam_RT_AC_0); ca_binding_to_cam_RT_A_0_on_site_C is "Ca binding to CaM_RT_a_0 on site c";
  Ng_binding_to_cam_RT_AC_0: Ng + cam_RT_AC_0 -> cam_RT_AC_Ng; cytosol*(kon_Ng*Ng*cam_RT_AC_0 - koff_Ng_RT*cam_RT_AC_Ng); Ng_binding_to_cam_RT_AC_0 is "Ng binding to CaM_RT_ac_0";
  ca_binding_to_cam_RT_C_Ng_on_site_A: ca + cam_RT_C_Ng -> cam_RT_AC_Ng; cytosol*(kon_AR*ca*cam_RT_C_Ng - koff_AR*cam_RT_AC_Ng); ca_binding_to_cam_RT_C_Ng_on_site_A is "Ca binding to CaM_RT_c_Ng on site a";
  ca_binding_to_cam_RT_A_Ng_on_site_C: ca + cam_RT_A_Ng -> cam_RT_AC_Ng; cytosol*(kon_CT*ca*cam_RT_A_Ng - koff_CT*cam_RT_AC_Ng); ca_binding_to_cam_RT_A_Ng_on_site_C is "Ca binding to CaM_RT_a_Ng on site c";
  ca_binding_to_cam_RT_D_0_on_site_A: ca + cam_RT_D_0 -> cam_RT_AD_0; cytosol*(kon_AR*ca*cam_RT_D_0 - koff_AR*cam_RT_AD_0); ca_binding_to_cam_RT_D_0_on_site_A is "Ca binding to CaM_RT_d_0 on site a";
  ca_binding_to_cam_RT_A_0_on_site_D: ca + cam_RT_A_0 -> cam_RT_AD_0; cytosol*(kon_DT*ca*cam_RT_A_0 - koff_DT*cam_RT_AD_0); ca_binding_to_cam_RT_A_0_on_site_D is "Ca binding to CaM_RT_a_0 on site d";
  Ng_binding_to_cam_RT_AD_0: Ng + cam_RT_AD_0 -> cam_RT_AD_Ng; cytosol*(kon_Ng*Ng*cam_RT_AD_0 - koff_Ng_RT*cam_RT_AD_Ng); Ng_binding_to_cam_RT_AD_0 is "Ng binding to CaM_RT_ad_0";
  ca_binding_to_cam_RT_D_Ng_on_site_A: ca + cam_RT_D_Ng -> cam_RT_AD_Ng; cytosol*(kon_AR*ca*cam_RT_D_Ng - koff_AR*cam_RT_AD_Ng); ca_binding_to_cam_RT_D_Ng_on_site_A is "Ca binding to CaM_RT_d_Ng on site a";
  ca_binding_to_cam_RT_A_Ng_on_site_D: ca + cam_RT_A_Ng -> cam_RT_AD_Ng; cytosol*(kon_DT*ca*cam_RT_A_Ng - koff_DT*cam_RT_AD_Ng); ca_binding_to_cam_RT_A_Ng_on_site_D is "Ca binding to CaM_RT_a_Ng on site d";
  ca_binding_to_cam_RT_C_0_on_site_B: ca + cam_RT_C_0 -> cam_RT_BC_0; cytosol*(kon_BR*ca*cam_RT_C_0 - koff_BR*cam_RT_BC_0); ca_binding_to_cam_RT_C_0_on_site_B is "Ca binding to CaM_RT_c_0 on site b";
  ca_binding_to_cam_RT_B_0_on_site_C: ca + cam_RT_B_0 -> cam_RT_BC_0; cytosol*(kon_CT*ca*cam_RT_B_0 - koff_CT*cam_RT_BC_0); ca_binding_to_cam_RT_B_0_on_site_C is "Ca binding to CaM_RT_b_0 on site c";
  Ng_binding_to_cam_RT_BC_0: Ng + cam_RT_BC_0 -> cam_RT_BC_Ng; cytosol*(kon_Ng*Ng*cam_RT_BC_0 - koff_Ng_RT*cam_RT_BC_Ng); Ng_binding_to_cam_RT_BC_0 is "Ng binding to CaM_RT_bc_0";
  ca_binding_to_cam_RT_C_Ng_on_site_B: ca + cam_RT_C_Ng -> cam_RT_BC_Ng; cytosol*(kon_BR*ca*cam_RT_C_Ng - koff_BR*cam_RT_BC_Ng); ca_binding_to_cam_RT_C_Ng_on_site_B is "Ca binding to CaM_RT_c_Ng on site b";
  ca_binding_to_cam_RT_B_Ng_on_site_C: ca + cam_RT_B_Ng -> cam_RT_BC_Ng; cytosol*(kon_CT*ca*cam_RT_B_Ng - koff_CT*cam_RT_BC_Ng); ca_binding_to_cam_RT_B_Ng_on_site_C is "Ca binding to CaM_RT_b_Ng on site c";
  ca_binding_to_cam_RT_D_0_on_site_B: ca + cam_RT_D_0 -> cam_RT_BD_0; cytosol*(kon_BR*ca*cam_RT_D_0 - koff_BR*cam_RT_BD_0); ca_binding_to_cam_RT_D_0_on_site_B is "Ca binding to CaM_RT_d_0 on site b";
  ca_binding_to_cam_RT_B_0_on_site_D: ca + cam_RT_B_0 -> cam_RT_BD_0; cytosol*(kon_DT*ca*cam_RT_B_0 - koff_DT*cam_RT_BD_0); ca_binding_to_cam_RT_B_0_on_site_D is "Ca binding to CaM_RT_b_0 on site d";
  Ng_binding_to_cam_RT_BD_0: Ng + cam_RT_BD_0 -> cam_RT_BD_Ng; cytosol*(kon_Ng*Ng*cam_RT_BD_0 - koff_Ng_RT*cam_RT_BD_Ng); Ng_binding_to_cam_RT_BD_0 is "Ng binding to CaM_RT_bd_0";
  ca_binding_to_cam_RT_D_Ng_on_site_B: ca + cam_RT_D_Ng -> cam_RT_BD_Ng; cytosol*(kon_BR*ca*cam_RT_D_Ng - koff_BR*cam_RT_BD_Ng); ca_binding_to_cam_RT_D_Ng_on_site_B is "Ca binding to CaM_RT_d_Ng on site b";
  ca_binding_to_cam_RT_B_Ng_on_site_D: ca + cam_RT_B_Ng -> cam_RT_BD_Ng; cytosol*(kon_DT*ca*cam_RT_B_Ng - koff_DT*cam_RT_BD_Ng); ca_binding_to_cam_RT_B_Ng_on_site_D is "Ca binding to CaM_RT_b_Ng on site d";
  ca_binding_to_cam_RT_D_0_on_site_C: ca + cam_RT_D_0 -> cam_RT_CD_0; cytosol*(kon_CT*ca*cam_RT_D_0 - koff_CT*cam_RT_CD_0); ca_binding_to_cam_RT_D_0_on_site_C is "Ca binding to CaM_RT_d_0 on site c";
  ca_binding_to_cam_RT_C_0_on_site_D: ca + cam_RT_C_0 -> cam_RT_CD_0; cytosol*(kon_DT*ca*cam_RT_C_0 - koff_DT*cam_RT_CD_0); ca_binding_to_cam_RT_C_0_on_site_D is "Ca binding to CaM_RT_c_0 on site d";
  Ng_binding_to_cam_RT_CD_0: Ng + cam_RT_CD_0 -> cam_RT_CD_Ng; cytosol*(kon_Ng*Ng*cam_RT_CD_0 - koff_Ng_RT*cam_RT_CD_Ng); Ng_binding_to_cam_RT_CD_0 is "Ng binding to CaM_RT_cd_0";
  ca_binding_to_cam_RT_D_Ng_on_site_C: ca + cam_RT_D_Ng -> cam_RT_CD_Ng; cytosol*(kon_CT*ca*cam_RT_D_Ng - koff_CT*cam_RT_CD_Ng); ca_binding_to_cam_RT_D_Ng_on_site_C is "Ca binding to CaM_RT_d_Ng on site c";
  ca_binding_to_cam_RT_C_Ng_on_site_D: ca + cam_RT_C_Ng -> cam_RT_CD_Ng; cytosol*(kon_DT*ca*cam_RT_C_Ng - koff_DT*cam_RT_CD_Ng); ca_binding_to_cam_RT_C_Ng_on_site_D is "Ca binding to CaM_RT_c_Ng on site d";
  ca_binding_to_cam_RT_BC_0_on_site_A: ca + cam_RT_BC_0 -> cam_RT_ABC_0; cytosol*(kon_AR*ca*cam_RT_BC_0 - koff_AR*cam_RT_ABC_0); ca_binding_to_cam_RT_BC_0_on_site_A is "Ca binding to CaM_RT_bc_0 on site a";
  ca_binding_to_cam_RT_AC_0_on_site_B: ca + cam_RT_AC_0 -> cam_RT_ABC_0; cytosol*(kon_BR*ca*cam_RT_AC_0 - koff_BR*cam_RT_ABC_0); ca_binding_to_cam_RT_AC_0_on_site_B is "Ca binding to CaM_RT_ac_0 on site b";
  ca_binding_to_cam_RT_AB_0_on_site_C: ca + cam_RT_AB_0 -> cam_RT_ABC_0; cytosol*(kon_CT*ca*cam_RT_AB_0 - koff_CT*cam_RT_ABC_0); ca_binding_to_cam_RT_AB_0_on_site_C is "Ca binding to CaM_RT_ab_0 on site c";
  Ng_binding_to_cam_RT_ABC_0: Ng + cam_RT_ABC_0 -> cam_RT_ABC_Ng; cytosol*(kon_Ng*Ng*cam_RT_ABC_0 - koff_Ng_RT*cam_RT_ABC_Ng); Ng_binding_to_cam_RT_ABC_0 is "Ng binding to CaM_RT_abc_0";
  ca_binding_to_cam_RT_BC_Ng_on_site_A: ca + cam_RT_BC_Ng -> cam_RT_ABC_Ng; cytosol*(kon_AR*ca*cam_RT_BC_Ng - koff_AR*cam_RT_ABC_Ng); ca_binding_to_cam_RT_BC_Ng_on_site_A is "Ca binding to CaM_RT_bc_Ng on site a";
  ca_binding_to_cam_RT_AC_Ng_on_site_B: ca + cam_RT_AC_Ng -> cam_RT_ABC_Ng; cytosol*(kon_BR*ca*cam_RT_AC_Ng - koff_BR*cam_RT_ABC_Ng); ca_binding_to_cam_RT_AC_Ng_on_site_B is "Ca binding to CaM_RT_ac_Ng on site b";
  ca_binding_to_cam_RT_AB_Ng_on_site_C: ca + cam_RT_AB_Ng -> cam_RT_ABC_Ng; cytosol*(kon_CT*ca*cam_RT_AB_Ng - koff_CT*cam_RT_ABC_Ng); ca_binding_to_cam_RT_AB_Ng_on_site_C is "Ca binding to CaM_RT_ab_Ng on site c";
  ca_binding_to_cam_RT_BD_0_on_site_A: ca + cam_RT_BD_0 -> cam_RT_ABD_0; cytosol*(kon_AR*ca*cam_RT_BD_0 - koff_AR*cam_RT_ABD_0); ca_binding_to_cam_RT_BD_0_on_site_A is "Ca binding to CaM_RT_bd_0 on site a";
  ca_binding_to_cam_RT_AD_0_on_site_B: ca + cam_RT_AD_0 -> cam_RT_ABD_0; cytosol*(kon_BR*ca*cam_RT_AD_0 - koff_BR*cam_RT_ABD_0); ca_binding_to_cam_RT_AD_0_on_site_B is "Ca binding to CaM_RT_ad_0 on site b";
  ca_binding_to_cam_RT_AB_0_on_site_D: ca + cam_RT_AB_0 -> cam_RT_ABD_0; cytosol*(kon_DT*ca*cam_RT_AB_0 - koff_DT*cam_RT_ABD_0); ca_binding_to_cam_RT_AB_0_on_site_D is "Ca binding to CaM_RT_ab_0 on site d";
  Ng_binding_to_cam_RT_ABD_0: Ng + cam_RT_ABD_0 -> cam_RT_ABD_Ng; cytosol*(kon_Ng*Ng*cam_RT_ABD_0 - koff_Ng_RT*cam_RT_ABD_Ng); Ng_binding_to_cam_RT_ABD_0 is "Ng binding to CaM_RT_abd_0";
  ca_binding_to_cam_RT_BD_Ng_on_site_A: ca + cam_RT_BD_Ng -> cam_RT_ABD_Ng; cytosol*(kon_AR*ca*cam_RT_BD_Ng - koff_AR*cam_RT_ABD_Ng); ca_binding_to_cam_RT_BD_Ng_on_site_A is "Ca binding to CaM_RT_bd_Ng on site a";
  ca_binding_to_cam_RT_AD_Ng_on_site_B: ca + cam_RT_AD_Ng -> cam_RT_ABD_Ng; cytosol*(kon_BR*ca*cam_RT_AD_Ng - koff_BR*cam_RT_ABD_Ng); ca_binding_to_cam_RT_AD_Ng_on_site_B is "Ca binding to CaM_RT_ad_Ng on site b";
  ca_binding_to_cam_RT_AB_Ng_on_site_D: ca + cam_RT_AB_Ng -> cam_RT_ABD_Ng; cytosol*(kon_DT*ca*cam_RT_AB_Ng - koff_DT*cam_RT_ABD_Ng); ca_binding_to_cam_RT_AB_Ng_on_site_D is "Ca binding to CaM_RT_ab_Ng on site d";
  ca_binding_to_cam_RT_CD_0_on_site_A: ca + cam_RT_CD_0 -> cam_RT_ACD_0; cytosol*(kon_AR*ca*cam_RT_CD_0 - koff_AR*cam_RT_ACD_0); ca_binding_to_cam_RT_CD_0_on_site_A is "Ca binding to CaM_RT_cd_0 on site a";
  ca_binding_to_cam_RT_AD_0_on_site_C: ca + cam_RT_AD_0 -> cam_RT_ACD_0; cytosol*(kon_CT*ca*cam_RT_AD_0 - koff_CT*cam_RT_ACD_0); ca_binding_to_cam_RT_AD_0_on_site_C is "Ca binding to CaM_RT_ad_0 on site c";
  ca_binding_to_cam_RT_AC_0_on_site_D: ca + cam_RT_AC_0 -> cam_RT_ACD_0; cytosol*(kon_DT*ca*cam_RT_AC_0 - koff_DT*cam_RT_ACD_0); ca_binding_to_cam_RT_AC_0_on_site_D is "Ca binding to CaM_RT_ac_0 on site d";
  Ng_binding_to_cam_RT_ACD_0: Ng + cam_RT_ACD_0 -> cam_RT_ACD_Ng; cytosol*(kon_Ng*Ng*cam_RT_ACD_0 - koff_Ng_RT*cam_RT_ACD_Ng); Ng_binding_to_cam_RT_ACD_0 is "Ng binding to CaM_RT_acd_0";
  ca_binding_to_cam_RT_CD_Ng_on_site_A: ca + cam_RT_CD_Ng -> cam_RT_ACD_Ng; cytosol*(kon_AR*ca*cam_RT_CD_Ng - koff_AR*cam_RT_ACD_Ng); ca_binding_to_cam_RT_CD_Ng_on_site_A is "Ca binding to CaM_RT_cd_Ng on site a";
  ca_binding_to_cam_RT_AD_Ng_on_site_C: ca + cam_RT_AD_Ng -> cam_RT_ACD_Ng; cytosol*(kon_CT*ca*cam_RT_AD_Ng - koff_CT*cam_RT_ACD_Ng); ca_binding_to_cam_RT_AD_Ng_on_site_C is "Ca binding to CaM_RT_ad_Ng on site c";
  ca_binding_to_cam_RT_AC_Ng_on_site_D: ca + cam_RT_AC_Ng -> cam_RT_ACD_Ng; cytosol*(kon_DT*ca*cam_RT_AC_Ng - koff_DT*cam_RT_ACD_Ng); ca_binding_to_cam_RT_AC_Ng_on_site_D is "Ca binding to CaM_RT_ac_Ng on site d";
  ca_binding_to_cam_RT_CD_0_on_site_B: ca + cam_RT_CD_0 -> cam_RT_BCD_0; cytosol*(kon_BR*ca*cam_RT_CD_0 - koff_BR*cam_RT_BCD_0); ca_binding_to_cam_RT_CD_0_on_site_B is "Ca binding to CaM_RT_cd_0 on site b";
  ca_binding_to_cam_RT_BD_0_on_site_C: ca + cam_RT_BD_0 -> cam_RT_BCD_0; cytosol*(kon_CT*ca*cam_RT_BD_0 - koff_CT*cam_RT_BCD_0); ca_binding_to_cam_RT_BD_0_on_site_C is "Ca binding to CaM_RT_bd_0 on site c";
  ca_binding_to_cam_RT_BC_0_on_site_D: ca + cam_RT_BC_0 -> cam_RT_BCD_0; cytosol*(kon_DT*ca*cam_RT_BC_0 - koff_DT*cam_RT_BCD_0); ca_binding_to_cam_RT_BC_0_on_site_D is "Ca binding to CaM_RT_bc_0 on site d";
  Ng_binding_to_cam_RT_BCD_0: Ng + cam_RT_BCD_0 -> cam_RT_BCD_Ng; cytosol*(kon_Ng*Ng*cam_RT_BCD_0 - koff_Ng_RT*cam_RT_BCD_Ng); Ng_binding_to_cam_RT_BCD_0 is "Ng binding to CaM_RT_bcd_0";
  ca_binding_to_cam_RT_CD_Ng_on_site_B: ca + cam_RT_CD_Ng -> cam_RT_BCD_Ng; cytosol*(kon_BR*ca*cam_RT_CD_Ng - koff_BR*cam_RT_BCD_Ng); ca_binding_to_cam_RT_CD_Ng_on_site_B is "Ca binding to CaM_RT_cd_Ng on site b";
  ca_binding_to_cam_RT_BD_Ng_on_site_C: ca + cam_RT_BD_Ng -> cam_RT_BCD_Ng; cytosol*(kon_CT*ca*cam_RT_BD_Ng - koff_CT*cam_RT_BCD_Ng); ca_binding_to_cam_RT_BD_Ng_on_site_C is "Ca binding to CaM_RT_bd_Ng on site c";
  ca_binding_to_cam_RT_BC_Ng_on_site_D: ca + cam_RT_BC_Ng -> cam_RT_BCD_Ng; cytosol*(kon_DT*ca*cam_RT_BC_Ng - koff_DT*cam_RT_BCD_Ng); ca_binding_to_cam_RT_BC_Ng_on_site_D is "Ca binding to CaM_RT_bc_Ng on site d";
  ca_binding_to_cam_RT_BCD_0_on_site_A: ca + cam_RT_BCD_0 -> cam_RT_ABCD_0; cytosol*(kon_AR*ca*cam_RT_BCD_0 - koff_AR*cam_RT_ABCD_0); ca_binding_to_cam_RT_BCD_0_on_site_A is "Ca binding to CaM_RT_bcd_0 on site a";
  ca_binding_to_cam_RT_ACD_0_on_site_B: ca + cam_RT_ACD_0 -> cam_RT_ABCD_0; cytosol*(kon_BR*ca*cam_RT_ACD_0 - koff_BR*cam_RT_ABCD_0); ca_binding_to_cam_RT_ACD_0_on_site_B is "Ca binding to CaM_RT_acd_0 on site b";
  ca_binding_to_cam_RT_ABD_0_on_site_C: ca + cam_RT_ABD_0 -> cam_RT_ABCD_0; cytosol*(kon_CT*ca*cam_RT_ABD_0 - koff_CT*cam_RT_ABCD_0); ca_binding_to_cam_RT_ABD_0_on_site_C is "Ca binding to CaM_RT_abd_0 on site c";
  ca_binding_to_cam_RT_ABC_0_on_site_D: ca + cam_RT_ABC_0 -> cam_RT_ABCD_0; cytosol*(kon_DT*ca*cam_RT_ABC_0 - koff_DT*cam_RT_ABCD_0); ca_binding_to_cam_RT_ABC_0_on_site_D is "Ca binding to CaM_RT_abc_0 on site d";
  Ng_binding_to_cam_RT_ABCD_0: Ng + cam_RT_ABCD_0 -> cam_RT_ABCD_Ng; cytosol*(kon_Ng*Ng*cam_RT_ABCD_0 - koff_Ng_RT*cam_RT_ABCD_Ng); Ng_binding_to_cam_RT_ABCD_0 is "Ng binding to CaM_RT_abcd_0";
  ca_binding_to_cam_RT_BCD_Ng_on_site_A: ca + cam_RT_BCD_Ng -> cam_RT_ABCD_Ng; cytosol*(kon_AR*ca*cam_RT_BCD_Ng - koff_AR*cam_RT_ABCD_Ng); ca_binding_to_cam_RT_BCD_Ng_on_site_A is "Ca binding to CaM_RT_bcd_Ng on site a";
  ca_binding_to_cam_RT_ACD_Ng_on_site_B: ca + cam_RT_ACD_Ng -> cam_RT_ABCD_Ng; cytosol*(kon_BR*ca*cam_RT_ACD_Ng - koff_BR*cam_RT_ABCD_Ng); ca_binding_to_cam_RT_ACD_Ng_on_site_B is "Ca binding to CaM_RT_acd_Ng on site b";
  ca_binding_to_cam_RT_ABD_Ng_on_site_C: ca + cam_RT_ABD_Ng -> cam_RT_ABCD_Ng; cytosol*(kon_CT*ca*cam_RT_ABD_Ng - koff_CT*cam_RT_ABCD_Ng); ca_binding_to_cam_RT_ABD_Ng_on_site_C is "Ca binding to CaM_RT_abd_Ng on site c";
  ca_binding_to_cam_RT_ABC_Ng_on_site_D: ca + cam_RT_ABC_Ng -> cam_RT_ABCD_Ng; cytosol*(kon_DT*ca*cam_RT_ABC_Ng - koff_DT*cam_RT_ABCD_Ng); ca_binding_to_cam_RT_ABC_Ng_on_site_D is "Ca binding to CaM_RT_abc_Ng on site d";
  ca_binding_to_cam_TR_0_0_on_site_A: ca + cam_TR_0_0 -> cam_TR_A_0; cytosol*(kon_AT*ca*cam_TR_0_0 - koff_AT*cam_TR_A_0); ca_binding_to_cam_TR_0_0_on_site_A is "Ca binding to CaM_TR_0_0 on site a";
  ca_binding_to_cam_TR_0_0_on_site_B: ca + cam_TR_0_0 -> cam_TR_B_0; cytosol*(kon_BT*ca*cam_TR_0_0 - koff_BT*cam_TR_B_0); ca_binding_to_cam_TR_0_0_on_site_B is "Ca binding to CaM_TR_0_0 on site b";
  ca_binding_to_cam_TR_0_0_on_site_C: ca + cam_TR_0_0 -> cam_TR_C_0; cytosol*(kon_CR*ca*cam_TR_0_0 - koff_CR*cam_TR_C_0); ca_binding_to_cam_TR_0_0_on_site_C is "Ca binding to CaM_TR_0_0 on site c";
  ca_binding_to_cam_TR_0_0_on_site_D: ca + cam_TR_0_0 -> cam_TR_D_0; cytosol*(kon_DR*ca*cam_TR_0_0 - koff_DR*cam_TR_D_0); ca_binding_to_cam_TR_0_0_on_site_D is "Ca binding to CaM_TR_0_0 on site d";
  ca_binding_to_cam_TR_B_0_on_site_A: ca + cam_TR_B_0 -> cam_TR_AB_0; cytosol*(kon_AT*ca*cam_TR_B_0 - koff_AT*cam_TR_AB_0); ca_binding_to_cam_TR_B_0_on_site_A is "Ca binding to CaM_TR_b_0 on site a";
  ca_binding_to_cam_TR_A_0_on_site_B: ca + cam_TR_A_0 -> cam_TR_AB_0; cytosol*(kon_BT*ca*cam_TR_A_0 - koff_BT*cam_TR_AB_0); ca_binding_to_cam_TR_A_0_on_site_B is "Ca binding to CaM_TR_a_0 on site b";
  ca_binding_to_cam_TR_C_0_on_site_A: ca + cam_TR_C_0 -> cam_TR_AC_0; cytosol*(kon_AT*ca*cam_TR_C_0 - koff_AT*cam_TR_AC_0); ca_binding_to_cam_TR_C_0_on_site_A is "Ca binding to CaM_TR_c_0 on site a";
  ca_binding_to_cam_TR_A_0_on_site_C: ca + cam_TR_A_0 -> cam_TR_AC_0; cytosol*(kon_CR*ca*cam_TR_A_0 - koff_CR*cam_TR_AC_0); ca_binding_to_cam_TR_A_0_on_site_C is "Ca binding to CaM_TR_a_0 on site c";
  ca_binding_to_cam_TR_D_0_on_site_A: ca + cam_TR_D_0 -> cam_TR_AD_0; cytosol*(kon_AT*ca*cam_TR_D_0 - koff_AT*cam_TR_AD_0); ca_binding_to_cam_TR_D_0_on_site_A is "Ca binding to CaM_TR_d_0 on site a";
  ca_binding_to_cam_TR_A_0_on_site_D: ca + cam_TR_A_0 -> cam_TR_AD_0; cytosol*(kon_DR*ca*cam_TR_A_0 - koff_DR*cam_TR_AD_0); ca_binding_to_cam_TR_A_0_on_site_D is "Ca binding to CaM_TR_a_0 on site d";
  ca_binding_to_cam_TR_C_0_on_site_B: ca + cam_TR_C_0 -> cam_TR_BC_0; cytosol*(kon_BT*ca*cam_TR_C_0 - koff_BT*cam_TR_BC_0); ca_binding_to_cam_TR_C_0_on_site_B is "Ca binding to CaM_TR_c_0 on site b";
  ca_binding_to_cam_TR_B_0_on_site_C: ca + cam_TR_B_0 -> cam_TR_BC_0; cytosol*(kon_CR*ca*cam_TR_B_0 - koff_CR*cam_TR_BC_0); ca_binding_to_cam_TR_B_0_on_site_C is "Ca binding to CaM_TR_b_0 on site c";
  ca_binding_to_cam_TR_D_0_on_site_B: ca + cam_TR_D_0 -> cam_TR_BD_0; cytosol*(kon_BT*ca*cam_TR_D_0 - koff_BT*cam_TR_BD_0); ca_binding_to_cam_TR_D_0_on_site_B is "Ca binding to CaM_TR_d_0 on site b";
  ca_binding_to_cam_TR_B_0_on_site_D: ca + cam_TR_B_0 -> cam_TR_BD_0; cytosol*(kon_DR*ca*cam_TR_B_0 - koff_DR*cam_TR_BD_0); ca_binding_to_cam_TR_B_0_on_site_D is "Ca binding to CaM_TR_b_0 on site d";
  ca_binding_to_cam_TR_D_0_on_site_C: ca + cam_TR_D_0 -> cam_TR_CD_0; cytosol*(kon_CR*ca*cam_TR_D_0 - koff_CR*cam_TR_CD_0); ca_binding_to_cam_TR_D_0_on_site_C is "Ca binding to CaM_TR_d_0 on site c";
  ca_binding_to_cam_TR_C_0_on_site_D: ca + cam_TR_C_0 -> cam_TR_CD_0; cytosol*(kon_DR*ca*cam_TR_C_0 - koff_DR*cam_TR_CD_0); ca_binding_to_cam_TR_C_0_on_site_D is "Ca binding to CaM_TR_c_0 on site d";
  ca_binding_to_cam_TR_BC_0_on_site_A: ca + cam_TR_BC_0 -> cam_TR_ABC_0; cytosol*(kon_AT*ca*cam_TR_BC_0 - koff_AT*cam_TR_ABC_0); ca_binding_to_cam_TR_BC_0_on_site_A is "Ca binding to CaM_TR_bc_0 on site a";
  ca_binding_to_cam_TR_AC_0_on_site_B: ca + cam_TR_AC_0 -> cam_TR_ABC_0; cytosol*(kon_BT*ca*cam_TR_AC_0 - koff_BT*cam_TR_ABC_0); ca_binding_to_cam_TR_AC_0_on_site_B is "Ca binding to CaM_TR_ac_0 on site b";
  ca_binding_to_cam_TR_AB_0_on_site_C: ca + cam_TR_AB_0 -> cam_TR_ABC_0; cytosol*(kon_CR*ca*cam_TR_AB_0 - koff_CR*cam_TR_ABC_0); ca_binding_to_cam_TR_AB_0_on_site_C is "Ca binding to CaM_TR_ab_0 on site c";
  ca_binding_to_cam_TR_BD_0_on_site_A: ca + cam_TR_BD_0 -> cam_TR_ABD_0; cytosol*(kon_AT*ca*cam_TR_BD_0 - koff_AT*cam_TR_ABD_0); ca_binding_to_cam_TR_BD_0_on_site_A is "Ca binding to CaM_TR_bd_0 on site a";
  ca_binding_to_cam_TR_AD_0_on_site_B: ca + cam_TR_AD_0 -> cam_TR_ABD_0; cytosol*(kon_BT*ca*cam_TR_AD_0 - koff_BT*cam_TR_ABD_0); ca_binding_to_cam_TR_AD_0_on_site_B is "Ca binding to CaM_TR_ad_0 on site b";
  ca_binding_to_cam_TR_AB_0_on_site_D: ca + cam_TR_AB_0 -> cam_TR_ABD_0; cytosol*(kon_DR*ca*cam_TR_AB_0 - koff_DR*cam_TR_ABD_0); ca_binding_to_cam_TR_AB_0_on_site_D is "Ca binding to CaM_TR_ab_0 on site d";
  ca_binding_to_cam_TR_CD_0_on_site_A: ca + cam_TR_CD_0 -> cam_TR_ACD_0; cytosol*(kon_AT*ca*cam_TR_CD_0 - koff_AT*cam_TR_ACD_0); ca_binding_to_cam_TR_CD_0_on_site_A is "Ca binding to CaM_TR_cd_0 on site a";
  ca_binding_to_cam_TR_AD_0_on_site_C: ca + cam_TR_AD_0 -> cam_TR_ACD_0; cytosol*(kon_CR*ca*cam_TR_AD_0 - koff_CR*cam_TR_ACD_0); ca_binding_to_cam_TR_AD_0_on_site_C is "Ca binding to CaM_TR_ad_0 on site c";
  ca_binding_to_cam_TR_AC_0_on_site_D: ca + cam_TR_AC_0 -> cam_TR_ACD_0; cytosol*(kon_DR*ca*cam_TR_AC_0 - koff_DR*cam_TR_ACD_0); ca_binding_to_cam_TR_AC_0_on_site_D is "Ca binding to CaM_TR_ac_0 on site d";
  ca_binding_to_cam_TR_CD_0_on_site_B: ca + cam_TR_CD_0 -> cam_TR_BCD_0; cytosol*(kon_BT*ca*cam_TR_CD_0 - koff_BT*cam_TR_BCD_0); ca_binding_to_cam_TR_CD_0_on_site_B is "Ca binding to CaM_TR_cd_0 on site b";
  ca_binding_to_cam_TR_BD_0_on_site_C: ca + cam_TR_BD_0 -> cam_TR_BCD_0; cytosol*(kon_CR*ca*cam_TR_BD_0 - koff_CR*cam_TR_BCD_0); ca_binding_to_cam_TR_BD_0_on_site_C is "Ca binding to CaM_TR_bd_0 on site c";
  ca_binding_to_cam_TR_BC_0_on_site_D: ca + cam_TR_BC_0 -> cam_TR_BCD_0; cytosol*(kon_DR*ca*cam_TR_BC_0 - koff_DR*cam_TR_BCD_0); ca_binding_to_cam_TR_BC_0_on_site_D is "Ca binding to CaM_TR_bc_0 on site d";
  ca_binding_to_cam_TR_BCD_0_on_site_A: ca + cam_TR_BCD_0 -> cam_TR_ABCD_0; cytosol*(kon_AT*ca*cam_TR_BCD_0 - koff_AT*cam_TR_ABCD_0); ca_binding_to_cam_TR_BCD_0_on_site_A is "Ca binding to CaM_TR_bcd_0 on site a";
  ca_binding_to_cam_TR_ACD_0_on_site_B: ca + cam_TR_ACD_0 -> cam_TR_ABCD_0; cytosol*(kon_BT*ca*cam_TR_ACD_0 - koff_BT*cam_TR_ABCD_0); ca_binding_to_cam_TR_ACD_0_on_site_B is "Ca binding to CaM_TR_acd_0 on site b";
  ca_binding_to_cam_TR_ABD_0_on_site_C: ca + cam_TR_ABD_0 -> cam_TR_ABCD_0; cytosol*(kon_CR*ca*cam_TR_ABD_0 - koff_CR*cam_TR_ABCD_0); ca_binding_to_cam_TR_ABD_0_on_site_C is "Ca binding to CaM_TR_abd_0 on site c";
  ca_binding_to_cam_TR_ABC_0_on_site_D: ca + cam_TR_ABC_0 -> cam_TR_ABCD_0; cytosol*(kon_DR*ca*cam_TR_ABC_0 - koff_DR*cam_TR_ABCD_0); ca_binding_to_cam_TR_ABC_0_on_site_D is "Ca binding to CaM_TR_abc_0 on site d";
  Ng_binding_to_cam_TT_0_0: Ng + cam_TT_0_0 -> cam_TT_0_Ng; cytosol*(kon_Ng*Ng*cam_TT_0_0 - koff_Ng_TT*cam_TT_0_Ng); Ng_binding_to_cam_TT_0_0 is "Ng binding to CaM_TT_0_0";
  ca_binding_to_cam_TT_0_0_on_site_A: ca + cam_TT_0_0 -> cam_TT_A_0; cytosol*(kon_AT*ca*cam_TT_0_0 - koff_AT*cam_TT_A_0); ca_binding_to_cam_TT_0_0_on_site_A is "Ca binding to CaM_TT_0_0 on site a";
  Ng_binding_to_cam_TT_A_0: Ng + cam_TT_A_0 -> cam_TT_A_Ng; cytosol*(kon_Ng*Ng*cam_TT_A_0 - koff_Ng_TT*cam_TT_A_Ng); Ng_binding_to_cam_TT_A_0 is "Ng binding to CaM_TT_a_0";
  ca_binding_to_cam_TT_0_Ng_on_site_A: ca + cam_TT_0_Ng -> cam_TT_A_Ng; cytosol*(kon_AT*ca*cam_TT_0_Ng - koff_AT*cam_TT_A_Ng); ca_binding_to_cam_TT_0_Ng_on_site_A is "Ca binding to CaM_TT_0_Ng on site a";
  ca_binding_to_cam_TT_0_0_on_site_B: ca + cam_TT_0_0 -> cam_TT_B_0; cytosol*(kon_BT*ca*cam_TT_0_0 - koff_BT*cam_TT_B_0); ca_binding_to_cam_TT_0_0_on_site_B is "Ca binding to CaM_TT_0_0 on site b";
  Ng_binding_to_cam_TT_B_0: Ng + cam_TT_B_0 -> cam_TT_B_Ng; cytosol*(kon_Ng*Ng*cam_TT_B_0 - koff_Ng_TT*cam_TT_B_Ng); Ng_binding_to_cam_TT_B_0 is "Ng binding to CaM_TT_b_0";
  ca_binding_to_cam_TT_0_Ng_on_site_B: ca + cam_TT_0_Ng -> cam_TT_B_Ng; cytosol*(kon_BT*ca*cam_TT_0_Ng - koff_BT*cam_TT_B_Ng); ca_binding_to_cam_TT_0_Ng_on_site_B is "Ca binding to CaM_TT_0_Ng on site b";
  ca_binding_to_cam_TT_0_0_on_site_C: ca + cam_TT_0_0 -> cam_TT_C_0; cytosol*(kon_CT*ca*cam_TT_0_0 - koff_CT*cam_TT_C_0); ca_binding_to_cam_TT_0_0_on_site_C is "Ca binding to CaM_TT_0_0 on site c";
  Ng_binding_to_cam_TT_C_0: Ng + cam_TT_C_0 -> cam_TT_C_Ng; cytosol*(kon_Ng*Ng*cam_TT_C_0 - koff_Ng_TT*cam_TT_C_Ng); Ng_binding_to_cam_TT_C_0 is "Ng binding to CaM_TT_c_0";
  ca_binding_to_cam_TT_0_Ng_on_site_C: ca + cam_TT_0_Ng -> cam_TT_C_Ng; cytosol*(kon_CT*ca*cam_TT_0_Ng - koff_CT*cam_TT_C_Ng); ca_binding_to_cam_TT_0_Ng_on_site_C is "Ca binding to CaM_TT_0_Ng on site c";
  ca_binding_to_cam_TT_0_0_on_site_D: ca + cam_TT_0_0 -> cam_TT_D_0; cytosol*(kon_DT*ca*cam_TT_0_0 - koff_DT*cam_TT_D_0); ca_binding_to_cam_TT_0_0_on_site_D is "Ca binding to CaM_TT_0_0 on site d";
  Ng_binding_to_cam_TT_D_0: Ng + cam_TT_D_0 -> cam_TT_D_Ng; cytosol*(kon_Ng*Ng*cam_TT_D_0 - koff_Ng_TT*cam_TT_D_Ng); Ng_binding_to_cam_TT_D_0 is "Ng binding to CaM_TT_d_0";
  ca_binding_to_cam_TT_0_Ng_on_site_D: ca + cam_TT_0_Ng -> cam_TT_D_Ng; cytosol*(kon_DT*ca*cam_TT_0_Ng - koff_DT*cam_TT_D_Ng); ca_binding_to_cam_TT_0_Ng_on_site_D is "Ca binding to CaM_TT_0_Ng on site d";
  ca_binding_to_cam_TT_B_0_on_site_A: ca + cam_TT_B_0 -> cam_TT_AB_0; cytosol*(kon_AT*ca*cam_TT_B_0 - koff_AT*cam_TT_AB_0); ca_binding_to_cam_TT_B_0_on_site_A is "Ca binding to CaM_TT_b_0 on site a";
  ca_binding_to_cam_TT_A_0_on_site_B: ca + cam_TT_A_0 -> cam_TT_AB_0; cytosol*(kon_BT*ca*cam_TT_A_0 - koff_BT*cam_TT_AB_0); ca_binding_to_cam_TT_A_0_on_site_B is "Ca binding to CaM_TT_a_0 on site b";
  Ng_binding_to_cam_TT_AB_0: Ng + cam_TT_AB_0 -> cam_TT_AB_Ng; cytosol*(kon_Ng*Ng*cam_TT_AB_0 - koff_Ng_TT*cam_TT_AB_Ng); Ng_binding_to_cam_TT_AB_0 is "Ng binding to CaM_TT_ab_0";
  ca_binding_to_cam_TT_B_Ng_on_site_A: ca + cam_TT_B_Ng -> cam_TT_AB_Ng; cytosol*(kon_AT*ca*cam_TT_B_Ng - koff_AT*cam_TT_AB_Ng); ca_binding_to_cam_TT_B_Ng_on_site_A is "Ca binding to CaM_TT_b_Ng on site a";
  ca_binding_to_cam_TT_A_Ng_on_site_B: ca + cam_TT_A_Ng -> cam_TT_AB_Ng; cytosol*(kon_BT*ca*cam_TT_A_Ng - koff_BT*cam_TT_AB_Ng); ca_binding_to_cam_TT_A_Ng_on_site_B is "Ca binding to CaM_TT_a_Ng on site b";
  ca_binding_to_cam_TT_C_0_on_site_A: ca + cam_TT_C_0 -> cam_TT_AC_0; cytosol*(kon_AT*ca*cam_TT_C_0 - koff_AT*cam_TT_AC_0); ca_binding_to_cam_TT_C_0_on_site_A is "Ca binding to CaM_TT_c_0 on site a";
  ca_binding_to_cam_TT_A_0_on_site_C: ca + cam_TT_A_0 -> cam_TT_AC_0; cytosol*(kon_CT*ca*cam_TT_A_0 - koff_CT*cam_TT_AC_0); ca_binding_to_cam_TT_A_0_on_site_C is "Ca binding to CaM_TT_a_0 on site c";
  Ng_binding_to_cam_TT_AC_0: Ng + cam_TT_AC_0 -> cam_TT_AC_Ng; cytosol*(kon_Ng*Ng*cam_TT_AC_0 - koff_Ng_TT*cam_TT_AC_Ng); Ng_binding_to_cam_TT_AC_0 is "Ng binding to CaM_TT_ac_0";
  ca_binding_to_cam_TT_C_Ng_on_site_A: ca + cam_TT_C_Ng -> cam_TT_AC_Ng; cytosol*(kon_AT*ca*cam_TT_C_Ng - koff_AT*cam_TT_AC_Ng); ca_binding_to_cam_TT_C_Ng_on_site_A is "Ca binding to CaM_TT_c_Ng on site a";
  ca_binding_to_cam_TT_A_Ng_on_site_C: ca + cam_TT_A_Ng -> cam_TT_AC_Ng; cytosol*(kon_CT*ca*cam_TT_A_Ng - koff_CT*cam_TT_AC_Ng); ca_binding_to_cam_TT_A_Ng_on_site_C is "Ca binding to CaM_TT_a_Ng on site c";
  ca_binding_to_cam_TT_D_0_on_site_A: ca + cam_TT_D_0 -> cam_TT_AD_0; cytosol*(kon_AT*ca*cam_TT_D_0 - koff_AT*cam_TT_AD_0); ca_binding_to_cam_TT_D_0_on_site_A is "Ca binding to CaM_TT_d_0 on site a";
  ca_binding_to_cam_TT_A_0_on_site_D: ca + cam_TT_A_0 -> cam_TT_AD_0; cytosol*(kon_DT*ca*cam_TT_A_0 - koff_DT*cam_TT_AD_0); ca_binding_to_cam_TT_A_0_on_site_D is "Ca binding to CaM_TT_a_0 on site d";
  Ng_binding_to_cam_TT_AD_0: Ng + cam_TT_AD_0 -> cam_TT_AD_Ng; cytosol*(kon_Ng*Ng*cam_TT_AD_0 - koff_Ng_TT*cam_TT_AD_Ng); Ng_binding_to_cam_TT_AD_0 is "Ng binding to CaM_TT_ad_0";
  ca_binding_to_cam_TT_D_Ng_on_site_A: ca + cam_TT_D_Ng -> cam_TT_AD_Ng; cytosol*(kon_AT*ca*cam_TT_D_Ng - koff_AT*cam_TT_AD_Ng); ca_binding_to_cam_TT_D_Ng_on_site_A is "Ca binding to CaM_TT_d_Ng on site a";
  ca_binding_to_cam_TT_A_Ng_on_site_D: ca + cam_TT_A_Ng -> cam_TT_AD_Ng; cytosol*(kon_DT*ca*cam_TT_A_Ng - koff_DT*cam_TT_AD_Ng); ca_binding_to_cam_TT_A_Ng_on_site_D is "Ca binding to CaM_TT_a_Ng on site d";
  ca_binding_to_cam_TT_C_0_on_site_B: ca + cam_TT_C_0 -> cam_TT_BC_0; cytosol*(kon_BT*ca*cam_TT_C_0 - koff_BT*cam_TT_BC_0); ca_binding_to_cam_TT_C_0_on_site_B is "Ca binding to CaM_TT_c_0 on site b";
  ca_binding_to_cam_TT_B_0_on_site_C: ca + cam_TT_B_0 -> cam_TT_BC_0; cytosol*(kon_CT*ca*cam_TT_B_0 - koff_CT*cam_TT_BC_0); ca_binding_to_cam_TT_B_0_on_site_C is "Ca binding to CaM_TT_b_0 on site c";
  Ng_binding_to_cam_TT_BC_0: Ng + cam_TT_BC_0 -> cam_TT_BC_Ng; cytosol*(kon_Ng*Ng*cam_TT_BC_0 - koff_Ng_TT*cam_TT_BC_Ng); Ng_binding_to_cam_TT_BC_0 is "Ng binding to CaM_TT_bc_0";
  ca_binding_to_cam_TT_C_Ng_on_site_B: ca + cam_TT_C_Ng -> cam_TT_BC_Ng; cytosol*(kon_BT*ca*cam_TT_C_Ng - koff_BT*cam_TT_BC_Ng); ca_binding_to_cam_TT_C_Ng_on_site_B is "Ca binding to CaM_TT_c_Ng on site b";
  ca_binding_to_cam_TT_B_Ng_on_site_C: ca + cam_TT_B_Ng -> cam_TT_BC_Ng; cytosol*(kon_CT*ca*cam_TT_B_Ng - koff_CT*cam_TT_BC_Ng); ca_binding_to_cam_TT_B_Ng_on_site_C is "Ca binding to CaM_TT_b_Ng on site c";
  ca_binding_to_cam_TT_D_0_on_site_B: ca + cam_TT_D_0 -> cam_TT_BD_0; cytosol*(kon_BT*ca*cam_TT_D_0 - koff_BT*cam_TT_BD_0); ca_binding_to_cam_TT_D_0_on_site_B is "Ca binding to CaM_TT_d_0 on site b";
  ca_binding_to_cam_TT_B_0_on_site_D: ca + cam_TT_B_0 -> cam_TT_BD_0; cytosol*(kon_DT*ca*cam_TT_B_0 - koff_DT*cam_TT_BD_0); ca_binding_to_cam_TT_B_0_on_site_D is "Ca binding to CaM_TT_b_0 on site d";
  Ng_binding_to_cam_TT_BD_0: Ng + cam_TT_BD_0 -> cam_TT_BD_Ng; cytosol*(kon_Ng*Ng*cam_TT_BD_0 - koff_Ng_TT*cam_TT_BD_Ng); Ng_binding_to_cam_TT_BD_0 is "Ng binding to CaM_TT_bd_0";
  ca_binding_to_cam_TT_D_Ng_on_site_B: ca + cam_TT_D_Ng -> cam_TT_BD_Ng; cytosol*(kon_BT*ca*cam_TT_D_Ng - koff_BT*cam_TT_BD_Ng); ca_binding_to_cam_TT_D_Ng_on_site_B is "Ca binding to CaM_TT_d_Ng on site b";
  ca_binding_to_cam_TT_B_Ng_on_site_D: ca + cam_TT_B_Ng -> cam_TT_BD_Ng; cytosol*(kon_DT*ca*cam_TT_B_Ng - koff_DT*cam_TT_BD_Ng); ca_binding_to_cam_TT_B_Ng_on_site_D is "Ca binding to CaM_TT_b_Ng on site d";
  ca_binding_to_cam_TT_D_0_on_site_C: ca + cam_TT_D_0 -> cam_TT_CD_0; cytosol*(kon_CT*ca*cam_TT_D_0 - koff_CT*cam_TT_CD_0); ca_binding_to_cam_TT_D_0_on_site_C is "Ca binding to CaM_TT_d_0 on site c";
  ca_binding_to_cam_TT_C_0_on_site_D: ca + cam_TT_C_0 -> cam_TT_CD_0; cytosol*(kon_DT*ca*cam_TT_C_0 - koff_DT*cam_TT_CD_0); ca_binding_to_cam_TT_C_0_on_site_D is "Ca binding to CaM_TT_c_0 on site d";
  Ng_binding_to_cam_TT_CD_0: Ng + cam_TT_CD_0 -> cam_TT_CD_Ng; cytosol*(kon_Ng*Ng*cam_TT_CD_0 - koff_Ng_TT*cam_TT_CD_Ng); Ng_binding_to_cam_TT_CD_0 is "Ng binding to CaM_TT_cd_0";
  ca_binding_to_cam_TT_D_Ng_on_site_C: ca + cam_TT_D_Ng -> cam_TT_CD_Ng; cytosol*(kon_CT*ca*cam_TT_D_Ng - koff_CT*cam_TT_CD_Ng); ca_binding_to_cam_TT_D_Ng_on_site_C is "Ca binding to CaM_TT_d_Ng on site c";
  ca_binding_to_cam_TT_C_Ng_on_site_D: ca + cam_TT_C_Ng -> cam_TT_CD_Ng; cytosol*(kon_DT*ca*cam_TT_C_Ng - koff_DT*cam_TT_CD_Ng); ca_binding_to_cam_TT_C_Ng_on_site_D is "Ca binding to CaM_TT_c_Ng on site d";
  ca_binding_to_cam_TT_BC_0_on_site_A: ca + cam_TT_BC_0 -> cam_TT_ABC_0; cytosol*(kon_AT*ca*cam_TT_BC_0 - koff_AT*cam_TT_ABC_0); ca_binding_to_cam_TT_BC_0_on_site_A is "Ca binding to CaM_TT_bc_0 on site a";
  ca_binding_to_cam_TT_AC_0_on_site_B: ca + cam_TT_AC_0 -> cam_TT_ABC_0; cytosol*(kon_BT*ca*cam_TT_AC_0 - koff_BT*cam_TT_ABC_0); ca_binding_to_cam_TT_AC_0_on_site_B is "Ca binding to CaM_TT_ac_0 on site b";
  ca_binding_to_cam_TT_AB_0_on_site_C: ca + cam_TT_AB_0 -> cam_TT_ABC_0; cytosol*(kon_CT*ca*cam_TT_AB_0 - koff_CT*cam_TT_ABC_0); ca_binding_to_cam_TT_AB_0_on_site_C is "Ca binding to CaM_TT_ab_0 on site c";
  Ng_binding_to_cam_TT_ABC_0: Ng + cam_TT_ABC_0 -> cam_TT_ABC_Ng; cytosol*(kon_Ng*Ng*cam_TT_ABC_0 - koff_Ng_TT*cam_TT_ABC_Ng); Ng_binding_to_cam_TT_ABC_0 is "Ng binding to CaM_TT_abc_0";
  ca_binding_to_cam_TT_BC_Ng_on_site_A: ca + cam_TT_BC_Ng -> cam_TT_ABC_Ng; cytosol*(kon_AT*ca*cam_TT_BC_Ng - koff_AT*cam_TT_ABC_Ng); ca_binding_to_cam_TT_BC_Ng_on_site_A is "Ca binding to CaM_TT_bc_Ng on site a";
  ca_binding_to_cam_TT_AC_Ng_on_site_B: ca + cam_TT_AC_Ng -> cam_TT_ABC_Ng; cytosol*(kon_BT*ca*cam_TT_AC_Ng - koff_BT*cam_TT_ABC_Ng); ca_binding_to_cam_TT_AC_Ng_on_site_B is "Ca binding to CaM_TT_ac_Ng on site b";
  ca_binding_to_cam_TT_AB_Ng_on_site_C: ca + cam_TT_AB_Ng -> cam_TT_ABC_Ng; cytosol*(kon_CT*ca*cam_TT_AB_Ng - koff_CT*cam_TT_ABC_Ng); ca_binding_to_cam_TT_AB_Ng_on_site_C is "Ca binding to CaM_TT_ab_Ng on site c";
  ca_binding_to_cam_TT_BD_0_on_site_A: ca + cam_TT_BD_0 -> cam_TT_ABD_0; cytosol*(kon_AT*ca*cam_TT_BD_0 - koff_AT*cam_TT_ABD_0); ca_binding_to_cam_TT_BD_0_on_site_A is "Ca binding to CaM_TT_bd_0 on site a";
  ca_binding_to_cam_TT_AD_0_on_site_B: ca + cam_TT_AD_0 -> cam_TT_ABD_0; cytosol*(kon_BT*ca*cam_TT_AD_0 - koff_BT*cam_TT_ABD_0); ca_binding_to_cam_TT_AD_0_on_site_B is "Ca binding to CaM_TT_ad_0 on site b";
  ca_binding_to_cam_TT_AB_0_on_site_D: ca + cam_TT_AB_0 -> cam_TT_ABD_0; cytosol*(kon_DT*ca*cam_TT_AB_0 - koff_DT*cam_TT_ABD_0); ca_binding_to_cam_TT_AB_0_on_site_D is "Ca binding to CaM_TT_ab_0 on site d";
  Ng_binding_to_cam_TT_ABD_0: Ng + cam_TT_ABD_0 -> cam_TT_ABD_Ng; cytosol*(kon_Ng*Ng*cam_TT_ABD_0 - koff_Ng_TT*cam_TT_ABD_Ng); Ng_binding_to_cam_TT_ABD_0 is "Ng binding to CaM_TT_abd_0";
  ca_binding_to_cam_TT_BD_Ng_on_site_A: ca + cam_TT_BD_Ng -> cam_TT_ABD_Ng; cytosol*(kon_AT*ca*cam_TT_BD_Ng - koff_AT*cam_TT_ABD_Ng); ca_binding_to_cam_TT_BD_Ng_on_site_A is "Ca binding to CaM_TT_bd_Ng on site a";
  ca_binding_to_cam_TT_AD_Ng_on_site_B: ca + cam_TT_AD_Ng -> cam_TT_ABD_Ng; cytosol*(kon_BT*ca*cam_TT_AD_Ng - koff_BT*cam_TT_ABD_Ng); ca_binding_to_cam_TT_AD_Ng_on_site_B is "Ca binding to CaM_TT_ad_Ng on site b";
  ca_binding_to_cam_TT_AB_Ng_on_site_D: ca + cam_TT_AB_Ng -> cam_TT_ABD_Ng; cytosol*(kon_DT*ca*cam_TT_AB_Ng - koff_DT*cam_TT_ABD_Ng); ca_binding_to_cam_TT_AB_Ng_on_site_D is "Ca binding to CaM_TT_ab_Ng on site d";
  ca_binding_to_cam_TT_CD_0_on_site_A: ca + cam_TT_CD_0 -> cam_TT_ACD_0; cytosol*(kon_AT*ca*cam_TT_CD_0 - koff_AT*cam_TT_ACD_0); ca_binding_to_cam_TT_CD_0_on_site_A is "Ca binding to CaM_TT_cd_0 on site a";
  ca_binding_to_cam_TT_AD_0_on_site_C: ca + cam_TT_AD_0 -> cam_TT_ACD_0; cytosol*(kon_CT*ca*cam_TT_AD_0 - koff_CT*cam_TT_ACD_0); ca_binding_to_cam_TT_AD_0_on_site_C is "Ca binding to CaM_TT_ad_0 on site c";
  ca_binding_to_cam_TT_AC_0_on_site_D: ca + cam_TT_AC_0 -> cam_TT_ACD_0; cytosol*(kon_DT*ca*cam_TT_AC_0 - koff_DT*cam_TT_ACD_0); ca_binding_to_cam_TT_AC_0_on_site_D is "Ca binding to CaM_TT_ac_0 on site d";
  Ng_binding_to_cam_TT_ACD_0: Ng + cam_TT_ACD_0 -> cam_TT_ACD_Ng; cytosol*(kon_Ng*Ng*cam_TT_ACD_0 - koff_Ng_TT*cam_TT_ACD_Ng); Ng_binding_to_cam_TT_ACD_0 is "Ng binding to CaM_TT_acd_0";
  ca_binding_to_cam_TT_CD_Ng_on_site_A: ca + cam_TT_CD_Ng -> cam_TT_ACD_Ng; cytosol*(kon_AT*ca*cam_TT_CD_Ng - koff_AT*cam_TT_ACD_Ng); ca_binding_to_cam_TT_CD_Ng_on_site_A is "Ca binding to CaM_TT_cd_Ng on site a";
  ca_binding_to_cam_TT_AD_Ng_on_site_C: ca + cam_TT_AD_Ng -> cam_TT_ACD_Ng; cytosol*(kon_CT*ca*cam_TT_AD_Ng - koff_CT*cam_TT_ACD_Ng); ca_binding_to_cam_TT_AD_Ng_on_site_C is "Ca binding to CaM_TT_ad_Ng on site c";
  ca_binding_to_cam_TT_AC_Ng_on_site_D: ca + cam_TT_AC_Ng -> cam_TT_ACD_Ng; cytosol*(kon_DT*ca*cam_TT_AC_Ng - koff_DT*cam_TT_ACD_Ng); ca_binding_to_cam_TT_AC_Ng_on_site_D is "Ca binding to CaM_TT_ac_Ng on site d";
  ca_binding_to_cam_TT_CD_0_on_site_B: ca + cam_TT_CD_0 -> cam_TT_BCD_0; cytosol*(kon_BT*ca*cam_TT_CD_0 - koff_BT*cam_TT_BCD_0); ca_binding_to_cam_TT_CD_0_on_site_B is "Ca binding to CaM_TT_cd_0 on site b";
  ca_binding_to_cam_TT_BD_0_on_site_C: ca + cam_TT_BD_0 -> cam_TT_BCD_0; cytosol*(kon_CT*ca*cam_TT_BD_0 - koff_CT*cam_TT_BCD_0); ca_binding_to_cam_TT_BD_0_on_site_C is "Ca binding to CaM_TT_bd_0 on site c";
  ca_binding_to_cam_TT_BC_0_on_site_D: ca + cam_TT_BC_0 -> cam_TT_BCD_0; cytosol*(kon_DT*ca*cam_TT_BC_0 - koff_DT*cam_TT_BCD_0); ca_binding_to_cam_TT_BC_0_on_site_D is "Ca binding to CaM_TT_bc_0 on site d";
  Ng_binding_to_cam_TT_BCD_0: Ng + cam_TT_BCD_0 -> cam_TT_BCD_Ng; cytosol*(kon_Ng*Ng*cam_TT_BCD_0 - koff_Ng_TT*cam_TT_BCD_Ng); Ng_binding_to_cam_TT_BCD_0 is "Ng binding to CaM_TT_bcd_0";
  ca_binding_to_cam_TT_CD_Ng_on_site_B: ca + cam_TT_CD_Ng -> cam_TT_BCD_Ng; cytosol*(kon_BT*ca*cam_TT_CD_Ng - koff_BT*cam_TT_BCD_Ng); ca_binding_to_cam_TT_CD_Ng_on_site_B is "Ca binding to CaM_TT_cd_Ng on site b";
  ca_binding_to_cam_TT_BD_Ng_on_site_C: ca + cam_TT_BD_Ng -> cam_TT_BCD_Ng; cytosol*(kon_CT*ca*cam_TT_BD_Ng - koff_CT*cam_TT_BCD_Ng); ca_binding_to_cam_TT_BD_Ng_on_site_C is "Ca binding to CaM_TT_bd_Ng on site c";
  ca_binding_to_cam_TT_BC_Ng_on_site_D: ca + cam_TT_BC_Ng -> cam_TT_BCD_Ng; cytosol*(kon_DT*ca*cam_TT_BC_Ng - koff_DT*cam_TT_BCD_Ng); ca_binding_to_cam_TT_BC_Ng_on_site_D is "Ca binding to CaM_TT_bc_Ng on site d";
  ca_binding_to_cam_TT_BCD_0_on_site_A: ca + cam_TT_BCD_0 -> cam_TT_ABCD_0; cytosol*(kon_AT*ca*cam_TT_BCD_0 - koff_AT*cam_TT_ABCD_0); ca_binding_to_cam_TT_BCD_0_on_site_A is "Ca binding to CaM_TT_bcd_0 on site a";
  ca_binding_to_cam_TT_ACD_0_on_site_B: ca + cam_TT_ACD_0 -> cam_TT_ABCD_0; cytosol*(kon_BT*ca*cam_TT_ACD_0 - koff_BT*cam_TT_ABCD_0); ca_binding_to_cam_TT_ACD_0_on_site_B is "Ca binding to CaM_TT_acd_0 on site b";
  ca_binding_to_cam_TT_ABD_0_on_site_C: ca + cam_TT_ABD_0 -> cam_TT_ABCD_0; cytosol*(kon_CT*ca*cam_TT_ABD_0 - koff_CT*cam_TT_ABCD_0); ca_binding_to_cam_TT_ABD_0_on_site_C is "Ca binding to CaM_TT_abd_0 on site c";
  ca_binding_to_cam_TT_ABC_0_on_site_D: ca + cam_TT_ABC_0 -> cam_TT_ABCD_0; cytosol*(kon_DT*ca*cam_TT_ABC_0 - koff_DT*cam_TT_ABCD_0); ca_binding_to_cam_TT_ABC_0_on_site_D is "Ca binding to CaM_TT_abc_0 on site d";
  Ng_binding_to_cam_TT_ABCD_0: Ng + cam_TT_ABCD_0 -> cam_TT_ABCD_Ng; cytosol*(kon_Ng*Ng*cam_TT_ABCD_0 - koff_Ng_TT*cam_TT_ABCD_Ng); Ng_binding_to_cam_TT_ABCD_0 is "Ng binding to CaM_TT_abcd_0";
  ca_binding_to_cam_TT_BCD_Ng_on_site_A: ca + cam_TT_BCD_Ng -> cam_TT_ABCD_Ng; cytosol*(kon_AT*ca*cam_TT_BCD_Ng - koff_AT*cam_TT_ABCD_Ng); ca_binding_to_cam_TT_BCD_Ng_on_site_A is "Ca binding to CaM_TT_bcd_Ng on site a";
  ca_binding_to_cam_TT_ACD_Ng_on_site_B: ca + cam_TT_ACD_Ng -> cam_TT_ABCD_Ng; cytosol*(kon_BT*ca*cam_TT_ACD_Ng - koff_BT*cam_TT_ABCD_Ng); ca_binding_to_cam_TT_ACD_Ng_on_site_B is "Ca binding to CaM_TT_acd_Ng on site b";
  ca_binding_to_cam_TT_ABD_Ng_on_site_C: ca + cam_TT_ABD_Ng -> cam_TT_ABCD_Ng; cytosol*(kon_CT*ca*cam_TT_ABD_Ng - koff_CT*cam_TT_ABCD_Ng); ca_binding_to_cam_TT_ABD_Ng_on_site_C is "Ca binding to CaM_TT_abd_Ng on site c";
  ca_binding_to_cam_TT_ABC_Ng_on_site_D: ca + cam_TT_ABC_Ng -> cam_TT_ABCD_Ng; cytosol*(kon_DT*ca*cam_TT_ABC_Ng - koff_DT*cam_TT_ABCD_Ng); ca_binding_to_cam_TT_ABC_Ng_on_site_D is "Ca binding to CaM_TT_abc_Ng on site d";
  Transition_from_cam_RT_0_0_to_cam_RR_0_0: cam_RT_0_0 -> cam_RR_0_0; cytosol*(k_T2R_C0*cam_RT_0_0 - k_R2T_C0*cam_RR_0_0); Transition_from_cam_RT_0_0_to_cam_RR_0_0 is "Transition from CaM_RT_0_0 to CaM_RR_0_0";
  Transition_from_cam_RT_A_0_to_cam_RR_A_0: cam_RT_A_0 -> cam_RR_A_0; cytosol*(k_T2R_C0*cam_RT_A_0 - k_R2T_C0*cam_RR_A_0); Transition_from_cam_RT_A_0_to_cam_RR_A_0 is "Transition from CaM_RT_a_0 to CaM_RR_a_0";
  Transition_from_cam_RT_B_0_to_cam_RR_B_0: cam_RT_B_0 -> cam_RR_B_0; cytosol*(k_T2R_C0*cam_RT_B_0 - k_R2T_C0*cam_RR_B_0); Transition_from_cam_RT_B_0_to_cam_RR_B_0 is "Transition from CaM_RT_b_0 to CaM_RR_b_0";
  Transition_from_cam_RT_C_0_to_cam_RR_C_0: cam_RT_C_0 -> cam_RR_C_0; cytosol*(k_T2R_C1*cam_RT_C_0 - k_R2T_C1*cam_RR_C_0); Transition_from_cam_RT_C_0_to_cam_RR_C_0 is "Transition from CaM_RT_c_0 to CaM_RR_c_0";
  Transition_from_cam_RT_D_0_to_cam_RR_D_0: cam_RT_D_0 -> cam_RR_D_0; cytosol*(k_T2R_C1*cam_RT_D_0 - k_R2T_C1*cam_RR_D_0); Transition_from_cam_RT_D_0_to_cam_RR_D_0 is "Transition from CaM_RT_d_0 to CaM_RR_d_0";
  Transition_from_cam_RT_AB_0_to_cam_RR_AB_0: cam_RT_AB_0 -> cam_RR_AB_0; cytosol*(k_T2R_C0*cam_RT_AB_0 - k_R2T_C0*cam_RR_AB_0); Transition_from_cam_RT_AB_0_to_cam_RR_AB_0 is "Transition from CaM_RT_ab_0 to CaM_RR_ab_0";
  Transition_from_cam_RT_AC_0_to_cam_RR_AC_0: cam_RT_AC_0 -> cam_RR_AC_0; cytosol*(k_T2R_C1*cam_RT_AC_0 - k_R2T_C1*cam_RR_AC_0); Transition_from_cam_RT_AC_0_to_cam_RR_AC_0 is "Transition from CaM_RT_ac_0 to CaM_RR_ac_0";
  Transition_from_cam_RT_AD_0_to_cam_RR_AD_0: cam_RT_AD_0 -> cam_RR_AD_0; cytosol*(k_T2R_C1*cam_RT_AD_0 - k_R2T_C1*cam_RR_AD_0); Transition_from_cam_RT_AD_0_to_cam_RR_AD_0 is "Transition from CaM_RT_ad_0 to CaM_RR_ad_0";
  Transition_from_cam_RT_BC_0_to_cam_RR_BC_0: cam_RT_BC_0 -> cam_RR_BC_0; cytosol*(k_T2R_C1*cam_RT_BC_0 - k_R2T_C1*cam_RR_BC_0); Transition_from_cam_RT_BC_0_to_cam_RR_BC_0 is "Transition from CaM_RT_bc_0 to CaM_RR_bc_0";
  Transition_from_cam_RT_BD_0_to_cam_RR_BD_0: cam_RT_BD_0 -> cam_RR_BD_0; cytosol*(k_T2R_C1*cam_RT_BD_0 - k_R2T_C1*cam_RR_BD_0); Transition_from_cam_RT_BD_0_to_cam_RR_BD_0 is "Transition from CaM_RT_bd_0 to CaM_RR_bd_0";
  Transition_from_cam_RT_CD_0_to_cam_RR_CD_0: cam_RT_CD_0 -> cam_RR_CD_0; cytosol*(k_T2R_C2*cam_RT_CD_0 - k_R2T_C2*cam_RR_CD_0); Transition_from_cam_RT_CD_0_to_cam_RR_CD_0 is "Transition from CaM_RT_cd_0 to CaM_RR_cd_0";
  Transition_from_cam_RT_ABC_0_to_cam_RR_ABC_0: cam_RT_ABC_0 -> cam_RR_ABC_0; cytosol*(k_T2R_C1*cam_RT_ABC_0 - k_R2T_C1*cam_RR_ABC_0); Transition_from_cam_RT_ABC_0_to_cam_RR_ABC_0 is "Transition from CaM_RT_abc_0 to CaM_RR_abc_0";
  Transition_from_cam_RT_ABD_0_to_cam_RR_ABD_0: cam_RT_ABD_0 -> cam_RR_ABD_0; cytosol*(k_T2R_C1*cam_RT_ABD_0 - k_R2T_C1*cam_RR_ABD_0); Transition_from_cam_RT_ABD_0_to_cam_RR_ABD_0 is "Transition from CaM_RT_abd_0 to CaM_RR_abd_0";
  Transition_from_cam_RT_ACD_0_to_cam_RR_ACD_0: cam_RT_ACD_0 -> cam_RR_ACD_0; cytosol*(k_T2R_C2*cam_RT_ACD_0 - k_R2T_C2*cam_RR_ACD_0); Transition_from_cam_RT_ACD_0_to_cam_RR_ACD_0 is "Transition from CaM_RT_acd_0 to CaM_RR_acd_0";
  Transition_from_cam_RT_BCD_0_to_cam_RR_BCD_0: cam_RT_BCD_0 -> cam_RR_BCD_0; cytosol*(k_T2R_C2*cam_RT_BCD_0 - k_R2T_C2*cam_RR_BCD_0); Transition_from_cam_RT_BCD_0_to_cam_RR_BCD_0 is "Transition from CaM_RT_bcd_0 to CaM_RR_bcd_0";
  Transition_from_cam_RT_ABCD_0_to_cam_RR_ABCD_0: cam_RT_ABCD_0 -> cam_RR_ABCD_0; cytosol*(k_T2R_C2*cam_RT_ABCD_0 - k_R2T_C2*cam_RR_ABCD_0); Transition_from_cam_RT_ABCD_0_to_cam_RR_ABCD_0 is "Transition from CaM_RT_abcd_0 to CaM_RR_abcd_0";
  Transition_from_cam_TR_0_0_to_cam_RR_0_0: cam_TR_0_0 -> cam_RR_0_0; cytosol*(k_T2R_N0*cam_TR_0_0 - k_R2T_N0*cam_RR_0_0); Transition_from_cam_TR_0_0_to_cam_RR_0_0 is "Transition from CaM_TR_0_0 to CaM_RR_0_0";
  Transition_from_cam_TR_A_0_to_cam_RR_A_0: cam_TR_A_0 -> cam_RR_A_0; cytosol*(k_T2R_N1*cam_TR_A_0 - k_R2T_N1*cam_RR_A_0); Transition_from_cam_TR_A_0_to_cam_RR_A_0 is "Transition from CaM_TR_a_0 to CaM_RR_a_0";
  Transition_from_cam_TR_B_0_to_cam_RR_B_0: cam_TR_B_0 -> cam_RR_B_0; cytosol*(k_T2R_N1*cam_TR_B_0 - k_R2T_N1*cam_RR_B_0); Transition_from_cam_TR_B_0_to_cam_RR_B_0 is "Transition from CaM_TR_b_0 to CaM_RR_b_0";
  Transition_from_cam_TR_C_0_to_cam_RR_C_0: cam_TR_C_0 -> cam_RR_C_0; cytosol*(k_T2R_N0*cam_TR_C_0 - k_R2T_N0*cam_RR_C_0); Transition_from_cam_TR_C_0_to_cam_RR_C_0 is "Transition from CaM_TR_c_0 to CaM_RR_c_0";
  Transition_from_cam_TR_D_0_to_cam_RR_D_0: cam_TR_D_0 -> cam_RR_D_0; cytosol*(k_T2R_N0*cam_TR_D_0 - k_R2T_N0*cam_RR_D_0); Transition_from_cam_TR_D_0_to_cam_RR_D_0 is "Transition from CaM_TR_d_0 to CaM_RR_d_0";
  Transition_from_cam_TR_AB_0_to_cam_RR_AB_0: cam_TR_AB_0 -> cam_RR_AB_0; cytosol*(k_T2R_N2*cam_TR_AB_0 - k_R2T_N2*cam_RR_AB_0); Transition_from_cam_TR_AB_0_to_cam_RR_AB_0 is "Transition from CaM_TR_ab_0 to CaM_RR_ab_0";
  Transition_from_cam_TR_AC_0_to_cam_RR_AC_0: cam_TR_AC_0 -> cam_RR_AC_0; cytosol*(k_T2R_N1*cam_TR_AC_0 - k_R2T_N1*cam_RR_AC_0); Transition_from_cam_TR_AC_0_to_cam_RR_AC_0 is "Transition from CaM_TR_ac_0 to CaM_RR_ac_0";
  Transition_from_cam_TR_AD_0_to_cam_RR_AD_0: cam_TR_AD_0 -> cam_RR_AD_0; cytosol*(k_T2R_N1*cam_TR_AD_0 - k_R2T_N1*cam_RR_AD_0); Transition_from_cam_TR_AD_0_to_cam_RR_AD_0 is "Transition from CaM_TR_ad_0 to CaM_RR_ad_0";
  Transition_from_cam_TR_BC_0_to_cam_RR_BC_0: cam_TR_BC_0 -> cam_RR_BC_0; cytosol*(k_T2R_N1*cam_TR_BC_0 - k_R2T_N1*cam_RR_BC_0); Transition_from_cam_TR_BC_0_to_cam_RR_BC_0 is "Transition from CaM_TR_bc_0 to CaM_RR_bc_0";
  Transition_from_cam_TR_BD_0_to_cam_RR_BD_0: cam_TR_BD_0 -> cam_RR_BD_0; cytosol*(k_T2R_N1*cam_TR_BD_0 - k_R2T_N1*cam_RR_BD_0); Transition_from_cam_TR_BD_0_to_cam_RR_BD_0 is "Transition from CaM_TR_bd_0 to CaM_RR_bd_0";
  Transition_from_cam_TR_CD_0_to_cam_RR_CD_0: cam_TR_CD_0 -> cam_RR_CD_0; cytosol*(k_T2R_N0*cam_TR_CD_0 - k_R2T_N0*cam_RR_CD_0); Transition_from_cam_TR_CD_0_to_cam_RR_CD_0 is "Transition from CaM_TR_cd_0 to CaM_RR_cd_0";
  Transition_from_cam_TR_ABC_0_to_cam_RR_ABC_0: cam_TR_ABC_0 -> cam_RR_ABC_0; cytosol*(k_T2R_N2*cam_TR_ABC_0 - k_R2T_N2*cam_RR_ABC_0); Transition_from_cam_TR_ABC_0_to_cam_RR_ABC_0 is "Transition from CaM_TR_abc_0 to CaM_RR_abc_0";
  Transition_from_cam_TR_ABD_0_to_cam_RR_ABD_0: cam_TR_ABD_0 -> cam_RR_ABD_0; cytosol*(k_T2R_N2*cam_TR_ABD_0 - k_R2T_N2*cam_RR_ABD_0); Transition_from_cam_TR_ABD_0_to_cam_RR_ABD_0 is "Transition from CaM_TR_abd_0 to CaM_RR_abd_0";
  Transition_from_cam_TR_ACD_0_to_cam_RR_ACD_0: cam_TR_ACD_0 -> cam_RR_ACD_0; cytosol*(k_T2R_N1*cam_TR_ACD_0 - k_R2T_N1*cam_RR_ACD_0); Transition_from_cam_TR_ACD_0_to_cam_RR_ACD_0 is "Transition from CaM_TR_acd_0 to CaM_RR_acd_0";
  Transition_from_cam_TR_BCD_0_to_cam_RR_BCD_0: cam_TR_BCD_0 -> cam_RR_BCD_0; cytosol*(k_T2R_N1*cam_TR_BCD_0 - k_R2T_N1*cam_RR_BCD_0); Transition_from_cam_TR_BCD_0_to_cam_RR_BCD_0 is "Transition from CaM_TR_bcd_0 to CaM_RR_bcd_0";
  Transition_from_cam_TR_ABCD_0_to_cam_RR_ABCD_0: cam_TR_ABCD_0 -> cam_RR_ABCD_0; cytosol*(k_T2R_N2*cam_TR_ABCD_0 - k_R2T_N2*cam_RR_ABCD_0); Transition_from_cam_TR_ABCD_0_to_cam_RR_ABCD_0 is "Transition from CaM_TR_abcd_0 to CaM_RR_abcd_0";
  Transition_from_cam_TT_0_0_to_cam_RT_0_0: cam_TT_0_0 -> cam_RT_0_0; cytosol*(k_T2R_N0*cam_TT_0_0 - k_R2T_N0*cam_RT_0_0); Transition_from_cam_TT_0_0_to_cam_RT_0_0 is "Transition from CaM_TT_0_0 to CaM_RT_0_0";
  Transition_from_cam_TT_0_0_to_cam_TR_0_0: cam_TT_0_0 -> cam_TR_0_0; cytosol*(k_T2R_C0*cam_TT_0_0 - k_R2T_C0*cam_TR_0_0); Transition_from_cam_TT_0_0_to_cam_TR_0_0 is "Transition from CaM_TT_0_0 to CaM_TR_0_0";
  Transition_from_cam_TT_0_Ng_to_cam_RT_0_Ng: cam_TT_0_Ng -> cam_RT_0_Ng; cytosol*(k_TT2RT_N0_Ng*cam_TT_0_Ng - k_RT2TT_N0_Ng*cam_RT_0_Ng); Transition_from_cam_TT_0_Ng_to_cam_RT_0_Ng is "Transition from CaM_TT_0_Ng to CaM_RT_0_Ng";
  Transition_from_cam_TT_A_0_to_cam_RT_A_0: cam_TT_A_0 -> cam_RT_A_0; cytosol*(k_T2R_N1*cam_TT_A_0 - k_R2T_N1*cam_RT_A_0); Transition_from_cam_TT_A_0_to_cam_RT_A_0 is "Transition from CaM_TT_a_0 to CaM_RT_a_0";
  Transition_from_cam_TT_A_0_to_cam_TR_A_0: cam_TT_A_0 -> cam_TR_A_0; cytosol*(k_T2R_C0*cam_TT_A_0 - k_R2T_C0*cam_TR_A_0); Transition_from_cam_TT_A_0_to_cam_TR_A_0 is "Transition from CaM_TT_a_0 to CaM_TR_a_0";
  Transition_from_cam_TT_A_Ng_to_cam_RT_A_Ng: cam_TT_A_Ng -> cam_RT_A_Ng; cytosol*(k_TT2RT_N1_Ng*cam_TT_A_Ng - k_RT2TT_N1_Ng*cam_RT_A_Ng); Transition_from_cam_TT_A_Ng_to_cam_RT_A_Ng is "Transition from CaM_TT_a_Ng to CaM_RT_a_Ng";
  Transition_from_cam_TT_B_0_to_cam_RT_B_0: cam_TT_B_0 -> cam_RT_B_0; cytosol*(k_T2R_N1*cam_TT_B_0 - k_R2T_N1*cam_RT_B_0); Transition_from_cam_TT_B_0_to_cam_RT_B_0 is "Transition from CaM_TT_b_0 to CaM_RT_b_0";
  Transition_from_cam_TT_B_0_to_cam_TR_B_0: cam_TT_B_0 -> cam_TR_B_0; cytosol*(k_T2R_C0*cam_TT_B_0 - k_R2T_C0*cam_TR_B_0); Transition_from_cam_TT_B_0_to_cam_TR_B_0 is "Transition from CaM_TT_b_0 to CaM_TR_b_0";
  Transition_from_cam_TT_B_Ng_to_cam_RT_B_Ng: cam_TT_B_Ng -> cam_RT_B_Ng; cytosol*(k_TT2RT_N1_Ng*cam_TT_B_Ng - k_RT2TT_N1_Ng*cam_RT_B_Ng); Transition_from_cam_TT_B_Ng_to_cam_RT_B_Ng is "Transition from CaM_TT_b_Ng to CaM_RT_b_Ng";
  Transition_from_cam_TT_C_0_to_cam_RT_C_0: cam_TT_C_0 -> cam_RT_C_0; cytosol*(k_T2R_N0*cam_TT_C_0 - k_R2T_N0*cam_RT_C_0); Transition_from_cam_TT_C_0_to_cam_RT_C_0 is "Transition from CaM_TT_c_0 to CaM_RT_c_0";
  Transition_from_cam_TT_C_0_to_cam_TR_C_0: cam_TT_C_0 -> cam_TR_C_0; cytosol*(k_T2R_C1*cam_TT_C_0 - k_R2T_C1*cam_TR_C_0); Transition_from_cam_TT_C_0_to_cam_TR_C_0 is "Transition from CaM_TT_c_0 to CaM_TR_c_0";
  Transition_from_cam_TT_C_Ng_to_cam_RT_C_Ng: cam_TT_C_Ng -> cam_RT_C_Ng; cytosol*(k_TT2RT_N0_Ng*cam_TT_C_Ng - k_RT2TT_N0_Ng*cam_RT_C_Ng); Transition_from_cam_TT_C_Ng_to_cam_RT_C_Ng is "Transition from CaM_TT_c_Ng to CaM_RT_c_Ng";
  Transition_from_cam_TT_D_0_to_cam_RT_D_0: cam_TT_D_0 -> cam_RT_D_0; cytosol*(k_T2R_N0*cam_TT_D_0 - k_R2T_N0*cam_RT_D_0); Transition_from_cam_TT_D_0_to_cam_RT_D_0 is "Transition from CaM_TT_d_0 to CaM_RT_d_0";
  Transition_from_cam_TT_D_0_to_cam_TR_D_0: cam_TT_D_0 -> cam_TR_D_0; cytosol*(k_T2R_C1*cam_TT_D_0 - k_R2T_C1*cam_TR_D_0); Transition_from_cam_TT_D_0_to_cam_TR_D_0 is "Transition from CaM_TT_d_0 to CaM_TR_d_0";
  Transition_from_cam_TT_D_Ng_to_cam_RT_D_Ng: cam_TT_D_Ng -> cam_RT_D_Ng; cytosol*(k_TT2RT_N0_Ng*cam_TT_D_Ng - k_RT2TT_N0_Ng*cam_RT_D_Ng); Transition_from_cam_TT_D_Ng_to_cam_RT_D_Ng is "Transition from CaM_TT_d_Ng to CaM_RT_d_Ng";
  Transition_from_cam_TT_AB_0_to_cam_RT_AB_0: cam_TT_AB_0 -> cam_RT_AB_0; cytosol*(k_T2R_N2*cam_TT_AB_0 - k_R2T_N2*cam_RT_AB_0); Transition_from_cam_TT_AB_0_to_cam_RT_AB_0 is "Transition from CaM_TT_ab_0 to CaM_RT_ab_0";
  Transition_from_cam_TT_AB_0_to_cam_TR_AB_0: cam_TT_AB_0 -> cam_TR_AB_0; cytosol*(k_T2R_C0*cam_TT_AB_0 - k_R2T_C0*cam_TR_AB_0); Transition_from_cam_TT_AB_0_to_cam_TR_AB_0 is "Transition from CaM_TT_ab_0 to CaM_TR_ab_0";
  Transition_from_cam_TT_AB_Ng_to_cam_RT_AB_Ng: cam_TT_AB_Ng -> cam_RT_AB_Ng; cytosol*(k_TT2RT_N2_Ng*cam_TT_AB_Ng - k_RT2TT_N2_Ng*cam_RT_AB_Ng); Transition_from_cam_TT_AB_Ng_to_cam_RT_AB_Ng is "Transition from CaM_TT_ab_Ng to CaM_RT_ab_Ng";
  Transition_from_cam_TT_AC_0_to_cam_RT_AC_0: cam_TT_AC_0 -> cam_RT_AC_0; cytosol*(k_T2R_N1*cam_TT_AC_0 - k_R2T_N1*cam_RT_AC_0); Transition_from_cam_TT_AC_0_to_cam_RT_AC_0 is "Transition from CaM_TT_ac_0 to CaM_RT_ac_0";
  Transition_from_cam_TT_AC_0_to_cam_TR_AC_0: cam_TT_AC_0 -> cam_TR_AC_0; cytosol*(k_T2R_C1*cam_TT_AC_0 - k_R2T_C1*cam_TR_AC_0); Transition_from_cam_TT_AC_0_to_cam_TR_AC_0 is "Transition from CaM_TT_ac_0 to CaM_TR_ac_0";
  Transition_from_cam_TT_AC_Ng_to_cam_RT_AC_Ng: cam_TT_AC_Ng -> cam_RT_AC_Ng; cytosol*(k_TT2RT_N1_Ng*cam_TT_AC_Ng - k_RT2TT_N1_Ng*cam_RT_AC_Ng); Transition_from_cam_TT_AC_Ng_to_cam_RT_AC_Ng is "Transition from CaM_TT_ac_Ng to CaM_RT_ac_Ng";
  Transition_from_cam_TT_AD_0_to_cam_RT_AD_0: cam_TT_AD_0 -> cam_RT_AD_0; cytosol*(k_T2R_N1*cam_TT_AD_0 - k_R2T_N1*cam_RT_AD_0); Transition_from_cam_TT_AD_0_to_cam_RT_AD_0 is "Transition from CaM_TT_ad_0 to CaM_RT_ad_0";
  Transition_from_cam_TT_AD_0_to_cam_TR_AD_0: cam_TT_AD_0 -> cam_TR_AD_0; cytosol*(k_T2R_C1*cam_TT_AD_0 - k_R2T_C1*cam_TR_AD_0); Transition_from_cam_TT_AD_0_to_cam_TR_AD_0 is "Transition from CaM_TT_ad_0 to CaM_TR_ad_0";
  Transition_from_cam_TT_AD_Ng_to_cam_RT_AD_Ng: cam_TT_AD_Ng -> cam_RT_AD_Ng; cytosol*(k_TT2RT_N1_Ng*cam_TT_AD_Ng - k_RT2TT_N1_Ng*cam_RT_AD_Ng); Transition_from_cam_TT_AD_Ng_to_cam_RT_AD_Ng is "Transition from CaM_TT_ad_Ng to CaM_RT_ad_Ng";
  Transition_from_cam_TT_BC_0_to_cam_RT_BC_0: cam_TT_BC_0 -> cam_RT_BC_0; cytosol*(k_T2R_N1*cam_TT_BC_0 - k_R2T_N1*cam_RT_BC_0); Transition_from_cam_TT_BC_0_to_cam_RT_BC_0 is "Transition from CaM_TT_bc_0 to CaM_RT_bc_0";
  Transition_from_cam_TT_BC_0_to_cam_TR_BC_0: cam_TT_BC_0 -> cam_TR_BC_0; cytosol*(k_T2R_C1*cam_TT_BC_0 - k_R2T_C1*cam_TR_BC_0); Transition_from_cam_TT_BC_0_to_cam_TR_BC_0 is "Transition from CaM_TT_bc_0 to CaM_TR_bc_0";
  Transition_from_cam_TT_BC_Ng_to_cam_RT_BC_Ng: cam_TT_BC_Ng -> cam_RT_BC_Ng; cytosol*(k_TT2RT_N1_Ng*cam_TT_BC_Ng - k_RT2TT_N1_Ng*cam_RT_BC_Ng); Transition_from_cam_TT_BC_Ng_to_cam_RT_BC_Ng is "Transition from CaM_TT_bc_Ng to CaM_RT_bc_Ng";
  Transition_from_cam_TT_BD_0_to_cam_RT_BD_0: cam_TT_BD_0 -> cam_RT_BD_0; cytosol*(k_T2R_N1*cam_TT_BD_0 - k_R2T_N1*cam_RT_BD_0); Transition_from_cam_TT_BD_0_to_cam_RT_BD_0 is "Transition from CaM_TT_bd_0 to CaM_RT_bd_0";
  Transition_from_cam_TT_BD_0_to_cam_TR_BD_0: cam_TT_BD_0 -> cam_TR_BD_0; cytosol*(k_T2R_C1*cam_TT_BD_0 - k_R2T_C1*cam_TR_BD_0); Transition_from_cam_TT_BD_0_to_cam_TR_BD_0 is "Transition from CaM_TT_bd_0 to CaM_TR_bd_0";
  Transition_from_cam_TT_BD_Ng_to_cam_RT_BD_Ng: cam_TT_BD_Ng -> cam_RT_BD_Ng; cytosol*(k_TT2RT_N1_Ng*cam_TT_BD_Ng - k_RT2TT_N1_Ng*cam_RT_BD_Ng); Transition_from_cam_TT_BD_Ng_to_cam_RT_BD_Ng is "Transition from CaM_TT_bd_Ng to CaM_RT_bd_Ng";
  Transition_from_cam_TT_CD_0_to_cam_RT_CD_0: cam_TT_CD_0 -> cam_RT_CD_0; cytosol*(k_T2R_N0*cam_TT_CD_0 - k_R2T_N0*cam_RT_CD_0); Transition_from_cam_TT_CD_0_to_cam_RT_CD_0 is "Transition from CaM_TT_cd_0 to CaM_RT_cd_0";
  Transition_from_cam_TT_CD_0_to_cam_TR_CD_0: cam_TT_CD_0 -> cam_TR_CD_0; cytosol*(k_T2R_C2*cam_TT_CD_0 - k_R2T_C2*cam_TR_CD_0); Transition_from_cam_TT_CD_0_to_cam_TR_CD_0 is "Transition from CaM_TT_cd_0 to CaM_TR_cd_0";
  Transition_from_cam_TT_CD_Ng_to_cam_RT_CD_Ng: cam_TT_CD_Ng -> cam_RT_CD_Ng; cytosol*(k_TT2RT_N0_Ng*cam_TT_CD_Ng - k_RT2TT_N0_Ng*cam_RT_CD_Ng); Transition_from_cam_TT_CD_Ng_to_cam_RT_CD_Ng is "Transition from CaM_TT_cd_Ng to CaM_RT_cd_Ng";
  Transition_from_cam_TT_ABC_0_to_cam_RT_ABC_0: cam_TT_ABC_0 -> cam_RT_ABC_0; cytosol*(k_T2R_N2*cam_TT_ABC_0 - k_R2T_N2*cam_RT_ABC_0); Transition_from_cam_TT_ABC_0_to_cam_RT_ABC_0 is "Transition from CaM_TT_abc_0 to CaM_RT_abc_0";
  Transition_from_cam_TT_ABC_0_to_cam_TR_ABC_0: cam_TT_ABC_0 -> cam_TR_ABC_0; cytosol*(k_T2R_C1*cam_TT_ABC_0 - k_R2T_C1*cam_TR_ABC_0); Transition_from_cam_TT_ABC_0_to_cam_TR_ABC_0 is "Transition from CaM_TT_abc_0 to CaM_TR_abc_0";
  Transition_from_cam_TT_ABC_Ng_to_cam_RT_ABC_Ng: cam_TT_ABC_Ng -> cam_RT_ABC_Ng; cytosol*(k_TT2RT_N2_Ng*cam_TT_ABC_Ng - k_RT2TT_N2_Ng*cam_RT_ABC_Ng); Transition_from_cam_TT_ABC_Ng_to_cam_RT_ABC_Ng is "Transition from CaM_TT_abc_Ng to CaM_RT_abc_Ng";
  Transition_from_cam_TT_ABD_0_to_cam_RT_ABD_0: cam_TT_ABD_0 -> cam_RT_ABD_0; cytosol*(k_T2R_N2*cam_TT_ABD_0 - k_R2T_N2*cam_RT_ABD_0); Transition_from_cam_TT_ABD_0_to_cam_RT_ABD_0 is "Transition from CaM_TT_abd_0 to CaM_RT_abd_0";
  Transition_from_cam_TT_ABD_0_to_cam_TR_ABD_0: cam_TT_ABD_0 -> cam_TR_ABD_0; cytosol*(k_T2R_C1*cam_TT_ABD_0 - k_R2T_C1*cam_TR_ABD_0); Transition_from_cam_TT_ABD_0_to_cam_TR_ABD_0 is "Transition from CaM_TT_abd_0 to CaM_TR_abd_0";
  Transition_from_cam_TT_ABD_Ng_to_cam_RT_ABD_Ng: cam_TT_ABD_Ng -> cam_RT_ABD_Ng; cytosol*(k_TT2RT_N2_Ng*cam_TT_ABD_Ng - k_RT2TT_N2_Ng*cam_RT_ABD_Ng); Transition_from_cam_TT_ABD_Ng_to_cam_RT_ABD_Ng is "Transition from CaM_TT_abd_Ng to CaM_RT_abd_Ng";
  Transition_from_cam_TT_ACD_0_to_cam_RT_ACD_0: cam_TT_ACD_0 -> cam_RT_ACD_0; cytosol*(k_T2R_N1*cam_TT_ACD_0 - k_R2T_N1*cam_RT_ACD_0); Transition_from_cam_TT_ACD_0_to_cam_RT_ACD_0 is "Transition from CaM_TT_acd_0 to CaM_RT_acd_0";
  Transition_from_cam_TT_ACD_0_to_cam_TR_ACD_0: cam_TT_ACD_0 -> cam_TR_ACD_0; cytosol*(k_T2R_C2*cam_TT_ACD_0 - k_R2T_C2*cam_TR_ACD_0); Transition_from_cam_TT_ACD_0_to_cam_TR_ACD_0 is "Transition from CaM_TT_acd_0 to CaM_TR_acd_0";
  Transition_from_cam_TT_ACD_Ng_to_cam_RT_ACD_Ng: cam_TT_ACD_Ng -> cam_RT_ACD_Ng; cytosol*(k_TT2RT_N1_Ng*cam_TT_ACD_Ng - k_RT2TT_N1_Ng*cam_RT_ACD_Ng); Transition_from_cam_TT_ACD_Ng_to_cam_RT_ACD_Ng is "Transition from CaM_TT_acd_Ng to CaM_RT_acd_Ng";
  Transition_from_cam_TT_BCD_0_to_cam_RT_BCD_0: cam_TT_BCD_0 -> cam_RT_BCD_0; cytosol*(k_T2R_N1*cam_TT_BCD_0 - k_R2T_N1*cam_RT_BCD_0); Transition_from_cam_TT_BCD_0_to_cam_RT_BCD_0 is "Transition from CaM_TT_bcd_0 to CaM_RT_bcd_0";
  Transition_from_cam_TT_BCD_0_to_cam_TR_BCD_0: cam_TT_BCD_0 -> cam_TR_BCD_0; cytosol*(k_T2R_C2*cam_TT_BCD_0 - k_R2T_C2*cam_TR_BCD_0); Transition_from_cam_TT_BCD_0_to_cam_TR_BCD_0 is "Transition from CaM_TT_bcd_0 to CaM_TR_bcd_0";
  Transition_from_cam_TT_BCD_Ng_to_cam_RT_BCD_Ng: cam_TT_BCD_Ng -> cam_RT_BCD_Ng; cytosol*(k_TT2RT_N1_Ng*cam_TT_BCD_Ng - k_RT2TT_N1_Ng*cam_RT_BCD_Ng); Transition_from_cam_TT_BCD_Ng_to_cam_RT_BCD_Ng is "Transition from CaM_TT_bcd_Ng to CaM_RT_bcd_Ng";
  Transition_from_cam_TT_ABCD_0_to_cam_RT_ABCD_0: cam_TT_ABCD_0 -> cam_RT_ABCD_0; cytosol*(k_T2R_N2*cam_TT_ABCD_0 - k_R2T_N2*cam_RT_ABCD_0); Transition_from_cam_TT_ABCD_0_to_cam_RT_ABCD_0 is "Transition from CaM_TT_abcd_0 to CaM_RT_abcd_0";
  Transition_from_cam_TT_ABCD_0_to_cam_TR_ABCD_0: cam_TT_ABCD_0 -> cam_TR_ABCD_0; cytosol*(k_T2R_C2*cam_TT_ABCD_0 - k_R2T_C2*cam_TR_ABCD_0); Transition_from_cam_TT_ABCD_0_to_cam_TR_ABCD_0 is "Transition from CaM_TT_abcd_0 to CaM_TR_abcd_0";
  Transition_from_cam_TT_ABCD_Ng_to_cam_RT_ABCD_Ng: cam_TT_ABCD_Ng -> cam_RT_ABCD_Ng; cytosol*(k_TT2RT_N2_Ng*cam_TT_ABCD_Ng - k_RT2TT_N2_Ng*cam_RT_ABCD_Ng); Transition_from_cam_TT_ABCD_Ng_to_cam_RT_ABCD_Ng is "Transition from CaM_TT_abcd_Ng to CaM_RT_abcd_Ng";
  Transition_from_cam_RR_0_CaMKII_to_cam_RR_0_CaMKIIp: cam_RR_0_CaMKII => cam_RR_0_CaMKIIp; cytosol*k_camkii_pho*cam_RR_0_CaMKII; Transition_from_cam_RR_0_CaMKII_to_cam_RR_0_CaMKIIp is "CaM_RR_0_CaMKII_phosphorylation";
  Transition_from_cam_RR_A_CaMKII_to_cam_RR_A_CaMKIIp: cam_RR_A_CaMKII => cam_RR_A_CaMKIIp; cytosol*k_camkii_pho*cam_RR_A_CaMKII; Transition_from_cam_RR_A_CaMKII_to_cam_RR_A_CaMKIIp is "CaM_RR_a_CaMKII_phosphorylation";
  Transition_from_cam_RR_B_CaMKII_to_cam_RR_B_CaMKIIp: cam_RR_B_CaMKII => cam_RR_B_CaMKIIp; cytosol*k_camkii_pho*cam_RR_B_CaMKII; Transition_from_cam_RR_B_CaMKII_to_cam_RR_B_CaMKIIp is "CaM_RR_b_CaMKII_phosphorylation";
  Transition_from_cam_RR_C_CaMKII_to_cam_RR_C_CaMKIIp: cam_RR_C_CaMKII => cam_RR_C_CaMKIIp; cytosol*k_camkii_pho*cam_RR_C_CaMKII; Transition_from_cam_RR_C_CaMKII_to_cam_RR_C_CaMKIIp is "CaM_RR_c_CaMKII_phosphorylation";
  Transition_from_cam_RR_D_CaMKII_to_cam_RR_D_CaMKIIp: cam_RR_D_CaMKII => cam_RR_D_CaMKIIp; cytosol*k_camkii_pho*cam_RR_D_CaMKII; Transition_from_cam_RR_D_CaMKII_to_cam_RR_D_CaMKIIp is "CaM_RR_d_CaMKII_phosphorylation";
  Transition_from_cam_RR_AB_CaMKII_to_cam_RR_AB_CaMKIIp: cam_RR_AB_CaMKII => cam_RR_AB_CaMKIIp; cytosol*k_camkii_pho*cam_RR_AB_CaMKII; Transition_from_cam_RR_AB_CaMKII_to_cam_RR_AB_CaMKIIp is "CaM_RR_ab_CaMKII_phosphorylation";
  Transition_from_cam_RR_AC_CaMKII_to_cam_RR_AC_CaMKIIp: cam_RR_AC_CaMKII => cam_RR_AC_CaMKIIp; cytosol*k_camkii_pho*cam_RR_AC_CaMKII; Transition_from_cam_RR_AC_CaMKII_to_cam_RR_AC_CaMKIIp is "CaM_RR_ac_CaMKII_phosphorylation";
  Transition_from_cam_RR_AD_CaMKII_to_cam_RR_AD_CaMKIIp: cam_RR_AD_CaMKII => cam_RR_AD_CaMKIIp; cytosol*k_camkii_pho*cam_RR_AD_CaMKII; Transition_from_cam_RR_AD_CaMKII_to_cam_RR_AD_CaMKIIp is "CaM_RR_ad_CaMKII_phosphorylation";
  Transition_from_cam_RR_BC_CaMKII_to_cam_RR_BC_CaMKIIp: cam_RR_BC_CaMKII => cam_RR_BC_CaMKIIp; cytosol*k_camkii_pho*cam_RR_BC_CaMKII; Transition_from_cam_RR_BC_CaMKII_to_cam_RR_BC_CaMKIIp is "CaM_RR_bc_CaMKII_phosphorylation";
  Transition_from_cam_RR_BD_CaMKII_to_cam_RR_BD_CaMKIIp: cam_RR_BD_CaMKII => cam_RR_BD_CaMKIIp; cytosol*k_camkii_pho*cam_RR_BD_CaMKII; Transition_from_cam_RR_BD_CaMKII_to_cam_RR_BD_CaMKIIp is "CaM_RR_bd_CaMKII_phosphorylation";
  Transition_from_cam_RR_CD_CaMKII_to_cam_RR_CD_CaMKIIp: cam_RR_CD_CaMKII => cam_RR_CD_CaMKIIp; cytosol*k_camkii_pho*cam_RR_CD_CaMKII; Transition_from_cam_RR_CD_CaMKII_to_cam_RR_CD_CaMKIIp is "CaM_RR_cd_CaMKII_phosphorylation";
  Transition_from_cam_RR_ABC_CaMKII_to_cam_RR_ABC_CaMKIIp: cam_RR_ABC_CaMKII => cam_RR_ABC_CaMKIIp; cytosol*k_camkii_pho*cam_RR_ABC_CaMKII; Transition_from_cam_RR_ABC_CaMKII_to_cam_RR_ABC_CaMKIIp is "CaM_RR_abc_CaMKII_phosphorylation";
  Transition_from_cam_RR_ABD_CaMKII_to_cam_RR_ABD_CaMKIIp: cam_RR_ABD_CaMKII => cam_RR_ABD_CaMKIIp; cytosol*k_camkii_pho*cam_RR_ABD_CaMKII; Transition_from_cam_RR_ABD_CaMKII_to_cam_RR_ABD_CaMKIIp is "CaM_RR_abd_CaMKII_phosphorylation";
  Transition_from_cam_RR_ACD_CaMKII_to_cam_RR_ACD_CaMKIIp: cam_RR_ACD_CaMKII => cam_RR_ACD_CaMKIIp; cytosol*k_camkii_pho*cam_RR_ACD_CaMKII; Transition_from_cam_RR_ACD_CaMKII_to_cam_RR_ACD_CaMKIIp is "CaM_RR_acd_CaMKII_phosphorylation";
  Transition_from_cam_RR_BCD_CaMKII_to_cam_RR_BCD_CaMKIIp: cam_RR_BCD_CaMKII => cam_RR_BCD_CaMKIIp; cytosol*k_camkii_pho*cam_RR_BCD_CaMKII; Transition_from_cam_RR_BCD_CaMKII_to_cam_RR_BCD_CaMKIIp is "CaM_RR_bcd_CaMKII_phosphorylation";
  Transition_from_cam_RR_ABCD_CaMKII_to_cam_RR_ABCD_CaMKIIp: cam_RR_ABCD_CaMKII => cam_RR_ABCD_CaMKIIp; cytosol*k_camkii_pho*cam_RR_ABCD_CaMKII; Transition_from_cam_RR_ABCD_CaMKII_to_cam_RR_ABCD_CaMKIIp is "CaM_RR_abcd_CaMKII_phosphorylation";
  Ca_leak: => ca; cytosol*Constant_flux_irreversible(v);
    v = 3.85e-6;
  Ca_binding_to_CaNCa2: ca + PP2BiCa2 -> CaNCa3; cytosol*(kon_CaN_Ca*ca*PP2BiCa2 - koff_CaN_Ca2_Ca*CaNCa3);
  Ca_binding_to_CaNCa3: ca + CaNCa3 -> PP2BCa2; cytosol*(kon_CaN_Ca*ca*CaNCa3 - koff_CaN_Ca3_Ca*PP2BCa2);
  Ca_pump: ca => ; cytosol*function_2(ca, Km, V);
    Km = 2e-6; V = 0.0001;
  Ca_single_spike: => ca; cytosol*Constant_flux_irreversible(k_spike_SS);
  CaMKIIp_dephosphorylation: CaMKIIp => CaMKII; cytosol*Henri_Michaelis_Menten_withGlobalEnzyme__irreversible(cam_PP2BCa2_tot, kcat_PP2B_CaMKII, CaMKIIp, Km_PP2B_CaMKII);
  cam_RR_0_CaMKIIp_dephosphorylation: cam_RR_0_CaMKIIp => cam_RR_0_CaMKII; cytosol*Henri_Michaelis_Menten_withGlobalEnzyme__irreversible(cam_PP2BCa2_tot, kcat_PP2B_CaMKII, cam_RR_0_CaMKIIp, Km_PP2B_CaMKII); cam_RR_0_CaMKIIp_dephosphorylation is "CaM_RR_0_CaMKIIp_dephosphorylation";
  cam_RR_A_CaMKIIp_dephosphorylation: cam_RR_A_CaMKIIp => cam_RR_A_CaMKII; cytosol*Henri_Michaelis_Menten_withGlobalEnzyme__irreversible(cam_PP2BCa2_tot, kcat_PP2B_CaMKII, cam_RR_A_CaMKIIp, Km_PP2B_CaMKII); cam_RR_A_CaMKIIp_dephosphorylation is "CaM_RR_a_CaMKIIp_dephosphorylation";
  cam_RR_AB_CaMKIIp_dephosphorylation: cam_RR_AB_CaMKIIp => cam_RR_AB_CaMKII; cytosol*Henri_Michaelis_Menten_withGlobalEnzyme__irreversible(cam_PP2BCa2_tot, kcat_PP2B_CaMKII, cam_RR_AB_CaMKIIp, Km_PP2B_CaMKII); cam_RR_AB_CaMKIIp_dephosphorylation is "CaM_RR_ab_CaMKIIp_dephosphorylation";
  cam_RR_ABC_CaMKIIp_dephosphorylation: cam_RR_ABC_CaMKIIp => cam_RR_ABC_CaMKII; cytosol*Henri_Michaelis_Menten_withGlobalEnzyme__irreversible(cam_PP2BCa2_tot, kcat_PP2B_CaMKII, cam_RR_ABC_CaMKIIp, Km_PP2B_CaMKII); cam_RR_ABC_CaMKIIp_dephosphorylation is "CaM_RR_abc_CaMKIIp_dephosphorylation";
  cam_RR_ABCD_CaMKIIp_dephosphorylation: cam_RR_ABCD_CaMKIIp => cam_RR_ABCD_CaMKII; cytosol*Henri_Michaelis_Menten_withGlobalEnzyme__irreversible(cam_PP2BCa2_tot, kcat_PP2B_CaMKII, cam_RR_ABCD_CaMKIIp, Km_PP2B_CaMKII); cam_RR_ABCD_CaMKIIp_dephosphorylation is "CaM_RR_abcd_CaMKIIp_dephosphorylation";
  cam_RR_ABD_CaMKIIp_dephosphorylation: cam_RR_ABD_CaMKIIp => cam_RR_ABD_CaMKII; cytosol*Henri_Michaelis_Menten_withGlobalEnzyme__irreversible(cam_PP2BCa2_tot, kcat_PP2B_CaMKII, cam_RR_ABD_CaMKIIp, Km_PP2B_CaMKII); cam_RR_ABD_CaMKIIp_dephosphorylation is "CaM_RR_abd_CaMKIIp_dephosphorylation";
  cam_RR_AC_CaMKIIp_dephosphorylation: cam_RR_AC_CaMKIIp => cam_RR_AC_CaMKII; cytosol*Henri_Michaelis_Menten_withGlobalEnzyme__irreversible(cam_PP2BCa2_tot, kcat_PP2B_CaMKII, cam_RR_AC_CaMKIIp, Km_PP2B_CaMKII); cam_RR_AC_CaMKIIp_dephosphorylation is "CaM_RR_ac_CaMKIIp_dephosphorylation";
  cam_RR_ACD_CaMKIIp_dephosphorylation: cam_RR_ACD_CaMKIIp => cam_RR_ACD_CaMKII; cytosol*Henri_Michaelis_Menten_withGlobalEnzyme__irreversible(cam_PP2BCa2_tot, kcat_PP2B_CaMKII, cam_RR_ACD_CaMKIIp, Km_PP2B_CaMKII); cam_RR_ACD_CaMKIIp_dephosphorylation is "CaM_RR_acd_CaMKIIp_dephosphorylation";
  cam_RR_AD_CaMKIIp_dephosphorylation: cam_RR_AD_CaMKIIp => cam_RR_AD_CaMKII; cytosol*Henri_Michaelis_Menten_withGlobalEnzyme__irreversible(cam_PP2BCa2_tot, kcat_PP2B_CaMKII, cam_RR_AD_CaMKIIp, Km_PP2B_CaMKII); cam_RR_AD_CaMKIIp_dephosphorylation is "CaM_RR_ad_CaMKIIp_dephosphorylation";
  cam_RR_B_CaMKIIp_dephosphorylation: cam_RR_B_CaMKIIp => cam_RR_B_CaMKII; cytosol*Henri_Michaelis_Menten_withGlobalEnzyme__irreversible(cam_PP2BCa2_tot, kcat_PP2B_CaMKII, cam_RR_B_CaMKIIp, Km_PP2B_CaMKII); cam_RR_B_CaMKIIp_dephosphorylation is "CaM_RR_b_CaMKIIp_dephosphorylation";
  cam_RR_BC_CaMKIIp_dephosphorylation: cam_RR_BC_CaMKIIp => cam_RR_BC_CaMKII; cytosol*Henri_Michaelis_Menten_withGlobalEnzyme__irreversible(cam_PP2BCa2_tot, kcat_PP2B_CaMKII, cam_RR_BC_CaMKIIp, Km_PP2B_CaMKII); cam_RR_BC_CaMKIIp_dephosphorylation is "CaM_RR_bc_CaMKIIp_dephosphorylation";
  cam_RR_BCD_CaMKIIp_dephosphorylation: cam_RR_BCD_CaMKIIp => cam_RR_BCD_CaMKII; cytosol*Henri_Michaelis_Menten_withGlobalEnzyme__irreversible(cam_PP2BCa2_tot, kcat_PP2B_CaMKII, cam_RR_BCD_CaMKIIp, Km_PP2B_CaMKII); cam_RR_BCD_CaMKIIp_dephosphorylation is "CaM_RR_bcd_CaMKIIp_dephosphorylation";
  cam_RR_C_CaMKIIp_dephosphorylation: cam_RR_C_CaMKIIp => cam_RR_C_CaMKII; cytosol*Henri_Michaelis_Menten_withGlobalEnzyme__irreversible(cam_PP2BCa2_tot, kcat_PP2B_CaMKII, cam_RR_C_CaMKIIp, Km_PP2B_CaMKII); cam_RR_C_CaMKIIp_dephosphorylation is "CaM_RR_c_CaMKIIp_dephosphorylation";
  cam_RR_CD_CaMKIIp_dephosphorylation: cam_RR_CD_CaMKIIp => cam_RR_CD_CaMKII; cytosol*Henri_Michaelis_Menten_withGlobalEnzyme__irreversible(cam_PP2BCa2_tot, kcat_PP2B_CaMKII, cam_RR_CD_CaMKIIp, Km_PP2B_CaMKII); cam_RR_CD_CaMKIIp_dephosphorylation is "CaM_RR_cd_CaMKIIp_dephosphorylation";
  cam_RR_D_CaMKIIp_dephosphorylation: cam_RR_D_CaMKIIp => cam_RR_D_CaMKII; cytosol*Henri_Michaelis_Menten_withGlobalEnzyme__irreversible(cam_PP2BCa2_tot, kcat_PP2B_CaMKII, cam_RR_D_CaMKIIp, Km_PP2B_CaMKII); cam_RR_D_CaMKIIp_dephosphorylation is "CaM_RR_d_CaMKIIp_dephosphorylation";
  cam_RR_BD_CaMKIIp_dephosphorylation: cam_RR_BD_CaMKIIp => cam_RR_BD_CaMKII; cytosol*Henri_Michaelis_Menten_withGlobalEnzyme__irreversible(cam_PP2BCa2_tot, kcat_PP2B_CaMKII, cam_RR_BD_CaMKIIp, Km_PP2B_CaMKII); cam_RR_BD_CaMKIIp_dephosphorylation is "CaM_RR_bd_CaMKIIp_dephosphorylation";
  ca_binding_to_PP2Bi: PP2Bi + ca -> PP2BiCa1; cytosol*(kon_CaN_Ca*PP2Bi*ca - koff_CaNBi_1*PP2BiCa1); ca_binding_to_PP2Bi is "Ca binding to CaN";
  ca_binding_to_PP2BiCa1: PP2BiCa1 + ca -> PP2BiCa2; cytosol*(kon_CaN_Ca*PP2BiCa1*ca - koff_CaNBi_2*PP2BiCa2); ca_binding_to_PP2BiCa1 is "Ca binding to CaNCa";

  // Events:
  Ca_spike_on: at (spikeOn == 1), fromTrigger=false: k_spike_SS = spikeInput, startTime = time;
  Ca_spike_off: at ((spikeOn == 1) && (time == startTime + spikeInputDuration)), fromTrigger=false: spikeOn = 0, startTime = 0, k_spike_SS = 0;
  Ca_spikes: at (((Initial_for_spikeNumber != 0) && (time == TIME_SPIKE + spikeCounter/spikeFrequency)) && (time < TIME_SPIKE + spikeNumber/spikeFrequency)), fromTrigger=false: spikeOn = 1, spikeCounter = spikeCounter + 1;

  // Unit definitions:
  unit length = metre;
  unit area = metre^2;
  unit volume = litre;
  unit time = second;
  unit substance = mole;
end
