// SBML level 3 version 1

function max(x, y)
  piecewise(x, x > y, y);
end
max is "minimum";

function min(x, y)
  piecewise(x, x < y, y);
end
min is "maximum";

function heav(x)
  piecewise(0, x < 0, 0.5, x == 0, 1, x > 0, 0);
end
heav is "heavyside";

function mod(x, y)
  piecewise(x - y*ceil(x/y), xor(x < 0, y < 0), x - y*floor(x/y));
end
mod is "modulo";

model G_rard_2019_Coupling_the_cell_cycle_and_the_cell_transformation_networks_SBML_()
  // Model for the Let-7-mediated coupling between the CDK network driving the cell cycle and the malignant cell transformation network. The model is based on the cell cycle model by Gérard and Goldbeter (Interface Focus 1, 24-35, 2011) and on a model for the epigenetic switch linking inflammation to cell transformation by Gérard et al (PLoS Comput. Biol. 10:e1003455, 2014).

  // Parameters:
  NFKB = 0.00045; NFKB is "NFKB = 0.00045";
  LIN28 = 0.34; LIN28 is "LIN28 = 0.34";
  let7 = 40; let7 is "let7 = 40";
  mIL6 = 0.0003; mIL6 is "mIL6 = 0.0003";
  IL6 = 0.001; IL6 is "IL6 = 0.001";
  mRas = 1e-5; mRas is "mRas = 0.00001";
  Ras = 0.0001; Ras is "Ras = 0.0001";
  STAT3 = 0.0001; STAT3 is "STAT3 = 0.0001";
  miR21 = 0.0003; miR21 is "miR21 = 0.0003";
  mPTEN = 0.01; mPTEN is "mPTEN = 0.01";
  PTEN = 0.17; PTEN is "PTEN = 0.17";
  Src = 0.01; Src is "Src = 0.01";
  ks1let7 = 10; ks1let7 is "ks1let7 = 10";
  Kilet7 = 0.1; Kilet7 is "Kilet7 = 0.1";
  kdlet7 = 0.05; kdlet7 is "kdlet7 = 0.05";
  kaa1nfkb = 10; kaa1nfkb is "kaa1nfkb = 10";
  kaa2nfkb = 0.09; kaa2nfkb is "kaa2nfkb = 0.09";
  kaa3nfkb = 1; kaa3nfkb is "kaa3nfkb = 1";
  Kanfkb = 0.01; Kanfkb is "Kanfkb = 0.01";
  Kinfkb = 0.02; Kinfkb is "Kinfkb = 0.02";
  kdnfkb = 0.01; kdnfkb is "kdnfkb = 0.01";
  NFKBtot = 1; NFKBtot is "NFKBtot = 1";
  Kasrc = 2; Kasrc is "Kasrc = 2";
  Ka1il6 = 10; Ka1il6 is "Ka1il6 = 10";
  Ka2il6 = 40; Ka2il6 is "Ka2il6 = 40";
  Karas = 10; Karas is "Karas = 10";
  Kipten = 5; Kipten is "Kipten = 5";
  Vslin28 = 0.1; Vslin28 is "Vslin28 = 0.1";
  kdlin28 = 0.015; kdlin28 is "kdlin28 = 0.015";
  Ka1nfkb = 0.01; Ka1nfkb is "Ka1nfkb = 0.01";
  k9 = 10; k9 is "k9 = 10";
  k10 = 0.01; k10 is "k10 = 0.01";
  Vs1mil6 = 0.12; Vs1mil6 is "Vs1mil6 = 0.12";
  Vs2mil6 = 0.01; Vs2mil6 is "Vs2mil6 = 0.01";
  kdmil6 = 0.01; kdmil6 is "kdmil6 = 0.01";
  kdillet = 0.5; kdillet is "kdillet = 0.5";
  Ka2nfkb = 5; Ka2nfkb is "Ka2nfkb = 5";
  ks1il6 = 1.5; ks1il6 is "ks1il6 = 1.5";
  kdil6 = 0.4; kdil6 is "kdil6 = 0.4";
  Vs1mras = 0.006; Vs1mras is "Vs1mras = 0.006";
  k11 = 10; k11 is "k11 = 10";
  k12 = 0.01; k12 is "k12 = 0.01";
  kdmras = 0.01; kdmras is "kdmras = 0.01";
  kdraslet = 0.5; kdraslet is "kdraslet = 0.5";
  ks1ras = 0.25; ks1ras is "ks1ras = 0.25";
  kdras = 0.03; kdras is "kdras = 0.03";
  Vsstat = 0.15; Vsstat is "Vsstat = 0.15";
  kdstat = 0.03; kdstat is "kdstat = 0.03";
  Vsmir21 = 4; Vsmir21 is "Vsmir21 = 4";
  Kastat = 5; Kastat is "Kastat = 5";
  k13 = 10; k13 is "k13 = 10";
  k14 = 0.01; k14 is "k14 = 0.01";
  k15 = 10; k15 is "k15 = 10";
  k16 = 0.01; k16 is "k16 = 0.01";
  kdmir21 = 0.2; kdmir21 is "kdmir21 = 0.2";
  Vsmpten = 0.001; Vsmpten is "Vsmpten = 0.001";
  kdmpten = 0.1; kdmpten is "kdmpten = 0.1";
  kdmiRmp = 0.1; kdmiRmp is "kdmiRmp = 0.1";
  kspten = 0.9; kspten is "kspten = 0.9";
  kdpten = 0.05; kdpten is "kdpten = 0.05";
  Md = 0.01; Md is "Md = 0.01";
  E2F = 0.01; E2F is "E2F = 0.01";
  Me = 0.01; Me is "Me = 0.01";
  Ma = 0.01; Ma is "Ma = 0.01";
  Mb = 0.01; Mb is "Mb = 0.01";
  APC = 0.01; APC is "APC = 0.01";
  deg = 0; deg is "deg = 0";
  vsmcyc = 1.5; vsmcyc is "vsmcyc = 1.5";
  GF = 1; GF is "GF = 1";
  ksmmd = 0.03; ksmmd is "ksmmd = 0.03";
  kdmmd = 0.2; kdmmd is "kdmmd = 0.2";
  ksd = 0.5; ksd is "ksd = 0.5";
  Kgf = 0.1; Kgf is "Kgf = 0.1";
  kdmd = 0.5; kdmd is "kdmd = 0.5";
  k1e2f = 2.3; k1e2f is "k1e2f = 2.3";
  Kae2f = 0.01; Kae2f is "Kae2f = 0.01";
  k2e2f = 2.5; k2e2f is "k2e2f = 2.5";
  Kie2f = 0.01; Kie2f is "Kie2f = 0.01";
  E2Ftot = 4; E2Ftot is "E2Ftot = 4";
  ksmme = 0.035; ksmme is "ksmme = 0.035";
  kdmme = 0.08; kdmme is "kdmme = 0.08";
  kse = 0.8; kse is "kse = 0.8";
  kdme = 0.2; kdme is "kdme = 0.2";
  kdme2 = 0.1; kdme2 is "kdme2 = 0.1";
  Kde = 0.08; Kde is "Kde = 0.08";
  ksmma = 0.07; ksmma is "ksmma = 0.07";
  kdmma = 0.08; kdmma is "kdmma = 0.08";
  ksa = 0.4; ksa is "ksa = 0.4";
  kdma = 0.35; kdma is "kdma = 0.35";
  kdma2 = 0.05; kdma2 is "kdma2 = 0.05";
  Kda = 0.01; Kda is "Kda = 0.01";
  vsmmb = 0.06; vsmmb is "vsmmb = 0.06";
  kdmmb = 0.08; kdmmb is "kdmmb = 0.08";
  vsb = 0.35; vsb is "vsb = 0.35";
  kdmb = 0.2; kdmb is "kdmb = 0.2";
  kdmb2 = 0.7; kdmb2 is "kdmb2 = 0.7";
  Kdb = 0.01; Kdb is "Kdb = 0.01";
  k1apc = 1; k1apc is "k1apc = 1";
  Kaapc = 2; Kaapc is "Kaapc = 2";
  V2apc = 0.3; V2apc is "V2apc = 0.3";
  Kiapc = 10; Kiapc is "Kiapc = 10";
  APCtot = 2; APCtot is "APCtot = 2";
  k1 = 1; k1 is "k1 = 1";
  k2 = 0.01; k2 is "k2 = 0.01";
  k3 = 1; k3 is "k3 = 1";
  k4 = 0.01; k4 is "k4 = 0.01";
  k5 = 1; k5 is "k5 = 1";
  k6 = 0.01; k6 is "k6 = 0.01";
  k7 = 1; k7 is "k7 = 1";
  k8 = 0.01; k8 is "k8 = 0.01";
  kdmMdlet7 = 1; kdmMdlet7 is "kdmMdlet7 = 1";
  kdmMelet7 = 1; kdmMelet7 is "kdmMelet7 = 1";
  kdmMalet7 = 1; kdmMalet7 is "kdmMalet7 = 1";
  kdmMblet7 = 1; kdmMblet7 is "kdmMblet7 = 1";
  mIL6let7 = 0 dimensionless;
  mRaslet7 = 0 dimensionless;
  miRmpten = 0 dimensionless;
  mMd = 0 dimensionless;
  mMdlet7 = 0 dimensionless;
  mMe = 0 dimensionless;
  mMelet7 = 0 dimensionless;
  mMa = 0 dimensionless;
  mMalet7 = 0 dimensionless;
  mMb = 0 dimensionless;
  mMblet7 = 0 dimensionless;
  NFKBi has dimensionless;
  Let7TOT has dimensionless;
  t has dimensionless; t is "model time";

  // Assignment rules:
  NFKBi := NFKBtot - NFKB;
  Let7TOT := let7 + mMdlet7 + mMelet7 + mMalet7 + mMblet7 + mIL6let7 + mRaslet7;
  t := time;

  // Rate rules:
  NFKB' = (kaa1nfkb*Src + kaa2nfkb*IL6 + kaa3nfkb*Ras)*(Kipten/(Kipten + PTEN))*(NFKBi/(Kanfkb + NFKBi)) - kdnfkb*(NFKB/(Kinfkb + NFKB));
  LIN28' = Vslin28*(NFKB/(Ka1nfkb + NFKB)) - kdlin28*LIN28;
  let7' = ks1let7*(Kilet7/(Kilet7 + LIN28)) - k9*mIL6*let7 + k10*mIL6let7 - k11*mRas*let7 + k12*mRaslet7 - k1*mMd*let7 + k2*mMdlet7 - k3*mMe*let7 + k4*mMelet7 - k5*mMa*let7 + k6*mMalet7 - k7*mMb*let7 + k8*mMblet7 + deg*(kdmMdlet7*mMdlet7 + kdmMelet7*mMelet7 + kdmMalet7*mMalet7 + kdmMblet7*mMblet7 + kdraslet*mRaslet7 + kdillet*mIL6let7) - kdlet7*let7;
  mIL6' = Vs1mil6 + Vs2mil6*(NFKB/(Ka2nfkb + NFKB)) - k9*mIL6*let7 + k10*mIL6let7 - kdmil6*mIL6;
  mIL6let7' = k9*mIL6*let7 - k10*mIL6let7 - kdillet*mIL6let7;
  IL6' = ks1il6*mIL6 - kdil6*IL6;
  mRas' = Vs1mras - k11*mRas*let7 + k12*mRaslet7 - kdmras*mRas;
  mRaslet7' = k11*mRas*let7 - k12*mRaslet7 - kdraslet*mRaslet7;
  Ras' = ks1ras*mRas - kdras*Ras;
  STAT3' = Vsstat*(IL6/(Ka2il6 + IL6)) - kdstat*STAT3;
  miR21' = Vsmir21*(STAT3/(Kastat + STAT3)) - k13*mPTEN*miR21 + k14*miRmpten + deg*kdmiRmp*miRmpten - kdmir21*miR21;
  mPTEN' = Vsmpten - k13*mPTEN*miR21 + k14*miRmpten - kdmpten*mPTEN;
  miRmpten' = k13*mPTEN*miR21 - k14*miRmpten - kdmiRmp*miRmpten;
  PTEN' = kspten*mPTEN - kdpten*PTEN;
  mMd' = vsmcyc*ksmmd*GF - k1*mMd*let7 + k2*mMdlet7 - kdmmd*mMd;
  Md' = ksd*mMd - kdmd*Md;
  mMdlet7' = k1*mMd*let7 - k2*mMdlet7 - kdmMdlet7*mMdlet7;
  E2F' = k1e2f*((E2Ftot - E2F)/(E2Ftot - E2F + Kae2f))*(Md + Me) - k2e2f*(E2F/(E2F + Kie2f))*Ma;
  mMe' = vsmcyc*ksmme*E2F - k3*mMe*let7 + k4*mMelet7 - kdmme*mMe;
  Me' = kse*mMe - kdme*Ma*(Me/(Me + Kde)) - kdme2*Me;
  mMelet7' = k3*mMe*let7 - k4*mMelet7 - kdmMelet7*mMelet7;
  mMa' = vsmcyc*ksmma*E2F - k5*mMa*let7 + k6*mMalet7 - kdmma*mMa;
  Ma' = ksa*mMa - kdma*APC*(Ma/(Ma + Kda)) - kdma2*Ma;
  mMalet7' = k5*mMa*let7 - k6*mMalet7 - kdmMalet7*mMalet7;
  mMb' = vsmcyc*vsmmb - k7*mMb*let7 + k8*mMblet7 - kdmmb*mMb;
  Mb' = vsb*mMb*Ma - kdmb*APC*(Mb/(Mb + Kdb)) - kdmb2*Mb;
  mMblet7' = k7*mMb*let7 - k8*mMblet7 - kdmMblet7*mMblet7;
  APC' = k1apc*Mb*((APCtot - APC)/(APCtot - APC + Kaapc)) - V2apc*(APC/(APC + Kiapc));
end
