// SBML level 2 version 4
// dcterms:bibliographicCitation: urn:miriam:pubmed:31590677

function Function_for_APC_Activation(alpha_im, M_el, b)
  alpha_im*M_el/(M_el + b);
end

function Function_for_TCD8_Activation_Pembrolizumab(a_pem, alpha_eff, A_pc)
  a_pem*alpha_eff*A_pc;
end

function Function_for_Tumor_Cell_Death_TCD8(nu_mel, T_il, M_el, g)
  nu_mel*T_il*M_el/(M_el + g);
end

function Function_for_TCD8_Exhaustion_Pembrolizumab(b_pem, mu_eff, T_il)
  b_pem*mu_eff*T_il;
end

function Function_for_Tumor_Cell_Growth(gamma_mel, M_el)
  gamma_mel*M_el;
end

model Tsur2019___Predicting_response_to_pembrolizumab_in_metastatic_melanoma_by_a_new_personalization_algorithm()
  // Tsur2019 - Predicting response to pembrolizumab in metastatic melanoma by a new personalization algorithm
  // This is a simple mathematical model describing the interactions of an advanced melanoma tumor with both the immune system and the immunotherapy drug, pembrolizumab.
  // hasProperty ncit:C143250
  // hasProperty mamo:MAMO_0000046
  // hasProperty ncit:C15262
  // hasProperty PR:000001919
  // hasProperty ncit:C106432
  // isDescribedBy pubmed:31590677

  // Compartments:
  compartment compartment = 1;

  // Species:
  species A_pc in compartment = 1;
  species T_il in compartment = 1;
  species M_el in compartment = 50;

  // Parameters:
  alpha_im = 1161;
  b = 37040;
  mu_APC = 0.231;
  a_pem = 5005;
  alpha_eff = 0.8318;
  b_pem = 0.9;
  mu_eff = 0.1777;
  gamma_mel = 0.003269;
  nu_mel = 0.1245;
  g = 20190000;

  // Reactions:
  APC_Activation: => A_pc; compartment*Function_for_APC_Activation(alpha_im, M_el, b);  // modifiers: M_el
  APC_Death: A_pc => ; compartment*mu_APC*A_pc;
  TCD8_Activation_Pembrolizumab: => T_il; compartment*Function_for_TCD8_Activation_Pembrolizumab(a_pem, alpha_eff, A_pc);  // modifiers: A_pc
  TCD8_Exhaustion_Pembrolizumab: T_il => ; compartment*Function_for_TCD8_Exhaustion_Pembrolizumab(b_pem, mu_eff, T_il);
  Tumor_Cell_Growth: => M_el; compartment*Function_for_Tumor_Cell_Growth(gamma_mel, M_el);
  Tumor_Cell_Death_TCD8: M_el => ; compartment*Function_for_Tumor_Cell_Death_TCD8(nu_mel, T_il, M_el, g);  // modifiers: T_il

  // Unit definitions:
  unit volume = 1e-3 litre;
  unit time = 86400 second;
  unit substance = 1e-3 mole;
end
