// SBML level 2 version 4
// dcterms:bibliographicCitation: urn:miriam:doi:10.3389/fimmu.2015.00484

function Constant_flux__irreversible(v)
  v;
end
Constant_flux__irreversible is "Constant flux (irreversible)";

function Function_for_TP_Gain_IG(alpha, ktpig, T0, I, G, TA, binf)
  alpha*ktpig*T0*I*G/(1 + (TA/binf)^2);
end

function Function_for_I_Gain(sir, R, muir)
  sir*R/(muir + R);
end

function Function_for_D_Gain(kdi, fx)
  kdi*fx;
end

function Function_for_A_Gain_TA(kata, TA)
  kata*TA;
end

function Function_for_DG_Gain_MTC(alpha, kdgtp, G, fx_T)
  alpha*kdgtp*G*fx_T;
end

function Function_for_TA_Gain_I(ktaia, T0, I, A)
  ktaia*T0*I*A;
end

function Function_for_TA_Gain_TAG(alpha, ktat0g, T0, G, TA)
  alpha*ktat0g*T0*G*TA/(1 + TA);
end

function Function_for_TP_Gain_I(ktpi, T0, I, TA, binf)
  ktpi*T0*I/(1 + (TA/binf)^2);
end

function Function_for_TP_Gain_TPG(alpha, ktpt0g, T0, TP, G, TA, binf)
  alpha*ktpt0g*T0*TP*G/(1 + (TA/binf)^2);
end

function Function_for_A_Gain(kai, I, kaid, D, A, ainf)
  kai*((I + kaid*D)/(1 + (A/ainf)^2))/(1 + (I + kaid*D)/(1 + (A/ainf)^2));
end

function Function_for_DG_Gain(kdgig, G, fx)
  kdgig*G*fx;
end

model Day2015___Early_cellular_innate_and_adaptive_immune_responses_to_ischemia_reperfusion_injury_and_solid_organ_allotransplantation()
  // Day2015 - Early cellular innate and adaptive immune responses to ischemia/reperfusion injury and solid organ allotransplantation
  // This is an ordinary differential equation model of the early inflammatory response during transplantion. Descriptions are included of the inflammatory events associated with the initial surgical procedure, the subsequent ischemia/reperfusion (I/R) events that cause tissue damage to the host as well as the donor graft, and the inflammatory effects of T cells.
  // hasProperty ncit:C17215
  // hasProperty ncit:C97128
  // hasProperty ncit:C75570
  // hasProperty mamo:MAMO_0000046
  // hasProperty GO:0006955
  // isDescribedBy doi:10.3389/fimmu.2015.00484

  // Compartments:
  compartment compartment = 1;

  // Species:
  species D in compartment = 4;
  species DG in compartment = 0;
  species I in compartment = 0;
  species A in compartment = 0.125;
  species TP in compartment = 0;
  species TA in compartment = 0;

  // Parameters:
  kii = 0.01;
  Sir = 0.08;
  muir = 0.12;
  muI = 0.05;
  kid = 0.02;
  kitp = 0.008;
  kdi = 0.35;
  xdi = 0.06;
  kdgig = 0.35;
  mud = 0.02;
  alpha = 1;
  kdgtp = 0.7;
  xdgtp = 1;
  kgdg = 10;
  xgdg = 0.5;
  Sa = 0.0125;
  kai = 0.04;
  kaid = 48;
  mua = 0.1;
  kata = 0.001;
  St0 = 1;
  mut0 = 0.05;
  ktpi = 0.008;
  ktpig = 0.02;
  ktpt0g = 0.02;
  mutp = 0.03;
  ktaia = 0.04;
  ktat0g = 0.001;
  muta = 0.03;
  binf = 0.5;
  ainf = 0.28;
  G_IO = 0;

  // Assignment rules:
  fx_x_A := I/(1 + (A/ainf)^2);
  G := G_IO*(1 - (1 - exp(-DG/xgdg))/(1 - kgdg*exp(-DG/xgdg)));
  fx_x_T := TP/(1 + (TA/binf)^2);
  fx_T := fx_x_T^6/(fx_x_T^6 + xdgtp^6);
  fx_A := fx_x_A^6/(fx_x_A^6 + xdi^6);
  R := (kid*(D + DG) + kii*I + kitp*TP)/(1 + (A/ainf)^2);
  T0 := St0*(1 + TA)/(alpha*ktat0g*TA*G + (mut0 + ktpi*I + alpha*ktpig*G*I + ktaia*A*I + alpha*ktpt0g*TP*G)*(1 + TA));

  // Reactions:
  I_Gain: => I; compartment*Function_for_I_Gain(Sir, R, muir);
  I_Decay: I => ; compartment*muI*I;
  D_Gain: => D; compartment*Function_for_D_Gain(kdi, fx_A);
  D_Decay: D => ; compartment*mud*D;
  DG_Decay: DG => ; compartment*mud*DG;
  DG_Gain: => DG; compartment*Function_for_DG_Gain(kdgig, G, fx_A);
  DG_Gain_MTC: => DG; compartment*Function_for_DG_Gain_MTC(alpha, kdgtp, G, fx_T);
  A_Decay: A => ; compartment*mua*A;
  A_Gain_Source: => A; compartment*Constant_flux__irreversible(Sa);
  A_Gain: => A; compartment*Function_for_A_Gain(kai, I, kaid, D, A, ainf);  // modifiers: I, D
  A_Gain_TA: => A; compartment*Function_for_A_Gain_TA(kata, TA);  // modifiers: TA
  TP_Gain_I: => TP; compartment*Function_for_TP_Gain_I(ktpi, T0, I, TA, binf);  // modifiers: I, TA
  TP_Gain_IG: => TP; compartment*Function_for_TP_Gain_IG(alpha, ktpig, T0, I, G, TA, binf);  // modifiers: I, TA
  TP_Gain_TPG: => TP; compartment*Function_for_TP_Gain_TPG(alpha, ktpt0g, T0, TP, G, TA, binf);  // modifiers: TA
  TP_Decay: TP => ; compartment*mutp*TP;
  TA_Gain_I: => TA; compartment*Function_for_TA_Gain_I(ktaia, T0, I, A);  // modifiers: I, A
  TA_Gain_TAG: => TA; compartment*Function_for_TA_Gain_TAG(alpha, ktat0g, T0, G, TA);
  TA_Decay: TA => ; compartment*muta*TA;

  // Unit definitions:
  unit time = 3600 second;
  unit substance = item;
end
