// SBML level 2 version 4
// dcterms:bibliographicCitation: urn:miriam:pubmed:31622595

function Function_for_CSC_Growth(alphaS, S)
  alphaS*S;
end

function Function_for_nCSC_Reproduction(alphaP, P)
  alphaP*P;
end

function Function_for_pm_S_M(pm, S, M)
  pm*S*M;
end

function Function_for_nCSC_Production_CSC_Asymmetrical(alphaSP, S)
  alphaSP*S;
end

function Function_for_DC_CSC_Maturation(gammaDSD, S)
  gammaDSD*S;
end

function Function_for_nCTC_CSC_Activation(KTP, DP, sTP)
  KTP*DP/(sTP + DP);
end

function Function_for_CTC_CSC_Activation(kappaTS, DS, sTS)
  kappaTS*DS/(sTS + DS);
end

function Function_for_DC_nCSC_Maturation(gammaDPD, P)
  gammaDPD*P;
end

model Sigal2019___Mathematical_modelling_of_cancer_stem_cell_targeted_immunotherapy()
  // Sigal2019 - Mathematical modelling of cancer stem cell-targeted immunotherapy
  // This is a mathematical model studies how specific immune system components, namely dendritic cells and cytotoxic T-cells, interact with different cancer cell types, specifically cancer stem cells (CSCs) and non-CSCs. The effects of two types of immunotherapy are modeled, namely dendritic cell vaccines and T-cell adoptive therapy.
  // isDescribedBy pubmed:31622595
  // hasProperty mamo:MAMO_0000046
  // hasProperty ncit:C28310
  // hasProperty ncit:C15351
  // hasProperty ncit:C15438
  // hasProperty ncit:C68706

  // Compartments:
  compartment compartment = 1;

  // Species:
  species S in compartment = 10000;
  species P in compartment = 0;
  species TS in compartment = 0;
  species TP in compartment = 0;
  species DS in compartment = 0;
  species DP in compartment = 0;
  species C in compartment = 0;

  // Parameters:
  rs = 0.31;
  deltaS = 0.1;
  deltaP = 0;
  deltaDS = 0.2;
  deltaDP = 0.2;
  betaS = 6.2e-8;
  betaP = 6.2e-8;
  KTS = 45000;
  TSn = 45000;
  KTP = 45000;
  TPn = 45000;
  sTS = 25000;
  sTP = 25000;
  deltaTS = 0.02;
  deltaTP = 0.02;
  gammaDSD = 0.0063;
  gammaDPD = 0.0063;
  betaDS = 6.2e-8;
  betaDP = 6.2e-8;
  gammaS = 0.00078;
  gammaP = 0.0052;
  eC = 49;
  rP = 0.04;
  growth_start_time = 12;
  alphaP_value = 0.04;
  alphaSP_value = 1.6;
  rhoSP_value = 0.2;
  rhoPS_value = 0.00018;

  // Assignment rules:
  rhoSP := piecewise(rhoSP_value, growth_start_time <= time, 0);
  alphaP := piecewise(alphaP_value, growth_start_time <= time, 0);
  alphaSP := piecewise(alphaSP_value, growth_start_time <= time, 0);
  rhoPS := piecewise(rhoPS_value, growth_start_time <= time, 0);
  Tumor_Size := (S + P)/100000;
  alphaS_value := rs + deltaS;
  alphaS := piecewise(alphaS_value, growth_start_time <= time, 0);

  // Reactions:
  CSC_Growth: => S; compartment*Function_for_CSC_Growth(alphaS, S);
  nCSC_Conversion_CSC: P => S; compartment*rhoPS*P;
  CSC_Conversion_nCSC: S => 2 P; compartment*rhoSP*S;
  CSC_Death_CTC: S => ; compartment*Function_for_pm_S_M(betaS, S, TS);  // modifiers: TS
  nCSC_Death_CTC: P => ; compartment*Function_for_pm_S_M(betaP, P, TP);  // modifiers: TP
  CTC_CSC_Death_Natural: TS => ; compartment*deltaTS*TS;
  CSC_Death_Natural: S => ; compartment*deltaS*S;
  nCSC_Death_Natural: P => ; compartment*deltaP*P;
  CTC_nCSC_Death_Natural: TP => ; compartment*deltaTP*TP;
  DC_CSC_Death_CTC: DS => ; compartment*Function_for_pm_S_M(betaDS, DS, TS);  // modifiers: TS
  DC_CSC_Death_Natural: DS => ; compartment*deltaDS*DS;
  DC_nCSC_Death_CTC: DP => ; compartment*Function_for_pm_S_M(betaDP, DP, TP);  // modifiers: TP
  DC_nCSC_Death_Natural: DP => ; compartment*deltaDP*DP;
  Chemotherapeutic_Elimination: C => ; compartment*eC*C;
  CSC_Killing_Chemotherapeutic: S => ; compartment*Function_for_pm_S_M(gammaS, S, C);  // modifiers: C
  nCSC_Killing_Chemotherapeutic: P => ; compartment*Function_for_pm_S_M(gammaP, P, C);  // modifiers: C
  nCSC_Reproduction: => P; compartment*Function_for_nCSC_Reproduction(alphaP, P);
  nCSC_Production_CSC_Asymmetrical: => P; compartment*Function_for_nCSC_Production_CSC_Asymmetrical(alphaSP, S);  // modifiers: S
  CTC_CSC_Activation: => TS; compartment*Function_for_CTC_CSC_Activation(KTS, DS, sTS);  // modifiers: DS
  nCTC_CSC_Activation: => TP; compartment*Function_for_nCTC_CSC_Activation(KTP, DP, sTP);  // modifiers: DP
  DC_CSC_Maturation: => DS; compartment*Function_for_DC_CSC_Maturation(gammaDSD, S);  // modifiers: S
  DC_nCSC_Maturation: => DP; compartment*Function_for_DC_nCSC_Maturation(gammaDPD, P);  // modifiers: P

  // Unit definitions:
  unit volume = 1e-3 litre;
  unit time = 86400 second;
  unit substance = item;
end
