// SBML level 2 version 4
// dcterms:bibliographicCitation: urn:miriam:pubmed:24685888

function Constant_flux__irreversible(v)
  v;
end
Constant_flux__irreversible is "Constant flux (irreversible)";

function Function_for_SGK1_t_Transcription(t_1, beta_cat)
  t_1*beta_cat;
end

function Function_for_GSK3Beta_Transport_Nucleus(c_7, k_v, GSK3Beta_n)
  c_7*k_v*GSK3Beta_n;
end

function Function_for_SGK1_Translation(s_2, SGK1_t)
  s_2*SGK1_t;
end

function Function_for_MYC_Transcription(t_3, beta_cat)
  t_3*beta_cat;
end

function Function_for_GSK3Beta_c_Transport_Cytoplasm(c_6, k_v, GSK3Beta_c)
  c_6*k_v*GSK3Beta_c;
end

function Function_for_GSK3Beta_Transport_Cytoplasm(c_7, GSK3Beta_n)
  c_7*GSK3Beta_n;
end

function Function_for_cMyc_Translation(s_4, MYC_t)
  s_4*MYC_t;
end

function Function_for_cMyc_Transport_Cytoplasm(c_4, k_v, cMyc_pc)
  c_4*k_v*cMyc_pc;
end

model Kawka2014___Revealing_the_role_of_SGK1_in_the_dynamics_of_medulloblastoma_using_a_mathematical_model()
  // Kawka2014 - Revealing the role of SGK1 in the dynamics of medulloblastoma using a mathematical model
  // This is a mathematical model of the Wnt signaling pathway in medulloblastoma comprised of two compartments. Composed of nine ordinary differential equations accounts for the formation and dissociation of complexes as well as the transcription, translation and transportation between the cytoplasm and the nucleus.
  // hasProperty mamo:MAMO_0000046
  // hasProperty GO:0016055
  // isDescribedBy pubmed:24685888

  // Compartments:
  compartment cytoplasm = 1;
  compartment nucleus = 1;

  // Species:
  species SGK1_t in cytoplasm = 0.000114286;
  species SGK1_p in cytoplasm = 0.0571429;
  species MYC_t in cytoplasm = 0.000266667;
  species cMyc_pc in cytoplasm = 0.0484848;
  species cMyc_pn in nucleus = 0.100031;
  species GSK3Beta_c in cytoplasm = 0.00116327;
  species GSK3Beta_occ in cytoplasm = 0.000484848;
  species SGK1_occ in cytoplasm = 3.32364e-5;
  species GSK3Beta_n in nucleus = 0.00387758;

  // Parameters:
  P_GSK = 2e-5;
  beta_cat = 0.4;
  t_1 = 5.4e-8;
  t_3 = 2.859e-6;
  s_2 = 0.2;
  s_4 = 0.4;
  d_1 = 0.0007;
  d_2 = 0.0004;
  d_3 = 0.0006;
  d_4 = 0.0002;
  d_5 = 0.5;
  d_6 = 0.3;
  d_o = 5e-5;
  k_v = 0.5;
  c_4 = 0.002;
  c_6 = 0.003;
  c_7 = 0.0009;
  p_8 = 0.4;
  p_9 = 0.6;

  // Reactions:
  SGK1_t_Transcription: => SGK1_t; cytoplasm*Function_for_SGK1_t_Transcription(t_1, beta_cat);
  SGK1_t_Degradation: SGK1_t => ; cytoplasm*d_1*SGK1_t;
  SGK1_Translation: => SGK1_p; cytoplasm*Function_for_SGK1_Translation(s_2, SGK1_t);  // modifiers: SGK1_t
  SGK1_p_Degradation: SGK1_p => ; cytoplasm*d_2*SGK1_p;
  SGK1_GSK3Beta_Degradation: SGK1_p + GSK3Beta_c => SGK1_occ; cytoplasm*d_6*SGK1_p*GSK3Beta_c;
  SGK1_GSK3Beta_Dissociation: SGK1_occ => SGK1_p; cytoplasm*p_9*SGK1_occ;
  MYC_Transcription: => MYC_t; cytoplasm*Function_for_MYC_Transcription(t_3, beta_cat);
  MYC_t_Degradation: MYC_t => ; cytoplasm*d_3*MYC_t;
  cMyc_Translation: => cMyc_pc; cytoplasm*Function_for_cMyc_Translation(s_4, MYC_t);  // modifiers: MYC_t
  cMyc_Degradation: cMyc_pc => ; cytoplasm*d_4*cMyc_pc;
  cMyc_Transport_Nucleus: cMyc_pc => ; cytoplasm*c_4*cMyc_pc;
  cMyc_Transport_Cytoplasm: => cMyc_pn; Function_for_cMyc_Transport_Cytoplasm(c_4, k_v, cMyc_pc);  // modifiers: cMyc_pc
  cMyc_pn_Degradation: cMyc_pn + GSK3Beta_n => GSK3Beta_occ; d_5*cMyc_pn*GSK3Beta_n;
  GSK3Beta_Cytoplasm_Influx: => GSK3Beta_c; cytoplasm*Constant_flux__irreversible(P_GSK);
  GSK3Beta_Transport_Cytoplasm: => GSK3Beta_c; Function_for_GSK3Beta_Transport_Cytoplasm(c_7, GSK3Beta_n);  // modifiers: GSK3Beta_n
  GSK3Beta_Transport_Nucleus: GSK3Beta_n => ; nucleus*Function_for_GSK3Beta_Transport_Nucleus(c_7, k_v, GSK3Beta_n);
  GSK3Beta_Cytoplasm_Degradation: GSK3Beta_c => ; cytoplasm*d_o*GSK3Beta_c;
  GSKBeta_cMyc_Dissociation: GSK3Beta_occ => GSK3Beta_n; p_8*GSK3Beta_occ;
  GSK3Beta_c_Transport_Nucleus: GSK3Beta_c => ; cytoplasm*c_6*GSK3Beta_c;
  GSK3Beta_c_Transport_Cytoplasm: => GSK3Beta_n; Function_for_GSK3Beta_c_Transport_Cytoplasm(c_6, k_v, GSK3Beta_c);  // modifiers: GSK3Beta_c

  // Unit definitions:
  unit substance = 1e-6 mole;
end
