// SBML level 2 version 4
// dcterms:bibliographicCitation: Modelling combined virotherapy and immunotherapy:strengthening the antitumour immune response mediated byIL-12 and GM-CSF expression urn:miriam:doi:10.1080/23737867.2018.1438216

function Function_for_Removal_of_infected_tumor_cell_population(dI, I, k, K, N)
  dI*I + k*(K*I/N);
end

function Fucntion_for_production_of_virus_population(uv, alpha, di, I)
  uv + alpha*di*I;
end

function Function_for_Production_of_infected_tumor_cell_population(beta, U, V, N)
  beta*(U*V/N);
end

function Function_for_removal_of_uninfected_tumor_cell_population(beta, U, V, N, K)
  beta*(U*V/N) + K*(K*U/N);
end

function Function_for_Production_of_uninfected_tumor_cell_population(r, L, U)
  r*ln(L/U)*U;
end

function Function_for_Removal_of_virus_population(dv, V)
  dv*V;
end

function Function_for_production_of_APC_production(sa, I)
  sa*I;
end

function Function_for_Removal_of_APC_population(da, A)
  da*A;
end

function Function_for_production_of_helper_T_cell(sh, A)
  sh*A;
end

function Function_for_removal_of_Helper_T_cell(dh, H)
  dh*H;
end

function Function_for_production_of_Killer_T_cell_population(skh, H, ska, A)
  skh*H + ska*A;
end

function Function_for_Removal_of_Killer_T_cell_population(dk, K)
  dk*K;
end

function Function_for_Formation_of_uv(V_0, delta, t)
  V_0*delta*(t - 2) + delta*(t - 4);
end

model Adrianne2018___Modelling_combined_virotherapy_and_immunotherapy__strengthening_the_antitumour_immune_response_mediated_by_IL_12_and_GM_CSF_expression()
  // Adrianne2018 - Modelling combined virotherapy and immunotherapy: strengthening the antitumour immune response mediated by IL-12 and GM-CSF expression
  // Modelling combined virotherapy and immunotherapy:strengthening the antitumour immune response mediated byIL-12 and GM-CSF expression
  // Adrianne L. Jennera, Chae-Ok Yunb, Arum Yoonb, Adelle C. F. Costercand Peter S. Kimaa
  // School of Mathematics and Statistics, University of Sydney, Sydney, Australia;bDepartment ofBioengineering, Hanyang University, Seoul, Korea;cSchool of Mathematics and Statistics, University of NewSouth Wales, Sydney, Australia
  // ABSTRACT
  // Combined virotherapy and immunotherapy has been emergingas a promising and effective cancer treatment for some time.Intratumoural injections of an oncolytic virus instigate an immunereaction in the host, resulting in an influx of immune cells tothe tumour site. Through combining an oncolytic viral vector withimmunostimulatory cytokines an additional antitumour immuneresponse can be initiated, whereby immune cells induce apoptosisin both uninfected and virus infected tumour cells. We developa mathematical model to reproduce the experimental results fortumour growth under treatment with an oncolytic adenovirus co-expressing the immunostimulatory cytokines interleukin 12 (IL-12)and granulocyte-monocyte colony stimulating factor (GM-CSF). Byexploring heterogeneity in the immune cell stimulation by thetreatment, we find a subset of the parameter space for the immunecell induced apoptosis rate, in which the treatment will be lesseffective in a short time period. Therefore, we believe the bivariatenature of treatment outcome, whereby tumours are either completelyeradicated or grow unbounded, can be explained by heterogeneity inthis immune characteristic. Furthermore, the model highlights theapparent presence of negative feedback in the helper T cell and APCstimulation dynamics, when IL-12 and GM-CSF are co-expressed asopposed to individually expressed by the viral vector.
  // hasTaxon taxonomy:9606
  // isDescribedBy doi:10.1080/23737867.2018.1438216

  // Compartments:
  compartment compartment = 1;

  // Species:
  species U in compartment = 85;
  species I in compartment = 0;
  species V in compartment = 0;
  species A in compartment = 0;
  species H in compartment = 0;
  species K in compartment = 0;
  species uv in compartment = 0;
  species species in compartment = 0;

  // Parameters:
  r = 0.066;
  beta = 1.2;
  k = 1.4;
  di = 1;
  dv = 2.3;
  alpha = 3500;
  sa = 1.2;
  da = 0.23;
  sh = 0.78;
  dh = 0.23;
  skh = 1.6;
  ska = 7.1;
  dk = 0.35;
  V_0 = 85;
  L = 320000;
  delta = 0;
  t = 0;

  // Assignment rules:
  N := U + I + A + H + K;

  // Reactions:
  Production_of_uninfected_tumor_cell_population: => U; compartment*Function_for_Production_of_uninfected_tumor_cell_population(r, L, U);
  Removal_of_uninfected_tumor_cell_population: U => ; compartment*Function_for_removal_of_uninfected_tumor_cell_population(beta, U, V, N, K);  // modifiers: V, K
  Production_of_infected_tumor_cell_population: => I; compartment*Function_for_Production_of_infected_tumor_cell_population(beta, U, V, N);  // modifiers: U, V
  Removal_of_infected_tumor_cell_population: I => ; compartment*Function_for_Removal_of_infected_tumor_cell_population(di, I, k, K, N);  // modifiers: K
  Production_of_Virus_population: => V; compartment*Fucntion_for_production_of_virus_population(uv, alpha, di, I);  // modifiers: uv, I
  Removal_of_virus_population: V => ; compartment*Function_for_Removal_of_virus_population(dv, V);
  Production_of_APC_population: => A; compartment*Function_for_production_of_APC_production(sa, I);  // modifiers: I
  Removal_of_APC_population: A => ; compartment*Function_for_Removal_of_APC_population(da, A);
  Production_of_helper_T_cell: => H; compartment*Function_for_production_of_helper_T_cell(sh, A);  // modifiers: A
  Removal_of_Helper_T_cell: H => ; compartment*Function_for_removal_of_Helper_T_cell(dh, H);
  Production_of_Killer_T_cell_population: => K; compartment*Function_for_production_of_Killer_T_cell_population(skh, H, ska, A);  // modifiers: H, A
  Removal_of_Killer_T_cell_population: K => ; compartment*Function_for_Removal_of_Killer_T_cell_population(dk, K);
  Formation_of_uv: => uv; compartment*Function_for_Formation_of_uv(V_0, delta, t);

  // Unit definitions:
  unit volume = 1e-3 litre;
  unit substance = 1e-3 mole;
end
