// SBML level 2 version 4
// dcterms:bibliographicCitation: Dynamics of Breast Cancer under Different Rates of Chemoradiotherapy. urn:miriam:pubmed:31611927

function Function_for_formation_of_Resistant_cell(r2, TR, Tmax, mu, T)
  r2*TR*(1 - TR/Tmax) + mu*T;
end

function Function_for_formation_of_tumor_sensitive_cell(r1, T, Tmax)
  r1*T*(1 - T/Tmax);
end

function Function_for_decrease_in_immune_response_as_natural_killer_cell(d, I, aplha2, T, ai, e, delta1, M, bi, delta2, R)
  d*I + aplha2*I*T + ai*(1 - e^(-delta1*M))*I + bi*(1 - e^(-delta2*R))*I;
end

function Function_for_death_of_resistant_cell(atr, e, delta1, M, TR, btr, delta2, R)
  atr*(1 - e^(-delta1*M))*TR + btr*(1 - e^(delta2*R))*TR;
end

function Function_for_death_of_tumor_sensitive_cell(alpha1, I, T, mu, at, e, delta1, M, bt, delta2, R)
  alpha1*I*T + mu*T + at*(1 - e^(-delta1*M))*T + bt*(1 - e^(-delta2*R))*T;
end

function Function_for_radiotherapy_not_working(d2, R)
  d2*R;
end

function Function_for_increase_in_the_normal_cell_component(r3, N, Nmax, k, T, T_star)
  r3*N*(1 - N/Nmax) + k*T*(1 - T/T_star);
end

function Function_for_decrease_in_the_normal_cell_component(an, e, delta1, M, N, bn, delta2, R)
  an*(1 - e^(-delta1*M))*N + bn*(1 - e^(-delta2*R))*N;
end

function Function_for_radiotherapy_working(Vr)
  Vr;
end

function Function_for_increase_in_immune_response_in_natural_killer_cell(s, e1, I, T, e2)
  s + e1*I*T/(e2 + T);
end

function Function_for_chemotherapeutic_agent_not_functional(d1, M)
  d1*M;
end

function Function_for_working_of_chemotherapeutic_agent_working(Vm)
  Vm;
end

model Mkango2019___Dynamics_of_Breast_Cancer_under_DifferentRates_of_Chemoradiotherapy()
  // Mkango2019 - Dynamics of Breast Cancer under DifferentRates of Chemoradiotherapy
  // Dynamics of Breast Cancer under Different Rates of Chemoradiotherapy.
  // Mkango SB1, Shaban N1, Mureithi E1, Ngoma T2.
  // Author information
  // 1
  // Department of Mathematics, University of Dar es Salaam, P.O. Box 35062, Dar es Salaam, Tanzania.
  // 2
  // Department of Clinical Oncology, Muhimbili University of Health and Allied Sciences, P.O. Box 65000, Dar es Salaam, Tanzania.
  // Abstract
  // A type of cancer which originates from the breast tissue is referred to as breast cancer. Globally, it is the most common cause of death in women. Treatments such as radiotherapy, chemotherapy, hormone therapy, immunotherapy, and gene therapy are the main strategies in the fight against breast cancer. The present study aims at investigating the effects of the combined radiotherapy and chemotherapy as a way to treat breast cancer, and different treatment approaches are incorporated into the model. Also, the model is fitted to data on patients with breast cancer in Tanzania. We determine new treatment strategies, and finally, we show that when sufficient amount of chemotherapy and radiotherapy with a low decay rate is used, the drug will be significantly more effective in combating the disease while health cells remain above the threshold.
  // Copyright © 2019 Sara B. Mkango et al.
  // hasProperty mamo:MAMO_0000046
  // hasTaxon taxonomy:9606
  // hasInstance mamo:MAMO_0000046 taxonomy:9606 ncit:C15774
  // isDescribedBy ncit:C15774 pubmed:31611927

  // Compartments:
  compartment compartment = 1;

  // Species:
  species T in compartment = 3500000;
  species TR in compartment = 1400000;
  species N in compartment = 1000000;
  species I in compartment = 1000000;
  species M in compartment = 0;
  species R in compartment = 0;

  // Parameters:
  r1 = 0.431;
  Tmax = 55000000;
  alpha1 = 1e-8;
  mu = 0.001;
  at = 0.08;
  bt = 0.03;
  r2 = 0.25;
  atr = 0.08;
  btr = 0.03;
  r3 = 0.65;
  Nmax = 30000000;
  k = 1.1e-6;
  T_star = 500000;
  an = 0.03;
  bn = 0.03;
  s = 100000;
  d = 0.0125;
  e1 = 0.0206;
  e2 = 30000;
  alpha2 = 1e-8;
  ai = 0.03;
  bi = 0.03;
  Vm = 0.5;
  d1 = 0.011;
  Vr = 0.5;
  d2 = 0.011;
  e = 2.718;
  delta1 = 0;
  delta2 = 0;

  // Reactions:
  Formation_of_tumor_sensitive_cell: => T; compartment*Function_for_formation_of_tumor_sensitive_cell(r1, T, Tmax);
  Death_of_tumor_sensitive_cell: T => ; compartment*Function_for_death_of_tumor_sensitive_cell(alpha1, I, T, mu, at, e, delta1, M, bt, delta2, R);  // modifiers: I, M, R
  Formation_of_Resistant_cell: => TR; compartment*Function_for_formation_of_Resistant_cell(r2, TR, Tmax, mu, T);  // modifiers: T
  Death_of_resistant_cell: TR => ; compartment*Function_for_death_of_resistant_cell(atr, e, delta1, M, TR, btr, delta2, R);  // modifiers: M, R
  Increase_in_the_Normal_cell_compartment: => N; compartment*Function_for_increase_in_the_normal_cell_component(r3, N, Nmax, k, T, T_star);  // modifiers: T
  Decrease_in_the_amount_of_normal_cell_component: N => ; compartment*Function_for_decrease_in_the_normal_cell_component(an, e, delta1, M, N, bn, delta2, R);  // modifiers: M, R
  Increase_in_immune_response_in_natural_killer_cell: => I; compartment*Function_for_increase_in_immune_response_in_natural_killer_cell(s, e1, I, T, e2);  // modifiers: T
  Decrease_in_immune_response_as_natural_killer_cell: I => ; compartment*Function_for_decrease_in_immune_response_as_natural_killer_cell(d, I, alpha2, T, ai, e, delta1, M, bi, delta2, R);  // modifiers: T, M, R
  Chemotherapeutic_agent_working: => M; compartment*Function_for_working_of_chemotherapeutic_agent_working(Vm);
  Chemotherapeutic_agent_not_working: M => ; compartment*Function_for_chemotherapeutic_agent_not_functional(d1, M);
  Radiotherapy_working: => R; compartment*Function_for_radiotherapy_working(Vr);
  Radiotherapy_not_working: R => ; compartment*Function_for_radiotherapy_not_working(d2, R);

  // Unit definitions:
  unit volume = 1e-3 litre;
  unit time = 86400 second;
  unit substance = 1e-3 mole;
end
