// SBML level 2 version 4

function Function_for_decrease_in_the_amount_of_CD8__T_cell(d1, Te, s1, T, s2, Tr, i1, g)
  d1*Te + s1*Te*T + s2*Te*Tr + i1*(1 - exp(-g))*Te;
end
Function_for_decrease_in_the_amount_of_CD8__T_cell is "Function for decrease in the amount of CD8+ T cell";

function Function_for_decrease_in_the_amount_of_NK_cells(d2, N, i2, g)
  d2*N + i2*(1 - exp(-g))*N;
end

function Function_for_increase_in_the_density_of_CD8__T_cell(Ts, r, Te, T)
  Ts + r*Te*T;
end
Function_for_increase_in_the_density_of_CD8__T_cell is "Function for increase in the density of CD8+ T cell";

function Function_for_increase_in_the_amount_of_NK_cells(Ns)
  Ns;
end

function Function_for_decrease_in_the_amount_of_dendritic_cells(d3, A, ig, g)
  d3*A + ig*(1 - exp(-g))*A;
end

function Function_for_increase_in_the_amount_of_dendritic_cells(As)
  As;
end

function Function_for_decrease_in_the_density_of_regulatory_cells(d4, Tr)
  d4*Tr;
end

function Function_for_Increase_in_the_density_of_Regulatory_cells(Trs, a1, g, Tr)
  Trs + a1*(1 - exp(-g))*Tr;
end

function Function_for_increase_in_growth_of_lymphoma_of_GC_treated_DC(a, T_dc, b, g)
  a*T_dc*(1 - b*T_dc)*(1 - exp(-g));
end

function Function_for_restriction_of_tumor_growth_on_GC_treated_DC(A, g, T_dc)
  A*(1 - exp(-g))*T_dc;
end

model Yakimchuk_et_al__2019__Mathematical_modeling_of_immune_modulation_by_glucocorticoids()
  // Yakimchuk2019 - Mathematical modeling of immune modulation by glucocorticoids
  // Mathematical modeling of immune modulation by glucocorticoids
  // Konstantin Yakimchuk
  // https://doi.org/10.1016/j.biosystems.2019.104066
  // Abstract
  // The cellular and molecular mechanisms of immunomodulatory actions of glucocorticoids (GC) remain to be identified. Using our experimental findings, a mathematical model based on a system of ordinary differential equations for characterization of the regulation of anti-tumor immune activity by the both direct and indirect GC effects was generated to study the effects of GC treatment on effector CD8+ T cells, GC-generated tolerogenic dendritic cells (DC), regulatory T cells and the growth of lymphoma cells. In addition, we compared the data from in vivo and in silico experiments. The mathematical simulations indicated that treatment with GCs may suppress anti-tumor immune response in a dose-dependent manner. The model simulations were in line with earlier experimental observations of inhibitory effects of GCs on T and NK cells and DCs. The results of this study might be useful for predicting clinical outcomes in patients receiving GC therapy.

  // Compartments:
  compartment compartment = 1;

  // Species:
  species Te in compartment = 1;
  species N in compartment = 1;
  species A in compartment = 1;
  species Tr in compartment = 1;
  species T_dc in compartment = 1;

  // Parameters:
  Ts = 2800000;
  d1 = 0.3743;
  r = 1.131;
  s1 = 0.00311;
  s2 = 0.1;
  i1 = 0.57;
  T = 500000;
  Tr_0 = 1980000;
  Ns = 3.79;
  d2 = 0.0412;
  i2 = 0.86;
  As = 3;
  ir = 0.98;
  d3 = 0.2;
  ig = 0.185;
  Trs = 1980000;
  d4 = 0.1;
  a1 = 1.0483;
  a = 1.636;
  b = 0.003;
  g = 0.1;

  // Reactions:
  Increase_in_the_density_fo_CD8__T_cell: => Te; compartment*Function_for_increase_in_the_density_of_CD8__T_cell(Ts, r, Te, T_dc); Increase_in_the_density_fo_CD8__T_cell is "Increase in the density fo CD8+ T cell";  // modifiers: T_dc
  Decrease_in_the_amount_of_CD8__T_cell: Te => ; compartment*Function_for_decrease_in_the_amount_of_CD8__T_cell(d1, Te, s1, T_dc, s2, Tr, i1, g); Decrease_in_the_amount_of_CD8__T_cell is "Decrease in the amount of CD8+ T cell";  // modifiers: T_dc, Tr
  Increase_in_the_amount_of_NK_cells: => N; compartment*Function_for_increase_in_the_amount_of_NK_cells(Ns);
  Decrease_in_the_amount_of_NK_cells: N => ; compartment*Function_for_decrease_in_the_amount_of_NK_cells(d2, N, i2, g);
  Increase_in_the_amount_of_Dendritic_cells: => A; compartment*Function_for_increase_in_the_amount_of_dendritic_cells(As);
  Decrease_in_the_amount_of_Dendritic_cells: A => ; compartment*Function_for_decrease_in_the_amount_of_dendritic_cells(d3, A, ig, g);
  Increase_in_the_density_of_Regulatory_cells: => Tr; compartment*Function_for_Increase_in_the_density_of_Regulatory_cells(Trs, a1, g, Tr);
  Decrease_in_the_density_of_regulatory_cells: Tr => ; compartment*Function_for_decrease_in_the_density_of_regulatory_cells(d4, Tr);
  growth_of_tumor_cell_injected_with_GC_treated_DC: => T_dc; compartment*Function_for_increase_in_growth_of_lymphoma_of_GC_treated_DC(a, T_dc, b, g);
  Restriction_of_tumor_growth_of_GC_treated_DC: T_dc => ; compartment*Function_for_restriction_of_tumor_growth_on_GC_treated_DC(A, g, T_dc);  // modifiers: A

  // Unit definitions:
  unit volume = 1e-3 litre;
  unit substance = 1e-3 mole;
end
