// SBML level 2 version 4
// dcterms:bibliographicCitation: A mathematical model for chronic myelogenous leukemia (CML) and T cell interaction urn:miriam:doi:10.3934/dcdsb.2013.18.1053

function Function_for_production_of_B_CLL(b_B, d_B, B, r)
  b_B + (r - d_B)*B;
end
Function_for_production_of_B_CLL is "Function for production of B-CLL";

function Function_for_Dissociation_of_NK_cells_paving_way_for_more_adaptive_response_to_form(d_N, N, d_NB, B)
  d_N*N + d_NB*N*B;
end

function Function_for_removal_of_T_helper_cell(d_TH, TH)
  d_TH*TH;
end

function Function_for_Removal_of_B_CLL_by_the_action_of_immune_cells_of_toxic_T_cell_and_helper_T_cell(d_BN, B, N, d_BT, T)
  d_BN*B*N + d_BT*B*T;
end
Function_for_Removal_of_B_CLL_by_the_action_of_immune_cells_of_toxic_T_cell_and_helper_T_cell is "Function for Removal of B-CLL by the action of immune cells of toxic T cell and helper T cell";

function Function_for_NK_cell_coming_to_the_site_of_tumor(b_N)
  b_N;
end

function Function_for_Induction_of_cytotoxic_T_cell_and_introduction_to_the_tumor_cell(b_T, B, L, s, TH, k, alpha_TH)
  b_T + k*alpha_TH*(B^L/(s + B^L))*TH;
end

function Function_for_dissociation_of_cytotoxic_T_cell_from_the_system(d_T, T, d_TB, B)
  d_T*T + d_TB*T*B;
end

function Function_for_activation_of_TH_cells(b_TH, alpha_TH, B, L, s, TH)
  b_TH + alpha_TH*(B^L/(s + B^L))*TH;
end

function Function_for_removal_of_heavy_water_B_CLL(d_B, H)
  d_B*H;
end
Function_for_removal_of_heavy_water_B_CLL is "Function for removal of heavy water B-CLL";

function Function_for_increase_in_the_heavy_water_B_CLL(h, b_B, r, d_B, B)
  h*(b_B + (r - d_B)*B);
end
Function_for_increase_in_the_heavy_water_B_CLL is "Function for increase in the heavy water B-CLL";

model Nanda2013___B_cell_chronic_lymphocytic_leukemia___A_model_with_immune_response()
  // Nanda2013 - B cell chronic lymphocytic leukemia A model with immune response
  // B cell chronic lymphocytic leukemia - A model with immune response
  // Seema Nanda 1, , Lisette dePillis 2, and Ami Radunskaya 3,
  // 1.
  // Tata Institute of Fundamental Research, Centre for Applicable Mathematics, Bangalore 560065, India
  // 2.
  // Department of Mathematics, Harvey Mudd College, Claremont, CA 91711
  // 3.
  // Department of Mathematics, Pomona College, Claremont, CA, 91711, United States
  // Abstract
  // B cell chronic lymphocytic leukemia (B-CLL) is known to have substantial clinical heterogeneity. There is no cure, but treatments allow for disease management. However, the wide range of clinical courses experienced by B-CLL patients makes prognosis and hence treatment a significant challenge. In an attempt to study disease progression across different patients via a unified yet flexible approach, we present a mathematical model of B-CLL with immune response, that can capture both rapid and slow disease progression. This model includes four different cell populations in the peripheral blood of humans: B-CLL cells, NK cells, cytotoxic T cells and helper T cells. We analyze existing data in the medical literature, determine ranges of values for parameters of the model, and compare our model outcomes to clinical patient data. The goal of this work is to provide a tool that may shed light on factors affecting the course of disease progression in patients. This modeling tool can serve as a foundation upon which future treatments can be based.
  // Keywords: NK cell, chronic lymphocytic leukemia, mathematical model, T cell., B-CLL.
  // isDerivedFrom mamo:MAMO_0000046 taxonomy:9606 biomodels.db:MODEL1907260001
  // isDescribedBy biomodels.db:MODEL1907260001 doi:10.3934/dcdsb.2013.18.1053
  // isVersionOf mamo:MAMO_0000046
  // hasProperty taxonomy:9606 mamo:MAMO_0000046

  // Compartments:
  compartment compartment = 1;

  // Species:
  species B in compartment = 34;
  species N in compartment = 504;
  species T in compartment = 2;
  species TH in compartment = 1;
  species H in compartment = 1;

  // Parameters:
  b_B = 9;
  fw = 6.66;
  alpha_Th = 0.00142;
  d_B = 0.0076;
  rdB = 0.00191;
  d_BN = 9.78e-7;
  d_BT = 3.4e-5;
  d_T = 0;
  d_TB = 0.001;
  k = 0.6;
  b_T = 0;
  r = 0.00191;
  b_TH = 3.9;
  L = 2;
  s = 10000;
  d_TH = 0.00135;
  d_NB = 0.0001;
  d_N = 0.0159;
  b_N = 1.59;
  ModelValue_5_0 = fw; ModelValue_5_0 is "Initial for fw";
  ModelValue_6_0 = h5; ModelValue_6_0 is "Initial for h5";
  ModelValue_7_0 = h84; ModelValue_7_0 is "Initial for h84";

  // Assignment rules:
  h_1 := 0.03*(1 - exp(-ModelValue_5_0*time));
  h5 := 0.03*(1 - exp(-5*ModelValue_5_0));
  h_2 := 0.01 + (ModelValue_6_0 - 0.01)*exp(ModelValue_5_0*(5 - time));
  h84 := 0.01 + (ModelValue_6_0 - 0.01)*exp(-79*ModelValue_5_0);
  h_3 := ModelValue_7_0*exp(ModelValue_5_0*(84 - time));
  h := piecewise(h_1, time <= 5, piecewise(h_2, (time > 5) && (time <= 84), piecewise(h_3, time > 84, 0)));

  // Reactions:
  Production_of_chronic_lymphocytic_leukemic_cell: => B; compartment*Function_for_production_of_B_CLL(b_B, d_B, B, r);
  Removal_of_B_CLL_by_the_action_of_immune_cells_of_toxic_T_cell_and_helper_T_cell: B => ; compartment*Function_for_Removal_of_B_CLL_by_the_action_of_immune_cells_of_toxic_T_cell_and_helper_T_cell(d_BN, B, N, d_BT, T); Removal_of_B_CLL_by_the_action_of_immune_cells_of_toxic_T_cell_and_helper_T_cell is "Removal of B-CLL by the action of immune cells of toxic T cell and helper T cell";  // modifiers: N, T
  NK_cells_coming_to_the_site_of_tumor: => N; compartment*Function_for_NK_cell_coming_to_the_site_of_tumor(b_N);
  Dissociation_of_NK_cells_paving_way_for_more_adaptive_response_to_form: N => ; compartment*Function_for_Dissociation_of_NK_cells_paving_way_for_more_adaptive_response_to_form(d_N, N, d_NB, B);  // modifiers: B
  Induction_of_cytotoxic_T_cell_and_introduction_to_the_tumor_cell: => T; compartment*Function_for_Induction_of_cytotoxic_T_cell_and_introduction_to_the_tumor_cell(b_T, B, L, s, TH, k, alpha_Th);  // modifiers: B, TH
  Dissociation_of_cytotoxic_T_cell_from_the_site_of_tumor: T => ; compartment*Function_for_dissociation_of_cytotoxic_T_cell_from_the_system(d_T, T, d_TB, B);  // modifiers: B
  Activation_of_T_helper_cell_to_activate_other_cells_in_the_immune_system: => TH; compartment*Function_for_activation_of_TH_cells(b_TH, alpha_Th, B, L, s, TH);  // modifiers: B
  Removal_of_T_helper_cells: TH => ; compartment*Function_for_removal_of_T_helper_cell(d_TH, TH);
  Increase_in_the_heavy_water_containing_B_CLL: => H; compartment*Function_for_increase_in_the_heavy_water_B_CLL(h, b_B, r, d_B, B); Increase_in_the_heavy_water_containing_B_CLL is "Increase in the heavy water containing B-CLL";  // modifiers: B
  Removal_of_heavy_water_B_CLL: H => ; compartment*Function_for_removal_of_heavy_water_B_CLL(d_B, H); Removal_of_heavy_water_B_CLL is "Removal of heavy water B-CLL";

  // Unit definitions:
  unit volume = 1e-3 litre;
  unit substance = 1e-3 mole;
end
