// SBML level 2 version 4
// dcterms:bibliographicCitation: urn:miriam:pubmed:21151630

function Function_for_formation_of_functional_antigen_presenting_dendritic_cell(alpha1, km, Dm)
  alpha1*km*Dm;
end

function Function_for_increase_in_the_regulatory_dendritic_cell_population(Kcr, Dc)
  Kcr*Dc;
end

function Function_for_tumor_cell_comprising_vaccine(ki, nv, V)
  ki*nv*V;
end

function Function_for_recruitment_and_activation_of_CTL(Dc, ac)
  ac*Dc;
end

function Function_for_decrease_in_the_regulatory_dendritic_cell_population(mu_d, Dr)
  mu_d*Dr;
end

function Function_for_increase_in_the_antigen_presenting_dendritic_cell(ki, V, Vp)
  ki*(V + Vp);
end

function Function_for_removal_of_antigen_presenting_dermal_dendritic_cell(km, Dm)
  km*Dm;
end

function Function_for_removal_of_mature_dendritic_cell_Dc(Kcr, Dc)
  Kcr*Dc;
end

function Function_for_elimination_of_regulatory_cells(mu_r, R)
  mu_r*R;
end

function Function_for_death_and_inactivation_of_CTL(mu_c, C, Kr, R)
  mu_c*C + Kr*C*R;
end

function Function_for_regulatory_cells_recruited_by_DC(ar, Dr)
  ar*Dr;
end

function Function_for_increase_in_the_prostate_cancer(r, P)
  r*P;
end

function Function_for_elimination_of_prostate_cancer(ap, C, P, hp)
  ap*C*P*(hp/(hp + P));
end

model Kronik2010___Predicting_Outcomes_of_Prostate_Cancer_Immunotherapyby_Personalized_Mathematical_Models()
  // Kronik2010 - Predicting Outcomes of Prostate Cancer Immunotherapyby Personalized Mathematical Models
  // Predicting Outcomes of Prostate Cancer Immunotherapyby Personalized Mathematical Models
  // Natalie Kronik1¤, Yuri Kogan1, Moran Elishmereni1, Karin Halevi-Tobias1, Stanimir Vuk-Pavlovic ́2.,Zvia Agur1*.1Institute for Medical BioMathematics, Bene Ataroth, Israel,2College of Medicine, Mayo Clinic, Rochester, Minnesota, United States of America
  // Abstract
  // Background:Therapeutic vaccination against disseminated prostate cancer (PCa) is partially effective in some PCa patients.We hypothesized that the efficacy of treatment will be enhanced by individualized vaccination regimens tailored by simplemathematical models.Methodology/Principal Findings:We developed a general mathematical model encompassing the basic interactions of avaccine, immune system and PCa cells, and validated it by the results of a clinical trial testing an allogeneic PCa whole-cellvaccine. For model validation in the absence of any other pertinent marker, we used the clinically measured changes inprostate-specific antigen (PSA) levels as a correlate of tumor burden. Up to 26 PSA levels measured per patient were dividedinto each patient’s training set and his validation set. The training set, used for model personalization, contained thepatient’s initial sequence of PSA levels; the validation set contained his subsequent PSA data points. Personalized modelswere simulated to predict changes in tumor burden and PSA levels and predictions were compared to the validation set.The model accurately predicted PSA levels over the entire measured period in 12 of the 15 vaccination-responsive patients(the coefficient of determination between the predicted and observed PSA values wasR2= 0.972). The model could notaccount for the inconsistent changes in PSA levels in 3 of the 15 responsive patients at the end of treatment. Each validatedpersonalized model was simulated under many hypothetical immunotherapy protocols to suggest alternative vaccinationregimens. Personalized regimens predicted to enhance the effects of therapy differed among the patients.Conclusions/Significance:Using a few initial measurements, we constructed robust patient-specific models of PCaimmunotherapy, which were retrospectively validated by clinical trial results. Our results emphasize the potential value andfeasibility of individualized model-suggested immunotherapy protocols.
  // isDescribedBy pubmed:21151630
  // isVersionOf BTO:0001033
  // hasTaxon taxonomy:9606
  // hasProperty mamo:MAMO_0000046

  // Compartments:
  compartment compartment = 1;

  // Species:
  species V in compartment = 1000000;
  species Dm in compartment = 1;
  species Dc in compartment = 1;
  species Dr in compartment = 1;
  species C in compartment = 1;
  species R in compartment = 1;
  species P in compartment = 1;

  // Parameters:
  ki = 0.06;
  nv = 1;
  Vp = 0;
  alpha1 = 0.03;
  km = 0.027;
  kcr = 0.027;
  mu_d = 0.014;
  ar = 0.003;
  mu_r = 0.03;
  ac = 0.03;
  mu_c = 0.007;
  kr = 6e-7;
  r = 1e-5;
  ap = 1.14e-6;
  hp = 100000000;

  // Reactions:
  Tumor_cells_comprising_vaccines: V => ; compartment*Function_for_tumor_cell_comprising_vaccine(ki, nv, V);
  Numbe_of_antigen_presenting_DC_migrate_to_lymph_node: => Dm; compartment*Function_for_increase_in_the_antigen_presenting_dendritic_cell(ki, V, Vp);  // modifiers: V
  Removal_of_antigen_presenting_dermal_dendritic_cell: Dm => ; compartment*Function_for_removal_of_antigen_presenting_dermal_dendritic_cell(km, Dm);
  Functional_antigen_presenting_dendritic_cell_Dc: => Dc; compartment*Function_for_formation_of_functional_antigen_presenting_dendritic_cell(alpha1, km, Dm);  // modifiers: Dm
  Removal_of_mature_Dendritic_cell: Dc => ; compartment*Function_for_removal_of_mature_dendritic_cell_Dc(kcr, Dc);
  Increase_regulatory_dendritic_cell: => Dr; compartment*Function_for_increase_in_the_regulatory_dendritic_cell_population(kcr, Dc);  // modifiers: Dc
  Decrease_in_the_regulatory_dendritic_cell_population: Dr => ; compartment*Function_for_decrease_in_the_regulatory_dendritic_cell_population(mu_d, Dr);
  recruitment_and_activation_of_CTL: => C; compartment*Function_for_recruitment_and_activation_of_CTL(Dc, ac);  // modifiers: Dc
  Death_and_inactivation_of_CTL: C => ; compartment*Function_for_death_and_inactivation_of_CTL(mu_c, C, kr, R);  // modifiers: R
  Regulatory_cells_recruited_bt_DC: => R; compartment*Function_for_regulatory_cells_recruited_by_DC(ar, Dr);  // modifiers: Dr
  Elimination_of_regulatory_cells: R => ; compartment*Function_for_elimination_of_regulatory_cells(mu_r, R);
  increase_in_the_prostate_cancer_dynamics: => P; compartment*Function_for_increase_in_the_prostate_cancer(r, P);
  Elimination_of_prostate_cacner_by_immune_system: P => ; compartment*Function_for_elimination_of_prostate_cancer(ap, C, P, hp);  // modifiers: C

  // Unit definitions:
  unit volume = 1e-3 litre;
  unit substance = 1e-3 mole;
end
