// SBML level 2 version 4
// dcterms:bibliographicCitation: urn:miriam:pubmed:30418793

function log(r, P, k)
  r*P*(1 - k*P);
end

function im_stim(d, I, T, y)
  d*I*T/(y + T);
end

function death(v, S, M)
  v*S*M;
end

function increase(T, I, v)
  T*I*v;
end

function r_0(R, s1, T, s2, Td)
  R*s1*T*(1 - s2*T)/(3*(1 - (T + Td)));
end
r_0 is "r+";

function r_1(R, u2, Td, T)
  R*u2*Td/(3*(1 - (T + Td)));
end
r_1 is "r-";

model Malinzi2018___tumor_immune_interaction()
  // Malinzi2018 - Enhancement of chemotherapy using oncolytic virotherapy
  // The paper describes a model of immune-cancer interaction. One time unit=24 days.
  // Created by COPASI 4.25 (Build 207)
  // This model is described in the article:
  // Mathematical analysis of a tumour-immune interaction model: A moving boundary problem
  // Joseph Malinzi and Innocenter Amima
  // Mathematical Biosciences 308 (2019) 8–19
  // Abstract:
  // IA spatio-temporal mathematical model, in the form of a moving boundary problem, to explain cancer dormancy is developed. Analysis of the model is carried out for both temporal and spatio-temporal cases. Stability analysis and numerical simulations of the temporal model replicate experimental observations of immune-induced tu- mour dormancy. Travelling wave solutions of the spatio-temporal model are determined using the hyperbolic tangent method and minimum wave speeds of invasion are calculated. Travelling wave analysis depicts that cell invasion dynamics are mainly driven by their motion and growth rates. A stability analysis of the spatio-tem- poral model shows a possibility of dynamical stabilization of the tumour-free steady state. Simulation results reveal that the tumour swells to a dormant level.
  // To cite BioModels Database, please use: BioModels Database: An enhanced, curated and annotated resource for published quantitative kinetic models .
  // To the extent possible under law, all copyright and related or neighbouring rights to this encoded model have been dedicated to the public domain worldwide.
  // Please refer to CC0 Public Domain Dedication for more information. Model is encoded by Jinghao Man and submitted to BioModels by Krishna Tiwari
  // isDescribedBy pubmed:30418793
  // hasTaxon taxonomy:9606
  // hasProperty GO:0002418 mamo:MAMO_0000046

  // Compartments:
  compartment tumor_microenvironment = 1;  // isVersionOf ncit:C94498

  // Species:
  // immune cells density unit
  // /1e6 cells cm-3
  species I in tumor_microenvironment = 0.3;
  // tumor cells density unit
  // /1e6 cells cm-3
  species T in tumor_microenvironment = 0.8;
  // dead tumor cells density unit
  // /1e6 cells cm-3
  species Td in tumor_microenvironment = 0.1;
  // chemokine concentration
  species C in tumor_microenvironment = 1e-6;
  // tumor radius/cm
  species R in tumor_microenvironment = 0.8;

  // Parameters:
  f1 = 1.3398 unit_0;
  f2 = 0.25 unit_0;
  d = 3.0218 unit_0;
  v1 = 0.00218 unit_0;
  s1 = 3.8835 unit_0;
  s2 = 0.5 unit_0;
  v2 = 0.7279 unit_0;
  v3 = 300 unit_0;
  u1 = 1 unit_0;
  r = 0.1 unit_0;
  u2 = 0.24 unit_0;
  // michaelis menten constant
  y = 202 unit_0;

  // Reactions:
  immune_growth: => I; tumor_microenvironment*log(f1, I, f2);
  immune_stimulation: => I; tumor_microenvironment*im_stim(d, I, T, y);  // modifiers: T
  immune_death: I => ; tumor_microenvironment*death(v1, I, T);  // modifiers: T
  tumor_growth: => T; tumor_microenvironment*log(s1, T, s2);
  tumor_killing: T => ; tumor_microenvironment*death(v2, T, I);  // modifiers: I
  cytokine_production: => C; tumor_microenvironment*increase(T, I, v3);  // modifiers: T, I
  cytokine_decay: C => ; tumor_microenvironment*u1*C;
  dead_tumor_increase: => Td; tumor_microenvironment*increase(T, I, r);  // modifiers: T, I
  dead_tumor_decrease: Td => ; tumor_microenvironment*u2*Td;
  radius_: => R; tumor_microenvironment*r_0(R, s1, T, s2, Td); radius_ is "radius +";  // modifiers: T, Td
  radius__0: R => ; tumor_microenvironment*r_1(R, u2, Td, T); radius__0 is "radius -";  // modifiers: Td, T

  // Unit definitions:
  unit volume = 1e-3 litre;
  unit substance = 1e-3 mole;
  unit unit_0 = dimensionless^0; unit_0 is "1";
end
