// SBML level 2 version 4
// dcterms:bibliographicCitation: urn:miriam:isbn:ISSN: 1072-669

function Function_for_logistic_tumor_growth(a, T, b)
  a*T*(1 - b*T);
end

function Function_for_lymphocyte_synthesis_in_bone_marrow(alpha)
  alpha;
end

function Function_for_activation_naive_CD8__T_cells_in_the_general_lymphocyte_population(r2, C, T)
  r2*C*T;
end
Function_for_activation_naive_CD8__T_cells_in_the_general_lymphocyte_population is "Function for activation naive CD8+ T cells in the general lymphocyte population";

function Function_for_CD8__T_cell_induced_tumor_death(D, T)
  D*T;
end
Function_for_CD8__T_cell_induced_tumor_death is "Function for CD8+ T cell induced tumor death";

function Function_for_production_of_Il_2_due_to_naive_CD8__T_cells_and_CD4__T_cells(psi, C)
  psi*C;
end
Function_for_production_of_Il_2_due_to_naive_CD8__T_cells_and_CD4__T_cells is "Function for production of Il-2 due to naive CD8+ T cells and CD4+ T cells";

function function_for_natural_killer_breakdown(f, N)
  f*N;
end

function Function_for_stimulatory_effect_of_Il_2_on_NK_cells(p_N, N, I, g_N)
  p_N*N*I/(g_N + I);
end
Function_for_stimulatory_effect_of_Il_2_on_NK_cells is "Function for stimulatory effect of Il-2 on NK cells";

function Function_for_lymphocyte_breakdown(beta, C)
  beta*C;
end

function Function_for_production_of_Il_2_from_activated_CD8__T_cells(omega, L, I, zeta)
  omega*L*I/(zeta*I);
end
Function_for_production_of_Il_2_from_activated_CD8__T_cells is "Function for production of Il-2 from activated CD8+ T cells";

function Function_for_CD8__T_cell_breakdown(theta, m, L, I)
  theta*m*L/(theta + I);
end
Function_for_CD8__T_cell_breakdown is "Function for CD8+ T cell breakdown";

function Function_for_CD_8__T_cell_stimulation_by_CD8__T_cell_lysed_tumor_cell_debris(j, T, L, k)
  j*T*L/(k + T);
end
Function_for_CD_8__T_cell_stimulation_by_CD8__T_cell_lysed_tumor_cell_debris is "Function for CD 8+ T cell stimulation by CD8+ T cell lysed tumor cell debris";

function Function_for_external_TIL_therapy__controllable(eta_I, v_L)
  eta_I*v_L;
end
Function_for_external_TIL_therapy__controllable is "Function for external TIL therapy, controllable";

function Function_for_CD8__T_cell_death_by_exhaustion_of_tumor_killing_resources(q, L, T)
  q*L*T;
end
Function_for_CD8__T_cell_death_by_exhaustion_of_tumor_killing_resources is "Function for CD8+ T cell death by exhaustion of tumor killing resources";

function Function_for_death_of_CD8__T_cells_due_to_medicinal_toxicity(K_L, delta_L, M, L)
  K_L*(1 - exp(-delta_L*M))*L;
end
Function_for_death_of_CD8__T_cells_due_to_medicinal_toxicity is "Function for death of CD8+ T cells due to medicinal toxicity";

function Function_for_death_of_lymphocyte_due_to_medicinal_toxicity(K_C, delta_C, M, C)
  K_C*(1 - exp(-delta_C*M))*C;
end

function Function_for_breakdown_of_surplus_CD8__T_cells_in_the_presence_of_IL_2(u_0, L, C, I, kappa)
  u_0*L*L*C*I/(kappa + I);
end
Function_for_breakdown_of_surplus_CD8__T_cells_in_the_presence_of_IL_2 is "Function for breakdown of surplus CD8+ T cells in the presence of IL-2";

function Function_of_natural_killer_death_bt_exhaustion_of_tumor_killing_resources(p, N, T)
  p*N*T;
end

function Function_for_CD8__T_cell_stimumation_by_NK_lysed_tumor_cell_debris(r1, N, T)
  r1*N*T;
end
Function_for_CD8__T_cell_stimumation_by_NK_lysed_tumor_cell_debris is "Function for CD8+ T cell stimumation by NK lysed tumor cell debris";

function Function_for_IL_2_breakdown(mu_I, I)
  mu_I*I;
end
Function_for_IL_2_breakdown is "Function for IL-2 breakdown";

function Function_for_external_Il_2_controllable(eta_3, v_I)
  eta_3*v_I;
end
Function_for_external_Il_2_controllable is "Function for external Il-2 controllable";

function Function_for_external_chemotherapy__controllable(eta2, V_M)
  eta2*V_M;
end
Function_for_external_chemotherapy__controllable is "Function for external chemotherapy, controllable";

function Function_for_death_of_NK_cells_due_to_medicinal_toxicity(K_N, delta_N, M, N)
  K_N*(1 - exp(delta_N*M))*N;
end

function Function_for_NK_induced_tumor_death(c, N, T)
  c*N*T;
end

function Function_for_stimulatory_effect_of_IL_2_on_CD8__T_cells(p_I, L, I, g_I)
  p_I*L*I/(g_I + I);
end
Function_for_stimulatory_effect_of_IL_2_on_CD8__T_cells is "Function for stimulatory effect of IL-2 on CD8+ T cells";

function Function_for_excretion_and_breakdown_of_medicine(gamma, M)
  gamma*M;
end

function Function_for_production_of_NK_cells_from_circulating_lymphocytes(e, C)
  e*C;
end

function Function_for_chemotherapy_induced_tumor_death(K_T, delta_T, M, T)
  K_T*(1 - exp(-delta_T*M))*T;
end

model dePillis2007___Seeking_Bang_Bang_Solutions_of_Mixed_ImmunoChemotherapy_of_Tumors()
  // dePillis2007 - Seeking Bang Bang Solutions of Mixed ImmunoChemotherapy of Tumors
  // SEEKING BANG-BANG SOLUTIONS OF MIXED IMMUNO-CHEMOTHERAPY OF TUMORS
  // LISETTE G. DE PILLIS, K. RENEE FISTER, WEIQING GU,
  // CRAIG COLLINS, MICHAEL DAUB, DAVID GROSS, JAMES MOORE, BEN PRESKILL*
  // Abstract.
  // It is known that a beneficial cancer treatment approach for a single patient often involves the administration of more than one type of therapy. The question of how best to combine multiple cancer therapies, however, is still open. In this study, we investigate the theoretical interaction of three treatment types (two biological therapies and one chemotherapy) with a growing cancer, and present an analysis of an optimal control strategy for administering all three therapies in combination. In the situations with controls introduced linearly, we find that there are conditions on which the controls exist singularly. Although bang-bang controls (on-off) reflect the drug treatment approach that is often implemented clinically, we have demonstrated, in the context of our mathematical model, that there can exist regions on which this may not be the best strategy for minimizing a tumor burden. We characterize the controls in singular regions by taking time derivatives of the switching functions. We will examine these representations and the conditions necessary for the controls to be minimizing in the singular region. We begin by assuming only one of the controls is singular on a given interval. Then we analyze the conditions on which a pair and then all three controls are singular
  // isDescribedBy ISSN: 1072-669
  // isDerivedFrom pubmed:16153659
  // hasProperty mamo:MAMO_0000046

  // Compartments:
  compartment compartment = 1;

  // Species:
  species T in compartment = 1;
  species N in compartment = 1;
  species L in compartment = 1;
  species C in compartment = 1;
  species M in compartment = 1;
  species I in compartment = 1;

  // Parameters:
  a = 0;
  b = 0;
  c = 0;
  K_T = 0;
  delta_T = 0;
  e_f = 0;
  f = 0;
  p = 0;
  p_N = 0;
  g_N = 0;
  K_n = 0;
  delta_N = 0;
  m = 0;
  theta = 0;
  q = 0;
  r1 = 0;
  r2 = 0;
  p_I = 0;
  g_I = 0;
  u_0 = 0;
  kappa = 0;
  j = 0;
  k = 0;
  K_L = 0;
  delta_L = 0;
  eta_1 = 0;
  v_L = 0;
  alpha = 0;
  beta = 0;
  K_C = 0;
  delta_C = 0;
  gamma = 0;
  eta_2 = 0;
  v_M = 0;
  mu_I = 0;
  psi = 0;
  omega = 0;
  zeta = 0;
  eta_3 = 0;
  v_I = 0;
  d = 0;
  l = 0;
  s = 0;
  n = 0;
  D = 0;
  e = 0;

  // Reactions:
  Logistic_tumor_growth: => T; compartment*Function_for_logistic_tumor_growth(a, T, b);
  NK_induced_tumor_death: T => ; compartment*Function_for_NK_induced_tumor_death(c, N, T);  // modifiers: N
  CD8__T_cell_induced_tumor_death: T => ; compartment*Function_for_CD8__T_cell_induced_tumor_death(D, T); CD8__T_cell_induced_tumor_death is "CD8+ T cell induced tumor death";
  Chemotherapy_induced_tumor_death: T => ; compartment*Function_for_chemotherapy_induced_tumor_death(K_T, delta_T, M, T);  // modifiers: M
  Production_of_NK_cell_from_circulating_lymphocytes: => N; compartment*Function_for_production_of_NK_cells_from_circulating_lymphocytes(e, C);  // modifiers: C
  Natural_killer_breakdown: N => ; compartment*function_for_natural_killer_breakdown(f, N);
  Natural_killer_death_by_exhaustion_of_tumor_killing_resources: N => ; compartment*Function_of_natural_killer_death_bt_exhaustion_of_tumor_killing_resources(p, N, T);  // modifiers: T
  Stimulatory_effect_of_IL_2_on_NK_cells: => N; compartment*Function_for_stimulatory_effect_of_Il_2_on_NK_cells(p_N, N, I, g_N); Stimulatory_effect_of_IL_2_on_NK_cells is "Stimulatory effect of IL-2 on NK cells";  // modifiers: I
  Death_of_NK_cells_due_to_medicine_toxicity: N => ; compartment*Function_for_death_of_NK_cells_due_to_medicinal_toxicity(K_n, delta_N, M, N);  // modifiers: M
  CD8__T_cell_breakdown: L => ; compartment*Function_for_CD8__T_cell_breakdown(theta, m, L, I); CD8__T_cell_breakdown is "CD8+ T cell breakdown";  // modifiers: I
  CD8__T_cell_death_by_exhaustion_of_tumor_killing_resources: L => ; compartment*Function_for_CD8__T_cell_death_by_exhaustion_of_tumor_killing_resources(q, L, T); CD8__T_cell_death_by_exhaustion_of_tumor_killing_resources is "CD8+ T cell death by exhaustion of tumor killing resources";  // modifiers: T
  CD8__T_cell_stimulation_by_NK_lysed_tumor_cell_debris: => L; compartment*Function_for_CD8__T_cell_stimumation_by_NK_lysed_tumor_cell_debris(r1, N, T); CD8__T_cell_stimulation_by_NK_lysed_tumor_cell_debris is "CD8+ T cell stimulation by NK lysed tumor cell debris";  // modifiers: N, T
  Activation_of_naive_CD8__T_cells_in_the_general_lymphocyte_population: => L; compartment*Function_for_activation_naive_CD8__T_cells_in_the_general_lymphocyte_population(r2, C, T); Activation_of_naive_CD8__T_cells_in_the_general_lymphocyte_population is "Activation of naive CD8+ T cells in the general lymphocyte population";  // modifiers: C, T
  Stimulatory_effect_of_IL_2_on_CD8__T_cell: => L; compartment*Function_for_stimulatory_effect_of_IL_2_on_CD8__T_cells(p_I, L, I, g_I); Stimulatory_effect_of_IL_2_on_CD8__T_cell is "Stimulatory effect of IL-2 on CD8+ T cell";  // modifiers: I
  Breakdown_of_surplus_CD8__T_cells_in_the_presence_of_IL_2: L => ; compartment*Function_for_breakdown_of_surplus_CD8__T_cells_in_the_presence_of_IL_2(u_0, L, C, I, kappa); Breakdown_of_surplus_CD8__T_cells_in_the_presence_of_IL_2 is "Breakdown of surplus CD8+ T cells in the presence of IL-2";  // modifiers: C, I
  CD8__T_cell_stimulation_by_CD8__T_cell_lysed_tumor_cell_debris: => L; compartment*Function_for_CD_8__T_cell_stimulation_by_CD8__T_cell_lysed_tumor_cell_debris(j, T, L, k); CD8__T_cell_stimulation_by_CD8__T_cell_lysed_tumor_cell_debris is "CD8+ T cell stimulation by CD8+ T cell lysed tumor cell debris";  // modifiers: T
  DEath_of_CD8__T_cells_due_to_medicinal_toxicity: L => ; compartment*Function_for_death_of_CD8__T_cells_due_to_medicinal_toxicity(K_L, delta_L, M, L); DEath_of_CD8__T_cells_due_to_medicinal_toxicity is "DEath of CD8+ T cells due to medicinal toxicity";  // modifiers: M
  External_TIL_therapy__controllable: => L; compartment*Function_for_external_TIL_therapy__controllable(eta_1, v_L); External_TIL_therapy__controllable is "External TIL therapy, controllable";
  Lymphocyte_synthesis_in_bone_marrow: => C; compartment*Function_for_lymphocyte_synthesis_in_bone_marrow(alpha);
  Lymphocyte_breakdown: C => ; compartment*Function_for_lymphocyte_breakdown(beta, C);
  Death_of_lymphocyte_due_to_medicinal_toxicity: C => ; compartment*Function_for_death_of_lymphocyte_due_to_medicinal_toxicity(K_C, delta_C, M, C);  // modifiers: M
  Excretion_and_breakdown_of_medicine: M => ; compartment*Function_for_excretion_and_breakdown_of_medicine(gamma, M);
  External_chemotherapy__controllable: => M; compartment*Function_for_external_chemotherapy__controllable(eta_2, v_M); External_chemotherapy__controllable is "External chemotherapy, controllable";
  IL_2_breakdown: I => ; compartment*Function_for_IL_2_breakdown(mu_I, I); IL_2_breakdown is "IL-2 breakdown";
  Production_of_Il_2_due_to_naive_CD8__T_cellls_and_CD4__T_cells: => I; compartment*Function_for_production_of_Il_2_due_to_naive_CD8__T_cells_and_CD4__T_cells(psi, C); Production_of_Il_2_due_to_naive_CD8__T_cellls_and_CD4__T_cells is "Production of Il-2 due to naive CD8+ T cellls and CD4+ T cells";  // modifiers: C
  Production_of_Il_2_from_activated_CD8__T_cells: => I; compartment*Function_for_production_of_Il_2_from_activated_CD8__T_cells(omega, L, I, zeta); Production_of_Il_2_from_activated_CD8__T_cells is "Production of Il-2 from activated CD8+ T cells";  // modifiers: L
  External_Il_2__controllable: => I; compartment*Function_for_external_Il_2_controllable(eta_3, v_I); External_Il_2__controllable is "External Il-2, controllable";

  // Unit definitions:
  unit volume = 1e-3 litre;
  unit substance = 1e-3 mole;
end
