// SBML level 2 version 4
// dcterms:bibliographicCitation: http://identifiers.org/pubmed/29879166

function Rate_Law_for_reaction_for_Y_1(LAMBDA_v, X1, Y1, beta, mu_v)
  LAMBDA_v*X1 - (beta + mu_v)*Y1;
end

function Rate_Law_for_reaction_for_Z_1(Y1, Z1, beta, mu_v)
  beta*Y1 - mu_v*Z1;
end

function Rate_Law_for_reaction_for_A_1(A1, E1, alpha_2, mu, rho)
  rho*E1 - (alpha_2 + mu)*A1;
end

function Rate_Law_for_reaction_for_E_1(E1, LAMBDA_h, S1, eta, mu, rho)
  LAMBDA_h*S1 - eta*E1 - rho*E1 - mu*E1;
end

function Rate_Law_for_reaction_for_R_1(A1, I1, R1, alpha_1, alpha_2, alpha_3, mu)
  alpha_1*I1 + alpha_2*A1 - alpha_3*R1 - mu*R1;
end

function Rate_Law_for_reaction_for_S_1(GAMMA, LAMBDA_h, R1, S1, alpha_3, mu)
  GAMMA - LAMBDA_h*S1 + alpha_3*R1 - mu*S1;
end

function Rate_Law_for_reaction_for_X_1(LAMBDA_v, Psi, X1, mu_v)
  Psi - LAMBDA_v*X1 - mu_v*X1;
end

function Rate_Law_for_reaction_for_I_1(E1, I1, alpha_1, delta, eta, mu)
  eta*E1 - (alpha_1 + delta + mu)*I1;
end

function Rate_Law_for_reaction_for_A_0(rho, E, alpha_2, mu, A)
  rho*E - (alpha_2 + mu)*A;
end

function Rate_Law_for_reaction_for_I_0(eta, E, alpha_1, delta, mu, I)
  eta*E - (alpha_1 + delta + mu)*I;
end

function Rate_Law_for_reaction_for_E_0(LAMBDA_h, S, eta, E, rho, mu)
  LAMBDA_h*S - eta*E - rho*E - mu*E;
end

function Rate_Law_for_reaction_for_R_0(alpha_1, I, alpha_2, A, alpha_3, R, mu)
  alpha_1*I + alpha_2*A - alpha_3*R - mu*R;
end

function Rate_Law_for_reaction_for_Y_0(LAMBDA_v, X, beta, mu_v, Y)
  LAMBDA_v*X - (beta + mu_v)*Y;
end

function Rate_Law_for_reaction_for_X_0(Psi, LAMBDA_v, X, mu_v)
  Psi - LAMBDA_v*X - mu_v*X;
end

function Rate_Law_for_reaction_for_Z_0(beta, Y, mu_v, Z)
  beta*Y - mu_v*Z;
end

function Rate_Law_for_reaction_for_S_0(GAMMA, LAMBDA_h, S, alpha_3, R, mu)
  GAMMA - LAMBDA_h*S + alpha_3*R - mu*S;
end

model Mukhta2018_the_effect_of_bednet_coverage_on_malaria_transmission_in_South_Sudan()
  // Mukhta2018-the effect of bednet coverage on malaria transmission in South Sudan
  // A campaign for malaria control, using Long Lasting Insecticide Nets (LLINs) was launched in South Sudan in 2009. The success of such a campaign often depends upon adequate available resources and reliable surveillance data which help officials understand existing infections. An optimal allocation of resources for malaria control at a sub-national scale is therefore paramount to the success of efforts to reduce malaria prevalence. In this paper, we extend an existing SIR mathematical model to capture the effect of LLINs on malaria transmission. Available data on malaria is utilized to determine realistic parameter values of this model using a Bayesian approach via Markov Chain Monte Carlo (MCMC) methods. Then, we explore the parasite prevalence on a continued rollout of LLINs in three different settings in order to create a sub-national projection of malaria. Further, we calculate the model's basic reproductive number and study its sensitivity to LLINs' coverage and its efficacy. From the numerical simulation results, we notice a basic reproduction number, [Formula: see text], confirming a substantial increase of incidence cases if no form of intervention takes place in the community. This work indicates that an effective use of LLINs may reduce [Formula: see text] and hence malaria transmission. We hope that this study will provide a basis for recommending a scaling-up of the entry point of LLINs' distribution that targets households in areas at risk of malaria.
  // Model is encoded by Ruby and submitted to BioModels by Ahmad Zyoud
  // hasProperty mamo:MAMO_0000046
  // hasProperty ncit:C34797
  // hasProperty ncit:C15716
  // isDerivedFrom http://identifiers.org/pubmed/18166074
  // isDerivedFrom mamo:MAMO_0000046 ncit:C34797 ncit:C15716 taxonomy:9606 http://identifiers.org/pubmed/18166074
  // hasTaxon taxonomy:9606

  // Compartments:
  compartment compartment = 1;

  // Species:
  species A1 in compartment = 0;
  species E1 in compartment = 0;
  species I1 in compartment = 300;
  species R1 in compartment = 0;
  species S1 in compartment = 882846;
  species X1 in compartment = 600;
  species Y1 in compartment = 0;
  species Z1 in compartment = 0;

  // Parameters:
  mu = 6.614e-5;
  sigma_a = 0.2;
  rho = 0.0071;
  delta = 0.0004;
  GAMMA = 0;
  sigma_i = 0.6792;
  b = 0.4356804;
  epsilon_j = 91.6;
  alpha_1 = 0.02169197;
  alpha_3 = 0.5882;
  Psi = 0.13;
  chi = 0;
  phi = 0.89;
  s = 0.03;
  r = 0.56;
  tau1 = 0.69;
  tau2 = 2.31;
  beta1 = 0.91;
  beta2 = 0.74;
  var Z_0;

  // Assignment rules:
  Z_0 := phi*chi*r;
  eta := 1/12;
  N := S1 + E1 + I1 + A1 + R1;
  LAMBDA_h := epsilon_j*Z1/N*b;
  W := 1 + chi*phi*(s - 1);
  f := 1/3;
  M := X1 + Y1 + Z1;
  LAMBDA_v := (sigma_a*epsilon_j*A1 + sigma_i*epsilon_j*I1)/N;
  beta := (beta1*beta2*W/(1 - Z_0*beta1))^f;
  mu_v := -ln(beta);
  alpha_2 := 1/200;

  // Reactions:
  reaction_for_A: => A1; compartment*Rate_Law_for_reaction_for_A_1(A1, E1, alpha_2, mu, rho);  // modifiers: E1
  reaction_for_E: => E1; compartment*Rate_Law_for_reaction_for_E_1(E1, LAMBDA_h, S1, eta, mu, rho);  // modifiers: S1
  reaction_for_I: => I1; compartment*Rate_Law_for_reaction_for_I_1(E1, I1, alpha_1, delta, eta, mu);  // modifiers: E1
  reaction_for_R: => R1; compartment*Rate_Law_for_reaction_for_R_1(A1, I1, R1, alpha_1, alpha_2, alpha_3, mu);  // modifiers: I1, A1
  reaction_for_S: => S1; compartment*Rate_Law_for_reaction_for_S_1(GAMMA, LAMBDA_h, R1, S1, alpha_3, mu);  // modifiers: R1
  reaction_for_X: => X1; compartment*Rate_Law_for_reaction_for_X_1(LAMBDA_v, Psi, X1, mu_v);
  reaction_for_Y: => Y1; compartment*Rate_Law_for_reaction_for_Y_1(LAMBDA_v, X1, Y1, beta, mu_v);  // modifiers: X1
  reaction_for_Z: => Z1; compartment*Rate_Law_for_reaction_for_Z_1(Y1, Z1, beta, mu_v);  // modifiers: Y1

  // Unit definitions:
  unit volume = 1e-3 litre;
  unit time = 86400 second;
  unit substance = 1e-3 mole;
end
