// SBML level 2 version 4
// dcterms:bibliographicCitation: urn:miriam:pubmed:24513243

model Rodrigues2014_Vaccination_models_and_optimal_control_strategies_to_dengue()
  // Rodrigues2014-Vaccination models and optimal control strategies to dengue
  // As the development of a dengue vaccine is ongoing, we simulate an hypothetical vaccine as an extra protection to the population. In a first phase, the vaccination process is studied as a new compartment in the model, and different ways of distributing the vaccines investigated: pediatric and random mass vaccines, with distinct levels of efficacy and durability. In a second step, the vaccination is seen as a control variable in the epidemiological process. In both cases, epidemic and endemic scenarios are included in order to analyze distinct outbreak realities
  // Model is encoded by Ruby and submitted to BioModels by Ahmad Zyoud.
  // hasTaxon taxonomy:9606
  // isDescribedBy pubmed:24513243
  // hasProperty ncit:C34528 ncit:C923 mamo:MAMO_0000046

  // Compartments:
  compartment compartment = 1;

  // Species:
  species $S_h in compartment = 379990;
  species $V_h in compartment = 0;
  species $I_h in compartment = 10;
  species $R_h in compartment = 100000;
  species $A_m in compartment = 1440000;
  species $S_m in compartment = 1440000;
  species $I_m in compartment = 0;

  // Parameters:
  N_h = 480000;
  B = 0.17974;
  beta_mh = 0.21;
  beta_hm = 0.21;
  eta_h = 0.33333333;
  mu_m = 0.1;
  phi = 6;
  mu_A = 0.25;
  eta_A = 0.08;
  m = 3;
  k = 3;
  p = 0;

  // Assignment rules:
  mu_h := 1/(71*365);

  // Rate rules:
  S_h' = (1 - p)*mu_h*N_h - (B*beta_mh*(I_m/N_h) + mu_h)*S_h;
  V_h' = p*mu_h*N_h - mu_h*V_h;
  I_h' = B*beta_mh*(I_m/N_h)*S_h - (eta_h + mu_h)*I_h;
  R_h' = eta_h*I_h - mu_h*R_h;
  A_m' = phi*(1 - A_m/(k*N_h))*(S_m + I_m) - (eta_A + mu_A)*A_m;
  S_m' = eta_A*A_m - (B*beta_hm*(I_h/N_h) + mu_h)*S_m;
  I_m' = B*beta_hm*(I_h/N_h)*S_m - mu_m*I_m;

  // Unit definitions:
  unit volume = 1e-3 litre;
  unit time = 86400 second;
  unit substance = 1e-3 mole;
end
