// SBML level 2 version 4
// dcterms:bibliographicCitation: urn:miriam:pubmed:21168463

function Blood_flow(conc, FreeX, BloodFlow)
  conc*FreeX*BloodFlow;
end

function Filtrate_to_storage(Qfil, Cfil)
  Qfil*Cfil;
end

function Oral_dose(Input2, factor)
  Input2*factor;
end

function Filtrate_to_Kidney(Tm, Cfil, Kt)
  Tm*(Cfil/(Kt + Cfil));
end

model Loccisano2011_pharmacokinetics_of_PFOA_and_PFOS_in_the_monkey()
  // Loccisano2011-pharmacokinetics of PFOA and PFOS in the monkey
  // Perfluoroalkyl acid carboxylates and sulfonates (PFAAs) have many consumer and industrial applications. The persistence and widespread distribution of these compounds in humans have brought them under intense scrutiny. Limited pharmacokinetic data is available in humans; however, human data exists for two communities with drinking water contaminated by PFAAs. Also, there is toxicological and pharmacokinetic data for monkeys, which can be quite useful for cross-species extrapolation to humans. The goal of this research was to develop a physiologically-based pharmacokinetic (PBPK) model for PFOA and PFOS for monkeys and then scale this model to humans in order to describe available human drinking water data. The monkey model simulations were consistent with available PK data for monkeys. The monkey model was then extrapolated to the human and then used to successfully simulate the data collected from residents of two communities exposed to PFOA in drinking water. Human PFOS data is minimal; however, using the half-life estimated from occupational exposure, our model exhibits reasonable agreement with the available human serum PFOS data. It is envisioned that our PBPK model will be useful in supporting human health risk assessments for PFOA and PFOS by aiding in understanding of human pharmacokinetics.
  // Model is encoded by Ruby and submitted to BioModels by Ahmad Zyoud
  // hasTaxon taxonomy:70699
  // isDescribedBy pubmed:21168463
  // hasProperty ncit:C15299 mamo:MAMO_0000203

  // Compartments:
  compartment Plasma;
  compartment Gut;
  compartment Liver;
  compartment Fat;
  compartment Skin;
  compartment Rest_of_body;
  compartment Kidney;
  compartment Filtrate;

  // Species:
  substanceOnly species Plasma_0 in Plasma = 448;
  substanceOnly species Gut_0 in Gut = 0;
  substanceOnly species Liver_0 in Liver = 0;
  substanceOnly species Fat_0 in Fat = 0;
  substanceOnly species Skin_0 in Skin = Dermdose*Skin;
  substanceOnly species Restofbody in Rest_of_body = 0;
  substanceOnly species Kidney_0 in Kidney = 0;
  substanceOnly species FIltrate in Filtrate = 0;
  substanceOnly species Storage in Filtrate = 0;
  substanceOnly species Urine in Filtrate = 0;
  substanceOnly species Filtrate_0 in Plasma = 0;

  // Parameters:
  QCC = 15;
  QFC = 0.02;
  QLC = 0.2;
  QKC = 0.123;
  QfilC = 0.0246;
  QSkC = 0.048;
  QGC = 0.096;
  BW = 4;
  VLC = 0.026;
  VFC = 0.05;
  VKC = 0.004;
  VfilC = 0.0004;
  VGC = 0.0138;
  VPlasC = 0.0448;
  Htc = 0.41;
  Skinthickness = 0.1;
  Tmc = 0.15;
  Kt = 0.055;
  Free = 0.02;
  PL = 2.2;
  PF = 0.04;
  PK = 1.05;
  PSk = 0.1;
  PR = 0.12;
  PG = 0.05;
  kurinec = 50;
  tchng = 4320;
  Dermconc = 0;
  Dermvol = 0;
  Skinarea = 5;
  toral = 0.6;
  input = 10;
  inputIV = 10;

  // Assignment rules:
  FreeSk := Free/PSk;
  kurine := kurinec*BW^(-0.25);
  FreeF := Free/PF;
  FreeK := Free/PK;
  SkinTarea := 9.1*(BW*1000)^0.666;
  FreeL := Free/PL;
  Fat := VFC*BW;
  Skin := Skinarea*Skinthickness/1000;
  Plasma := VPlasC*BW;
  Liver := VLC*BW;
  Kidney := VKC*BW;
  Gut := VGC*BW;
  Filtrate := VfilC*BW;
  Rest_of_body := 0.84*BW - Liver - Fat - Kidney - Filtrate - Gut - Plasma - Skin;
  CF := Fat_0/Fat/Fat;
  CVF := CF/PF;
  CSk := Skin_0/Skin/Skin;
  CG := Gut_0/Gut/Gut;
  CK := Kidney_0/Kidney/Kidney;
  Curine := 1000*(Urine/Filtrate)/kurine;
  CVK := CK/PK;
  CR := Restofbody/Rest_of_body/Rest_of_body;
  CVR := CR/PR;
  Cfil := FIltrate/Filtrate/Filtrate;
  CVSk := CSk/PSk;
  CVG := CG/PG;
  CL := Liver_0/Liver/Liver;
  CVL := CL/PL;
  factor := piecewise(1, time < tchng, 0);
  QC := QCC*BW^0.75;
  input1 := BW*input/toral;
  input2 := piecewise(input1, piecewise(time - 24*ceil(time/24), xor(time < 0, 24 < 0), time - 24*floor(time/24)) < toral, 0);
  FreeG := Free/PG;
  FreeR := Free/PR;
  QCP := QC*(1 - Htc);
  QL := QLC*QCP;
  Dermdose := Dermconc*Dermvol*1000;
  IVdose := inputIV*BW;
  QF := QFC*QCP;
  QK := QKC*QCP;
  Qfil := 0.2*QK;
  QG := QGC*QCP;
  QSk := piecewise(QSkC*QCP*(Skinarea/SkinTarea), Dermconc > 0, 0);
  QR := QCP - QL - QF - QK - Qfil - QG - QSk;
  Qbal := QCP - (QL + QF + QK + Qfil + QG + QSk);
  CAFree := Plasma_0/Plasma/Plasma;
  CA := CAFree/Free;
  Tm := Tmc*BW^0.75;

  // Reactions:
  reaction_1: Plasma_0 => Gut_0; Blood_flow(CA, Free, QG);
  reaction_2: Gut_0 => Plasma_0; Blood_flow(CG, FreeG, CVG);
  reaction_3: Gut_0 => Liver_0; Blood_flow(CG, FreeG, QG);
  reaction_4: Plasma_0 => Liver_0; Blood_flow(CA, Free, QL);
  reaction_5: Liver_0 => Plasma_0; Blood_flow(CL, FreeL, CVL);
  reaction_6: Plasma_0 => Fat_0; Blood_flow(CA, Free, QF);
  reaction_7: Fat_0 => Plasma_0; Blood_flow(CF, FreeF, CVF);
  reaction_8: Plasma_0 => Skin_0; Blood_flow(CA, Free, QSk);
  reaction: Skin_0 => Plasma_0; Blood_flow(CSk, FreeSk, CVSk);
  reaction_9: Plasma_0 => Restofbody; Blood_flow(CA, Free, QR);
  reaction_10: Restofbody => Plasma_0; Blood_flow(CR, FreeR, CVR);
  reaction_11: Plasma_0 => Kidney_0; Blood_flow(CA, Free, QK);
  reaction_12: Kidney_0 => Plasma_0; Blood_flow(CK, FreeK, CVK);
  reaction_13: Plasma_0 => Filtrate_0; Plasma*Blood_flow(CA, Free, Qfil);
  reaction_14: Filtrate_0 => Kidney_0; Filtrate_to_Kidney(Tm, Cfil, Kt);
  reaction_15: Filtrate_0 => Storage; Filtrate_to_storage(Qfil, Cfil);
  reaction_16: Storage => Urine; kurine*Storage;
  reaction_17: => Gut_0; Gut*Oral_dose(input2, factor);

  // Unit definitions:
  unit time = 86400 second;
end
