// SBML level 2 version 4
// dcterms:bibliographicCitation: urn:miriam:pubmed:31452933

function Constant_flux__irreversible(v)
  v;
end
Constant_flux__irreversible is "Constant flux (irreversible)";

function Function_for_v20(Met_Itg, Peptide, Met_Itg_diss_peptide)
  Met_Itg*Peptide*Met_Itg_diss_peptide;
end

function Function_for_v27(PI3K, PI3K_activation_by_Ras_active, Ras_active)
  PI3K*PI3K_activation_by_Ras_active*Ras_active;
end

function Function_for_v13(pMet_Itg_i, pMet_recycling, pMet_Itg_recyc_factor)
  pMet_Itg_i*pMet_recycling*pMet_Itg_recyc_factor;
end

function Function_for_v2(Met, Met_prod_deg_ss, Met_max)
  Met*Met_prod_deg_ss/Met_max;
end

function Function_for_v4(Itg, Met, Met_Itg_unbinding, KD_Met_Itg)
  Itg*Met*Met_Itg_unbinding/KD_Met_Itg;
end

function Function_for_v11(pMet_Itg, pMet_internalization, pMet_Itg_intern_factor)
  pMet_Itg*pMet_internalization*pMet_Itg_intern_factor;
end

function Function_for_v9(pMet, KD_HGF_Met, Met_activation)
  pMet*KD_HGF_Met*Met_activation;
end

function Function_for_v7(pMet_Itg, KD_HGF_Met, Met_activation)
  pMet_Itg*KD_HGF_Met*Met_activation;
end

function Function_for_v5(Met_Itg, Met_Itg_unbinding)
  Met_Itg*Met_Itg_unbinding;
end

function Function_for_v15(pMet_Itg_i, pMet_i_degradation, pMet_Itg_i_deg_factor)
  pMet_Itg_i*pMet_i_degradation*pMet_Itg_i_deg_factor;
end

function Function_for_v17(Itg, Itg_prod_deg_ss, Itg_max)
  Itg*Itg_prod_deg_ss/Itg_max;
end

function Function_for_v3(Met_Itg, Met_Itg_deg_ss, Met_max)
  Met_Itg*Met_Itg_deg_ss/Met_max;
end

function Function_for_v18(Itg, Peptide, Peptide_Itg_unbinding, KD_Peptide_Itg)
  Itg*Peptide*Peptide_Itg_unbinding/KD_Peptide_Itg;
end

function Function_for_v22(Gab1, Gab1_pMet_binding, pMet, pMet_i, pMet_Itg, pMet_Itg_i, Met_inhib)
  Gab1*Gab1_pMet_binding*(pMet + pMet_i + pMet_Itg + pMet_Itg_i)*(1 - Met_inhib);
end

function Function_for_v24(Gab1, Gab1_pMet_binding_by_PI3K_active, PI3K_active, pMet)
  Gab1*Gab1_pMet_binding_by_PI3K_active*PI3K_active*pMet;
end

function Function_for_v25(Gab1_pMet, PI3K, PI3K_activation_by_Gab1)
  Gab1_pMet*PI3K*PI3K_activation_by_Gab1;
end

function Function_for_v28(Gab1_pMet, PI3K, PI3K_activation_by_pERK, pERK)
  Gab1_pMet*PI3K*PI3K_activation_by_pERK*pERK;
end

function Function_for_v38(mSOS_pMet, Ras, Ras_activation_by_mSOS)
  Ras*Ras_activation_by_mSOS*mSOS_pMet;
end

function Function_for_v45(MEK, MEK_phosphorylation_by_pRaf, pRaf)
  MEK*MEK_phosphorylation_by_pRaf*pRaf;
end

function Function_for_v40(Raf, Raf_activation, Ras_active)
  Raf*Raf_activation*Ras_active;
end

function Function_for_v29(Akt, Akt_activation_supported_by_PDK1, PI3K_active, PI3K_inhib)
  Akt*Akt_activation_supported_by_PDK1*PI3K_active*(1 - PI3K_inhib);
end

function Function_for_v48(ERK, ERK_phosphorylation_by_pMEK, MEK_inhib, pMEK)
  ERK*ERK_phosphorylation_by_pMEK*(1 - MEK_inhib)*pMEK;
end

function Function_for_v52(pRSK_phosphorylation_by_PDK1, PDK_inhib, pRSK)
  pRSK_phosphorylation_by_PDK1*(1 - PDK_inhib)*pRSK;
end

function Function_for_v35(SOS, SOS_recruitment_by_pMet, pMet, pMet_i, pMet_Itg, pMet_Itg_i, Met_inhib)
  SOS*SOS_recruitment_by_pMet*(pMet + pMet_i + pMet_Itg + pMet_Itg_i)*(1 - Met_inhib);
end

function Function_for_v37(ppRSK, mSOS_pMet, mSOS_release_by_ppRSK)
  ppRSK*mSOS_pMet*mSOS_release_by_ppRSK;
end

function Function_for_v47(MEK, MEK_phosphorylation_by_PDK1, PDK_inhib, pRaf)
  MEK*MEK_phosphorylation_by_PDK1*(1 - PDK_inhib)*pRaf;
end

function Function_for_v42(Raf, Raf_activation_by_pERK, Ras_active, pERK, ERK_inhib)
  Raf*Raf_activation_by_pERK*Ras_active*pERK*(1 - ERK_inhib);
end

function Function_for_v50(RSK, RSK_phosphorylation_by_pERK, pERK, ERK_inhib)
  RSK*RSK_phosphorylation_by_pERK*pERK*(1 - ERK_inhib);
end

function Function_for_v58(Met_Itg, Cabozantinib, Cabozantinib_unbinding, KD_Cabozantinib)
  Met_Itg*Cabozantinib*Cabozantinib_unbinding/KD_Cabozantinib;
end

function Function_for_v31(Gab1_pMet, Rac, Rac_activation)
  Gab1_pMet*Rac*Rac_activation;
end

function Function_for_v44(pAkt, pRaf, pRaf_dephosphorylation_by_Akt, Akt_inhib)
  pAkt*pRaf*pRaf_dephosphorylation_by_Akt*(1 - Akt_inhib);
end

function Function_for_v54(Raf, Sorafenib, Sorafenib_unbinding, KD_Sorafenib)
  Raf*Sorafenib*Sorafenib_unbinding/KD_Sorafenib;
end

function Function_for_v56(Met, Cabozantinib, Cabozantinib_unbinding, KD_Cabozantinib)
  Met*Cabozantinib*Cabozantinib_unbinding/KD_Cabozantinib;
end

function Function_for_v33(PAK1, PAK_phosphorylation, Rac_active)
  PAK1*PAK_phosphorylation*Rac_active;
end

function Function_for_v43(Raf, Raf_activation_by_PAK, Ras_active, pPAK1)
  Raf*Raf_activation_by_PAK*Ras_active*pPAK1;
end

model Jafarnejad2019___Mechanistically_detailed_systems_biology_modeling_of_the_HGF_Met_pathway_in_hepatocellular_carcinoma()
  // Jafarnejad2019 - Mechanistically detailed systems biology modeling of the HGF/Met pathway in hepatocellular carcinoma
  // Hepatocyte growth factor (HGF) signaling through its receptor Met has been implicated in hepatocellular carcinoma tumorigenesis and progression. Met interaction with integrins is shown to modulate the downstream signaling to Akt and ERK (extracellular-regulated kinase). In this study, we developed a mechanistically detailed systems biology model of HGF/Met signaling pathway that incorporated specific interactions with integrins to investigate the efficacy of integrin-binding peptide, AXT050, as monotherapy and in combination with other therapeutics targeting this pathway. Here we report that the modeled dynamics of the response to AXT050 revealed that receptor trafficking is sufficient to explain the effect of Met-integrin interactions on HGF signaling. Furthermore, the model predicted patient-specific synergy and antagonism of efficacy and potency for combination of AXT050 with sorafenib, cabozantinib, and rilotumumab. Overall, the model provides a valuable framework for studying the efficacy of drugs targeting receptor tyrosine kinase interaction with integrins, and identification of synergistic drug combinations for the patients.
  // Model is encoded by Johannes and submitted to BioModels by Ahmad Zyoud.
  // occursIn BTO:0000575
  // hasTaxon taxonomy:9606
  // isDescribedBy pubmed:31452933
  // hasProperty ncit:C20428 ncit:C3099 mamo:MAMO_0000046

  // Compartments:
  compartment Hepatocyte = 1;
  compartment Tumor = 1;

  // Species:
  species Itg in Hepatocyte = 15527;
  species Met_Itg in Hepatocyte = 6590;
  species pMet in Hepatocyte = 0;
  species pMet_i in Hepatocyte = 0;
  species pMet_Itg in Hepatocyte = 0;
  species pMet_Itg_i in Hepatocyte = 0;
  species pMet_total in Hepatocyte = 0;
  species pMet_i_total in Hepatocyte = 0;
  species Met_pMet_s_total in Hepatocyte = 6600;
  species pMet_s_total in Hepatocyte = 0;
  species Gab1 in Hepatocyte = 5914;
  species Gab1_pMet in Hepatocyte = 0;
  species PI3K in Hepatocyte = 1976;
  species PI3K_active in Hepatocyte = 0;
  species Akt in Hepatocyte = 32983;
  species pAkt in Hepatocyte = 0;
  species Rac in Hepatocyte = 731654;
  species Rac_active in Hepatocyte = 0;
  species PAK1 in Hepatocyte = 2000;
  species pPAK1 in Hepatocyte = 0;
  species SOS in Hepatocyte = 6948;
  species mSOS_pMet in Hepatocyte = 0;
  species Ras in Hepatocyte = 30826;
  species Ras_active in Hepatocyte = 0;
  species Raf in Hepatocyte = 89608;
  species pRaf in Hepatocyte = 0;
  species MEK in Hepatocyte = 259694;
  species pMEK in Hepatocyte = 0;
  species ERK in Hepatocyte = 232907;
  species pERK in Hepatocyte = 0;
  species RSK in Hepatocyte = 70636;
  species pRSK in Hepatocyte = 0;
  species ppRSK in Hepatocyte = 0;
  species PDK1 in Hepatocyte = 56563;
  species Peptide_Itg in Hepatocyte = 0;
  species Sorafenib_Raf in Hepatocyte = 0;
  species Cabozantinib_Met in Hepatocyte = 0;
  species Cabozantinib_Met_Itg in Hepatocyte = 0;
  species Met_max in Hepatocyte = 9454;
  species Itg_max in Hepatocyte = 51270;
  species Akt_max in Hepatocyte = 32983;
  species Raf_max in Hepatocyte = 89608;
  species MEK_max in Hepatocyte = 259694;
  species ERK_max in Hepatocyte = 232907;
  species RSK_max in Hepatocyte = 70636;
  species $HGF in Tumor = 40;
  species Peptide in Tumor = 0;
  species Sorafenib in Tumor = 0;
  species Cabozantinib in Tumor = 0;
  species Met in Hepatocyte = 9;

  // Parameters:
  KD_HGF_Met = 0.025;
  KD_Met_Itg = 1975.376;
  Met_prod_deg_ss = 100;
  Met_Itg_deg_ss = 100;
  Itg_prod_deg_ss = 1;
  Met_activation = 0.364046;
  pMet_internalization = 9.79571;
  pMet_recycling = 0.342383;
  pMet_i_degradation = 10;
  pMet_Itg_intern_factor = 0.10753;
  pMet_Itg_recyc_factor = 9.999978;
  pMet_Itg_i_deg_factor = 0.040611;
  Met_Itg_unbinding = 0.044066;
  Gab1_pMet_binding = 0.000297;
  Gab1_pMet_diss = 0.364726;
  Gab1_pMet_binding_by_PI3K_active = 1e-5;
  PI3K_activation_by_Gab1 = 1.49e-5;
  PI3K_inactivation = 1.047623;
  PI3K_activation_by_Ras_active = 1.1e-8;
  PI3K_activation_by_pERK = 2.02e-9;
  Akt_activation_supported_by_PDK1 = 0.004949;
  pAkt_deactivation = 5.326702;
  Rac_activation = 1.58e-7;
  Rac_deactivation = 2.32e-5;
  PAK_phosphorylation = 1.05e-5;
  PAK_dephosphorylation = 1e-5;
  SOS_recruitment_by_pMet = 6.88e-6;
  mSOS_release_from_membrane = 0.178008;
  mSOS_release_by_ppRSK = 0.109027;
  Ras_activation_by_mSOS = 0.000459;
  Ras_deactivation = 1.506371;
  Raf_activation = 1.68e-5;
  Raf_inactivation = 725.4092;
  Raf_activation_by_pERK = 0.004144;
  Raf_activation_by_PAK = 0.001646;
  pRaf_dephosphorylation_by_Akt = 0.284073;
  MEK_phosphorylation_by_pRaf = 4.6e-9;
  MEK_phosphorylation_by_PDK1 = 1.92e-6;
  MEK_dephosphorylation = 1.975952;
  ERK_phosphorylation_by_pMEK = 4.36e-7;
  ERK_dephosphorylation = 0.196965;
  RSK_phosphorylation_by_pERK = 2.24e-5;
  pRSK_dephosphorylation = 1.535599;
  pRSK_phosphorylation_by_PDK1 = 0.037926;
  ppRSK_dephosphorylation = 0.277526;
  MEK_inhib = 0.927106;
  PDK_inhib = 0.570295;
  ERK_inhib = 1;
  Akt_inhib = 1;
  PI3K_inhib = 1;
  Met_inhib = 1;
  KD_Peptide_Itg = 99.27186;
  Peptide_Itg_unbinding = 0.000107;
  Met_Itg_diss_peptide = 0.008937;
  KD_Sorafenib = 5.632727;
  Sorafenib_unbinding = 0.073581;
  KD_Cabozantinib = 1.3;
  Cabozantinib_unbinding = 0.01;
  KD_Rilotumumab = 0.22;
  Met_scale = 1;
  Itg_scale = 1;
  Akt_scale = 0.089066;
  Raf_scale = 0.492365;
  MEK_scale = 0.021995;
  ERK_scale = 0.006316;
  pRSK_scale = 0.025376;
  ppRSK_scale = 0.00229;
  var pMet_total_0;
  var pMet_i_total_0;
  var Met_pMet_s_total_0;
  var pMet_s_total_0;

  // Assignment rules:
  Met_pMet_s_total_0 := Met + Met_Itg + pMet + pMet_Itg;
  pMet_s_total_0 := pMet + pMet_Itg_i;
  pMet_total_0 := pMet + pMet_i + pMet_Itg + pMet_Itg_i;
  pMet_i_total_0 := pMet_i + pMet_Itg_i;

  // Reactions:
  v1: => Met; Hepatocyte*Constant_flux__irreversible(Met_prod_deg_ss);
  v2: Met => ; Hepatocyte*Function_for_v2(Met, Met_prod_deg_ss, Met_max);  // modifiers: Met_max
  v3: Met_Itg => ; Hepatocyte*Function_for_v3(Met_Itg, Met_Itg_deg_ss, Met_max);  // modifiers: Met_max
  v4: Itg + Met => Met_Itg; Hepatocyte*Function_for_v4(Itg, Met, Met_Itg_unbinding, KD_Met_Itg);
  v5: Met_Itg => Itg + Met; Hepatocyte*Function_for_v5(Met_Itg, Met_Itg_unbinding);
  v6: $HGF + Met_Itg => pMet_Itg; Met_activation*HGF*Met_Itg;
  v7: pMet_Itg => Met_Itg; Hepatocyte*Function_for_v7(pMet_Itg, KD_HGF_Met, Met_activation);
  v8: $HGF + Met => pMet; Met_activation*HGF*Met;
  v9: pMet => Met; Hepatocyte*Function_for_v9(pMet, KD_HGF_Met, Met_activation);
  v10: pMet => pMet_i; Hepatocyte*pMet_internalization*pMet;
  v11: pMet_Itg => pMet_Itg_i; Hepatocyte*Function_for_v11(pMet_Itg, pMet_internalization, pMet_Itg_intern_factor);
  v12: pMet_i => Met; Hepatocyte*pMet_recycling*pMet_i;
  v13: pMet_Itg_i => Met_Itg; Hepatocyte*Function_for_v13(pMet_Itg_i, pMet_recycling, pMet_Itg_recyc_factor);
  v14: pMet_i => ; Hepatocyte*pMet_i_degradation*pMet_i;
  v15: pMet_Itg_i => ; Hepatocyte*Function_for_v15(pMet_Itg_i, pMet_i_degradation, pMet_Itg_i_deg_factor);
  v16: => pMet_Itg_i; Hepatocyte*Constant_flux__irreversible(Itg_prod_deg_ss);
  v17: Itg => ; Hepatocyte*Function_for_v17(Itg, Itg_prod_deg_ss, Itg_max);  // modifiers: Itg_max
  v18: Itg + Peptide => Peptide_Itg; Function_for_v18(Itg, Peptide, Peptide_Itg_unbinding, KD_Peptide_Itg);
  v19: Peptide_Itg => Itg + Peptide; Peptide_Itg_unbinding*Peptide_Itg;
  v20: Met_Itg + Peptide => Itg + Met + Peptide; Function_for_v20(Met_Itg, Peptide, Met_Itg_diss_peptide);
  v21: pMet_Itg + Peptide => Itg + Met + Peptide; Met_Itg_diss_peptide*pMet_Itg*Peptide;
  v22: Gab1 => Gab1_pMet; Hepatocyte*Function_for_v22(Gab1, Gab1_pMet_binding, pMet, pMet_i, pMet_Itg, pMet_Itg_i, Met_inhib);  // modifiers: pMet, pMet_i, pMet_Itg, pMet_Itg_i
  v23: Gab1_pMet => Gab1; Hepatocyte*Gab1_pMet_diss*Gab1_pMet;
  v24: Gab1 => Gab1_pMet; Hepatocyte*Function_for_v24(Gab1, Gab1_pMet_binding_by_PI3K_active, PI3K_active, pMet);  // modifiers: PI3K_active, pMet
  v25: PI3K => PI3K_active; Hepatocyte*Function_for_v25(Gab1_pMet, PI3K, PI3K_activation_by_Gab1);  // modifiers: Gab1_pMet
  v26: PI3K_active => PI3K; Hepatocyte*PI3K_inactivation*PI3K_active;
  v27: PI3K => PI3K_active; Hepatocyte*Function_for_v27(PI3K, PI3K_activation_by_Ras_active, Ras_active);  // modifiers: Ras_active
  v28: PI3K => PI3K_active; Hepatocyte*Function_for_v28(Gab1_pMet, PI3K, PI3K_activation_by_pERK, pERK);  // modifiers: Gab1_pMet, pERK
  v29: Akt => pAkt; Hepatocyte*Function_for_v29(Akt, Akt_activation_supported_by_PDK1, PI3K_active, PI3K_inhib);  // modifiers: PI3K_active
  v30: pAkt => Akt; Hepatocyte*pAkt_deactivation*pAkt;
  v31: Rac => Rac_active; Hepatocyte*Function_for_v31(Gab1_pMet, Rac, Rac_activation);  // modifiers: Gab1_pMet
  v32: Rac_active => Rac; Hepatocyte*Rac_deactivation*Rac_active;
  v33: PAK1 => pPAK1; Hepatocyte*Function_for_v33(PAK1, PAK_phosphorylation, Rac_active);  // modifiers: Rac_active
  v34: pPAK1 => PAK1; Hepatocyte*PAK_dephosphorylation*pPAK1;
  v35: SOS => mSOS_pMet; Hepatocyte*Function_for_v35(SOS, SOS_recruitment_by_pMet, pMet, pMet_i, pMet_Itg, pMet_Itg_i, Met_inhib);  // modifiers: pMet, pMet_i, pMet_Itg, pMet_Itg_i
  v36: mSOS_pMet => SOS; Hepatocyte*mSOS_release_from_membrane*mSOS_pMet;
  v37: mSOS_pMet => SOS; Hepatocyte*Function_for_v37(ppRSK, mSOS_pMet, mSOS_release_by_ppRSK);  // modifiers: ppRSK
  v38: Ras => Ras_active; Hepatocyte*Function_for_v38(mSOS_pMet, Ras, Ras_activation_by_mSOS);  // modifiers: mSOS_pMet
  v39: Ras_active => Ras; Hepatocyte*Ras_deactivation*Ras_active;
  v40: Raf => pRaf; Hepatocyte*Function_for_v40(Raf, Raf_activation, Ras_active);  // modifiers: Ras_active
  v41: pRaf => Raf; Hepatocyte*Raf_inactivation*pRaf;
  v42: Raf => pRaf; Hepatocyte*Function_for_v42(Raf, Raf_activation_by_pERK, Ras_active, pERK, ERK_inhib);  // modifiers: Ras_active, pERK
  v43: Raf => pRaf; Hepatocyte*Function_for_v43(Raf, Raf_activation_by_PAK, Ras_active, pPAK1);  // modifiers: Ras_active, pPAK1
  v44: pRaf => Raf; Hepatocyte*Function_for_v44(pAkt, pRaf, pRaf_dephosphorylation_by_Akt, Akt_inhib);  // modifiers: pAkt
  v45: MEK => pMEK; Hepatocyte*Function_for_v45(MEK, MEK_phosphorylation_by_pRaf, pRaf);  // modifiers: pRaf
  v46: pMEK => MEK; Hepatocyte*MEK_dephosphorylation*pMEK;
  v47: MEK => pMEK; Hepatocyte*Function_for_v47(MEK, MEK_phosphorylation_by_PDK1, PDK_inhib, pRaf);  // modifiers: pRaf
  v48: ERK => pERK; Hepatocyte*Function_for_v48(pERK, ERK_phosphorylation_by_pMEK, MEK_inhib, pMEK);  // modifiers: pMEK
  v49: pERK => ERK; Hepatocyte*ERK_dephosphorylation*pERK;
  v50: RSK => pRSK; Hepatocyte*Function_for_v50(RSK, RSK_phosphorylation_by_pERK, pERK, ERK_inhib);  // modifiers: pERK
  v51: pRSK => RSK; Hepatocyte*pRSK_dephosphorylation*pRSK;
  v52: pRSK => ppRSK; Hepatocyte*Function_for_v52(pRSK_phosphorylation_by_PDK1, PDK_inhib, pRSK);
  v53: ppRSK => RSK; Hepatocyte*ppRSK_dephosphorylation*ppRSK;
  v54: Raf + Sorafenib => Sorafenib_Raf; Function_for_v54(Raf, Sorafenib, Sorafenib_unbinding, KD_Sorafenib);
  v55: Sorafenib_Raf => Raf; Hepatocyte*Sorafenib_unbinding*Sorafenib_Raf;
  v56: Met + Cabozantinib => Cabozantinib_Met; Function_for_v56(Met, Cabozantinib, Cabozantinib_unbinding, KD_Cabozantinib);
  v57: Cabozantinib_Met => Met; Hepatocyte*Cabozantinib_unbinding*Cabozantinib_Met;
  v58: Met_Itg + Cabozantinib => Cabozantinib_Met_Itg; Function_for_v58(Met_Itg, Cabozantinib, Cabozantinib_unbinding, KD_Cabozantinib);
  v59: Cabozantinib_Met_Itg => Met_Itg; Hepatocyte*Cabozantinib_unbinding*Cabozantinib_Met_Itg;

  // Unit definitions:
  unit volume = 1e-3 litre;
  unit substance = 1e-3 mole;
end
