// SBML level 2 version 4
// dcterms:bibliographicCitation: urn:miriam:pubmed:22280742

function Rate_Law_for_reaction_for_Z(Ksz, Kdz, Z, Mz, V)
  Ksz*Mz*V - Kdz*Z;
end

function Rate_Law_for_reaction_for_Mx(Ksmx, V)
  Ksmx*V;
end

function Rate_Law_for_reaction_V(Muo, V)
  Muo*V;
end

function Rate_Law_for_reaction_YT(YT, Ksy, Kdy, My, V)
  Ksy*My*V - Kdy*YT;
end

function Rate_Law_for_reaction_for_Y(Khy, Khyz, Z, Yt, Y, Jhy, Kpyx, X, Jpyx, Ksy, My, V, Kdy)
  Ksy*My*V - Kdy*Y + (Khy*Y + Khyz*Z)*(Yt - Y)/(Jhy*V + Yt - Y) - Kpyx*X*Y/(Jpyx*V + Y);
end

function Rate_Law_for_reaction_of_X(Kdx, Y, X, V, Ksx, Mx, Kdxy)
  Ksx*Mx*V - Kdx*X - Kdxy*Y*X/V;
end

function Rate_Law_for_reaction_for_Mx_Consumption(Kdmx, Mx)
  Kdmx*Mx;
end

function Rate_Law_for_reaction_for_My_consumption(Kdmy, My)
  Kdmy*My;
end

function Rate_Law_for_reaction_for_Mz_production(Ksmz, Ksmzx, X, Jsmzx, V)
  Ksmz + Ksmzx*X^2/((Jsmzx*V)^2 + X^2);
end

function Rate_Law_for_reaction_for_Mz_consumption(Kdmz, Mz)
  Kdmz*Mz;
end

function Rate_Law_for_reaction_for_My_production(Ksmy)
  Ksmy;
end

model Liu2012_Hybrid_modeling_and_simulation_of_stochastic_effects_on_progression_through_the_eukaryotic_cell_cycle()
  // Liu2012-Hybrid modeling and simulation of stochastic effects on progression through the eukaryotic cell cycle.
  // The eukaryotic cell cycle is regulated by a complicated chemical reaction network. Although many deterministic models have been proposed, stochastic models are desired to capture noise in the cell resulting from low numbers of critical species. However, converting a deterministic model into one that accurately captures stochastic effects can result in a complex model that is hard to build and expensive to simulate. In this paper, we first apply a hybrid (mixed deterministic and stochastic) simulation method to such a stochastic model. With proper partitioning of reactions between deterministic and stochastic simulation methods, the hybrid method generates the same primary characteristics and the same level of noise as Gillespie's stochastic simulation algorithm, but with better efficiency. By studying the results generated by various partitionings of reactions, we developed a new strategy for hybrid stochastic modeling of the cell cycle. The new approach is not limited to using mass-action rate laws. Numerical experiments demonstrate that our approach is consistent with characteristics of noisy cell cycle progression, and yields cell cycle statistics in accord with experimental observations
  // isDerivedFrom ncit:C12596 GO:0007049 mamo:MAMO_0000046 mamo:MAMO_0000047 ncit:C17349 https://www.ncbi.nlm.nih.gov/pubmed/19246388
  // occursIn ncit:C12596
  // isDescribedBy https://www.ncbi.nlm.nih.gov/pubmed/19246388 pubmed:22280742
  // hasProperty GO:0007049 ncit:C17349 mamo:MAMO_0000046

  // Compartments:
  compartment Compartment = 1;

  // Species:
  species X in Compartment = 0;
  species V in Compartment = 10;
  species Y in Compartment = 0;
  species Z in Compartment = 0;
  species YT in Compartment = 0;
  species Mx in Compartment = 6.4;
  species My in Compartment = 2;
  species Mz in Compartment = 0.5;

  // Parameters:
  Ksmx = 1.04;
  Kdmy = 3.5;
  Kdmx = 3.5;
  Ksmy = 7;
  Ksmz = 0.001;
  Ksmzx = 10;
  Kdmz = 0.15;
  Jsmzx = 756;
  Muo = 0.006;
  Kdx = 0.04;
  Kdy = 0.02;
  Khyz = 7.5;
  Kpyx = 1.88;
  Kdz = 0.1;
  Ksx = 1.53;
  Ksy = 1.35;
  Khy = 29.7;
  Ksz = 1.35;
  Kdxy = 0.00741;
  Jpyx = 5.4;
  Jhy = 5.4;

  // Reactions:
  reaction_for_X: => X; Compartment*Rate_Law_for_reaction_of_X(Kdx, Y, X, V, Ksx, Mx, Kdxy);  // modifiers: Y, V, Mx
  reaction_for_V: => V; Compartment*Rate_Law_for_reaction_V(Muo, V);  // modifiers: X
  reaction_for_Y: => Y; Compartment*Rate_Law_for_reaction_for_Y(Khy, Khyz, Z, YT, Y, Jhy, Kpyx, X, Jpyx, Ksy, My, V, Kdy);  // modifiers: Z, YT, X, My, V
  reaction_for_Z: => Z; Compartment*Rate_Law_for_reaction_for_Z(Ksz, Kdz, Z, Mz, V);  // modifiers: Mz, V
  reaction_for_YT: => YT; Compartment*Rate_Law_for_reaction_YT(YT, Ksy, Kdy, My, V);  // modifiers: My, V
  reaction_for_Mx: => Mx; Compartment*Rate_Law_for_reaction_for_Mx(Ksmx, V);  // modifiers: V
  reaction_for_Mx_consumption: Mx => ; Compartment*Rate_Law_for_reaction_for_Mx_Consumption(Kdmx, Mx);
  reaction_for_My_production: => My; Compartment*Rate_Law_for_reaction_for_My_production(Ksmy);
  reaction_for_My_consumption: My => ; Compartment*Rate_Law_for_reaction_for_My_consumption(Kdmy, My);
  reaction_for_Mz_production: => Mz; Compartment*Rate_Law_for_reaction_for_Mz_production(Ksmz, Ksmzx, X, Jsmzx, V);  // modifiers: X, V
  reaction_for_Mz_consumption: Mz => ; Compartment*Rate_Law_for_reaction_for_Mz_consumption(Kdmz, Mz);

  // Unit definitions:
  unit substance = item;
end
