// SBML level 2 version 4
// dcterms:bibliographicCitation: urn:miriam:pubmed:10550769

function Rate_Law_for_reaction_for_C_production(Vc_s, Vs_m, E, Ks_E, gamma, V2_m, Kp, K2)
  Vc_s + Vs_m*(E/(Ks_E + E)) + gamma*V2_m*(Kp/(K2 + Kp));
end

function Rate_Law_for_reaction_for_Rp_decay(V4_m, Rp, K4)
  V4_m*(Rp/(K4 + Rp));
end

function Rate_Law_for_reaction_for_C_decay(gamma, V1_m, C, K1_C, K, K1, Vd_E_m, E, Kd_C)
  gamma*V1_m*(C/(K1_C + C))*(K/(K1 + K)) + C + Vd_E_m*E*(C/(Kd_C + C));
end

function Rate_Law_for_reaction_for_Rp_production(V3_m, Kp, RE, K3)
  V3_m*Kp*(RE/(K3 + RE));
end

function Rate_Law_for_reaction_for_K_production(V2_m, Kp, K2)
  V2_m*(Kp/(K2 + Kp));
end

function Rate_Law_for_reaction_for_K_decay(V1_m, C, K1_C, K, K1)
  V1_m*(C/(K1_C + C))*(K/(K1 + K));
end

model Hatzimanikatis1999()
  // Hatzimanikatis1999-Regulation of the G1-S transition of the mammalian cell cycle.
  // A mathematical model of regulation of the G1-S transition of the mammalian cell cycle has been formulated to organize available experimental molecular-level information in a systematic quantitative framework and to evaluate the ability of this manifestation of current knowledge to calculate correctly experimentally observed phenotypes. This model includes nine components and includes cyclin-cdk complexes, a pocket protein (pRb), a transcription factor (E2F-1), and a cyclin-cdk complex inhibitor. Simulation of the model equations yields stable oscillatory solutions corresponding to cell proliferation and asymptotically stable solutions corresponding to cell cycle arrest (quiescence). Bifurcation analysis of the system suggests changes in the intracellular concentrations of either E2F or cyclin E can activate cell proliferation and that co-overexpression of these molecules can prevent cell proliferation. Further analysis suggests that the amount of inhibitor necessary to prevent cell proliferation is independent of the concentrations of cyclin E and E2F and depends only on the equilibrium ratio between the bound and unbound forms of the inhibitor to the complex.
  // occursIn ncit:C12958
  // isDescribedBy pubmed:10550769
  // hasProperty GO:0007049 mamo:MAMO_0000046

  // Compartments:
  compartment compartment = 1;

  // Species:
  species C in compartment = 1;
  species K in compartment = 1;
  species Rp in compartment = 1;
  species $E in compartment = 1;
  species $Kp in compartment = 1;
  species $RE in compartment = 1;

  // Parameters:
  VC_s = 1;
  Vs_m = 1;
  Ks_E = 0.1;
  Vd_E_m = 1000;
  Kd_C = 0.005;
  V1_m = 50;
  V2_m = 40;
  K1_C = 0.1;
  K2 = 0.0001;
  V3_m = 3000;
  V4_m = 3;
  K3 = 0.0001;
  K4 = 0.0001;
  K1 = 0.0001;
  gamma = 1;
  sigma = 10;
  lembda = 1;
  qE = 0.01;
  qI = 1;

  // Reactions:
  reaction_for_C_production: => C; compartment*Rate_Law_for_reaction_for_C_production(VC_s, Vs_m, E, Ks_E, gamma, V2_m, Kp, K2);  // modifiers: E, Kp
  reaction_for_C_decay: C => ; compartment*Rate_Law_for_reaction_for_C_decay(gamma, V1_m, C, K1_C, K, K1, Vd_E_m, E, Kd_C);  // modifiers: K, E
  reaction_for_K_production: => K; compartment*Rate_Law_for_reaction_for_K_production(V2_m, Kp, K2);  // modifiers: Kp
  reaction_for_K_decay: K => ; compartment*Rate_Law_for_reaction_for_K_decay(V1_m, C, K1_C, K, K1);  // modifiers: C
  reaction_for_Rp_production: => Rp; compartment*Rate_Law_for_reaction_for_Rp_production(V3_m, Kp, RE, K3);  // modifiers: Kp, RE
  reaction_for_Rp_decay: Rp => ; compartment*Rate_Law_for_reaction_for_Rp_decay(V4_m, Rp, K4);

  // Unit definitions:
  unit volume = 1e-3 litre;
  unit substance = 1e-3 mole;
end
