// SBML level 2 version 4
// dcterms:bibliographicCitation: urn:miriam:pubmed:16186499

function Rate_Law_for_reaction_for_ATM_production(Kundim, ATM_D, Kar, ATM_star)
  2*Kundim*ATM_D + Kar*ATM_star;
end

function Rate_Law_for_reaction_for_ATM_D_production(Kdim, ATM)
  1/2*Kdim*ATM^2;
end

function Rate_Law_for_reaction_for_ATM_D_decay(Kundim, ATM_D)
  Kundim*ATM_D;
end

function Rate_Law_for_reaction_for_ATM_star_decay(Kar, ATM_star)
  Kar*ATM_star;
end

function Rate_Law_for_reaction_for_ATM_decay(kdim, ATM, Kaf, _f_C_ATM_star_)
  kdim*ATM^2 + Kaf*_f_C_ATM_star_*ATM;
end

function Rate_Law_for_reaction_for_ATM_star_production(Kaf, _f_C_ATM_star_, ATM)
  Kaf*_f_C_ATM_star_*ATM;
end

model Ma2005_digital_response_of_p53_to_DNA_damage_ATM_Activation_Module()
  // Ma2005-digital response of p53 to DNA damage-ATM Activation Module
  // Recent observations show that the single-cell response of p53 to ionizing radiation (IR) is “digital” in that it is the number of oscillations rather than the amplitude of p53 that shows dependence on the radiation dose. We present a model of this phenomenon. In our model, double-strand break (DSB) sites induced by IR interact with a limiting pool of DNA repair proteins, forming DSB–protein complexes at DNA damage foci. The persisting complexes are sensed by ataxia telangiectasia mutated (ATM), a protein kinase that activates p53 once it is phosphorylated by DNA damage. The ATM-sensing module switches on or off the downstream p53 oscillator, consisting of a feedback loop formed by p53 and its negative regulator, Mdm2. In agreement with experiments, our simulations show that by assuming stochasticity in the initial number of DSBs and the DNA repair process, p53 and Mdm2 exhibit a coordinated oscillatory dynamics upon IR stimulation in single cells, with a stochastic number of oscillations whose mean increases with IR dose. The damped oscillations previously observed in cell populations can be explained as the aggregate behavior of single cell
  // isDescribedBy pubmed:16186499
  // hasProperty taxonomy:9606 GO:0042769 mamo:MAMO_0000046

  // Compartments:
  compartment compartment = 1;

  // Species:
  species ATM_D in compartment = 1;
  species ATM in compartment = 1;
  species ATM_star in compartment = 1;

  // Parameters:
  var f_C_ATM_star; f_C_ATM_star is "f(C,ATM_star)";
  RP = 20;
  K_fb1 = 2;
  K_rbl = 0.5;
  K_fix1 = 0.03;
  K_fb2 = 0.2;
  K_rb2 = 0.05;
  K_fix2 = 0.003;
  K_cross = 0.001;
  K_dim = 10;
  K_undim = 1;
  K_af = 1;
  K_ar = 3;
  alpha1 = 1.5;
  alpha2 = 10;
  alpha3 = 0.1;
  S_p53 = 0.02;
  S_Mdm2 = 0.0018;
  epsilon_Mdm2 = 0.024;
  r_p53 = 0.12;
  r_MDM2 = 0.02;
  sigma_p53 = 0.02;
  sigma_Mdm2 = 0.02;
  muo_p53 = 0.02;
  muo_MDM2 = 0.0028;
  V_p53 = 0.092;
  V_P53_star = 0.0184;
  V_MDM2 = 0.014;
  K_fp = 0.6;
  K_rp = 0.2;
  K = 1;
  Kd = 0.03;
  Kd_star = 0.3;
  Kp = 1;
  Ka = 1.5;
  C = 1;

  // Assignment rules:
  f_C_ATM_star := alpha1*C + alpha2*C*ATM_star + alpha3*ATM_star;

  // Reactions:
  reaction_for_ATM_D_production: => ATM_D; compartment*Rate_Law_for_reaction_for_ATM_D_production(K_dim, ATM);  // modifiers: ATM
  reaction_for_ATM_D_decay: ATM_D => ; compartment*Rate_Law_for_reaction_for_ATM_D_decay(K_undim, ATM_D);
  reaction_for_ATM_production: => ATM; compartment*Rate_Law_for_reaction_for_ATM_production(K_undim, ATM_D, K_ar, ATM_star);  // modifiers: ATM_D, ATM_star
  reaction_for_ATM_decay: ATM => ; compartment*Rate_Law_for_reaction_for_ATM_decay(K_dim, ATM, K_af, f_C_ATM_star);
  reaction_for_ATM_star_production: => ATM_star; compartment*Rate_Law_for_reaction_for_ATM_star_production(K_af, f_C_ATM_star, ATM);  // modifiers: ATM
  reaction_for_ATM_star_decay: ATM_star => ; compartment*Rate_Law_for_reaction_for_ATM_star_decay(K_ar, ATM_star);

  // Unit definitions:
  unit volume = 1e-3 litre;
  unit substance = 1e-3 mole;
end
