// SBML level 2 version 4

model Blackwell2019_mechanistic_model_of_signaling_pathways_activated_by_dopamine_D1_receptors_acetylcholine_receptors_and_glutamate()
  // Blackwell2019 - mechanistic model of signaling pathways activated by dopamine D1 receptors, acetylcholine receptors, and glutamate
  // D1_Gq Pathway
  // hasProperty mamo:null mamo:MAMO_0000047

  // Compartments:
  compartment spine = 1e-9 MWDERIVEDUNIT_micrometer___3;

  // Species:
  species Gqabg in spine = 7.9e-12;  // substance in mole
  species mGluR in spine = 7e-13;  // substance in mole
  species $Glu in spine = 1e-14;  // substance in mole
  species $Ca1 in spine;  // substance in mole
  species Glu_mGluR_Gqabg in spine = 0;  // substance in mole
  species Glu_mGluR in spine = 0;  // substance in mole
  species GqaGTP in spine = 0;  // substance in mole
  species GqaGDP in spine = 0;  // substance in mole
  species Plc in spine = 1.16e-12;  // substance in mole
  species IP3 in spine = 9e-14;  // substance in mole
  species Plc_Ca in spine = 0;  // substance in mole
  species Plc_Ca_GqaGTP in spine = 0;  // substance in mole
  species Pip2 in spine = 1.909e-11;  // substance in mole
  species Plc_Ca_Pip2 in spine = 2e-14;  // substance in mole
  species Dag in spine = 4e-14;  // substance in mole
  species Plc_Ca_GqaGTP_Pip2 in spine = 0;  // substance in mole
  species Plc_GqaGTP in spine = 0;  // substance in mole
  species DagL in spine = 1.26e-12;  // substance in mole
  species Ca_DagL in spine = 3.5e-13;  // substance in mole
  species Dag_Ca_DagL in spine = 5e-14;  // substance in mole
  species TwoAG in spine = 0;  // substance in mole
  species DagK in spine = 2.8e-13;  // substance in mole
  species DagK_Dag in spine = 0;  // substance in mole
  species PA in spine = 0;  // substance in mole
  species PKC in spine = 9.75e-12;  // substance in mole
  species PKC_Ca in spine = 2.5e-13;  // substance in mole
  species PKCt in spine = 0;  // substance in mole
  species PIkin in spine = 5.6e-13;  // substance in mole
  species IP3_deg in spine = 0;  // substance in mole
  species IP3_deg_PIkin in spine = 0;  // substance in mole
  species TwoAG_degrad in spine = 0;  // substance in mole
  species Glu_mGluR_desens in spine = 0;  // substance in mole
  species Glu_out in spine = 2e-10;  // substance in mole
  species Gqabg_mGluR in spine = 1e-13;  // substance in mole
  species $Da in spine = 1e-14;  // substance in mole
  species Da_Out in spine = 2e-10;  // substance in mole
  species D1R in spine = 0;  // substance in mole
  species Da_D1R in spine = 0;  // substance in mole
  species Gsabg in spine = 1.68e-12;  // substance in mole
  species Da_D1R_Gsabg in spine = 0;  // substance in mole
  species GsaGTP in spine = 0;  // substance in mole
  species Gsabg_D1R in spine = 2e-13;  // substance in mole
  species GsaGDP in spine = 0;  // substance in mole
  species $Ach in spine = 1.05e-13;  // substance in mole
  species M4R in spine = 1.2e-13;  // substance in mole
  species Ach_M4R in spine = 0;  // substance in mole
  species Giabg in spine = 1.68e-12;  // substance in mole
  species Giabg_M4R in spine = 8e-14;  // substance in mole
  species Ach_M4R_Giabg in spine = 0;  // substance in mole
  species GiaGTP in spine = 8e-14;  // substance in mole
  species M1R in spine = 1.5e-13;  // substance in mole
  species Ach_M1R in spine = 0;  // substance in mole
  species Ach_M1R_Gqabg in spine = 0;  // substance in mole
  species M1R_Gqabg in spine = 5e-14;  // substance in mole
  species GiaGDP in spine = 0;  // substance in mole
  species ATP in spine = 1.99894e-9;  // substance in mole
  species cAMP in spine = 5e-14;  // substance in mole
  species AMP in spine = 0;  // substance in mole
  species pPDE10 in spine = 0;  // substance in mole
  species PDE10 in spine = 1.175e-12;  // substance in mole
  species PDE10_cAMP in spine = 2.76e-13;  // substance in mole
  species pPDE10_cAMP in spine = 0;  // substance in mole
  species PKAc in spine = 0;  // substance in mole
  species PP1 in spine = 3.345e-12;  // substance in mole
  species PKAc_PDE10 in spine = 0;  // substance in mole
  species PKAc_PDE10_cAMP in spine = 0;  // substance in mole
  species PDE4 in spine = 2.86e-13;  // substance in mole
  species PKAc_PDE4 in spine = 0;  // substance in mole
  species PDE4_cAMP in spine = 0;  // substance in mole
  species pPDE4 in spine = 1e-14;  // substance in mole
  species pPDE4_cAMP in spine = 0;  // substance in mole
  species PKAc_PDE4_cAMP in spine = 0;  // substance in mole
  species CK_Cam_Ca4 in spine = 7e-14;  // substance in mole
  species pCK_Cam_Ca4 in spine = 0;  // substance in mole
  species pCK in spine = 0;  // substance in mole
  species CK_Cam_Ca4_DagL in spine = 0;  // substance in mole
  species pDagL in spine = 2e-14;  // substance in mole
  species pCK_Cam_Ca4_DagL in spine = 0;  // substance in mole
  species pCK_Cam_Ca4_Ca_DagL in spine = 0;  // substance in mole
  species Ca_pDagL in spine = 0;  // substance in mole
  species CK_Cam_Ca4_Ca_DagL in spine = 0;  // substance in mole
  species pCK_DagL in spine = 0;  // substance in mole
  species Glu_Gbuf in spine = 0;  // substance in mole
  species Gbuf in spine = 0;  // substance in mole
  species PMCA in spine = 7.6e-13;  // substance in mole
  species PMCA_Ca in spine = 1.2e-13;  // substance in mole
  species ncx in spine = 0;  // substance in mole
  species ncx_Ca in spine = 0;  // substance in mole
  species Ca_Out in spine = 1.996038e-9;  // substance in mole
  species Leak in spine = 0;  // substance in mole
  species CaOut_Leak in spine = 0;  // substance in mole
  species PKAc_Da_D1R_Gsabg in spine = 0;  // substance in mole
  species Da_pD1R_Gsabg in spine = 0;  // substance in mole
  species Da_Dbuf in spine = 0;  // substance in mole
  species Dbuf in spine = 0;  // substance in mole
  species AC5 in spine = 7.6e-13;  // substance in mole
  species AC5_GiaGTP in spine = 1.2e-13;  // substance in mole
  species AC5_GsaGTP in spine = 0;  // substance in mole
  species AC5_GsaGTP_GiaGTP in spine = 0;  // substance in mole
  species AC5_GsaGTP_ATP in spine = 8e-14;  // substance in mole
  species AC5_GsaGTP_GiaGTP_ATP in spine = 4e-14;  // substance in mole
  species PDE1 in spine = 1.7e-12;  // substance in mole
  species Cam_Ca4 in spine = 0;  // substance in mole
  species PDE1_Cam_Ca4 in spine = 3e-13;  // substance in mole
  species PDE1_Cam_Ca4_cAMP in spine = 0;  // substance in mole
  species PP2A_BPR72 in spine = 1.1e-12;  // substance in mole
  species PP2A_Ca in spine = 2e-14;  // substance in mole
  species pPDE4_PP2A_Ca in spine = 0;  // substance in mole
  species pPDE4_PP2A in spine = 4e-14;  // substance in mole
  species pPDE10_PP2A_Ca in spine = 0;  // substance in mole
  species pPDE10_PP2A in spine = 0;  // substance in mole
  species PDE2 in spine = 1.35e-12;  // substance in mole
  species PDE2_cAMP in spine = 0;  // substance in mole
  species PDE2_cAMP2 in spine = 0;  // substance in mole
  species Cam in spine = 5.212e-12;  // substance in mole
  species CamC_Ca2 in spine = 1.45e-13;  // substance in mole
  species CamN_Ca2 in spine = 1.5e-14;  // substance in mole
  species PP2A_B56d in spine = 1.08e-12;  // substance in mole
  species PKAc_PP2A_B56d in spine = 0;  // substance in mole
  species pPP2A in spine = 4e-14;  // substance in mole
  species Epac1 in spine = 9.75e-13;  // substance in mole
  species Epac1_cAMP in spine = 2.5e-14;  // substance in mole
  species PP2B in spine = 1.5e-14;  // substance in mole
  species PP2B_Cam in spine = 3.35e-12;  // substance in mole
  species PP2B_CamC_Ca2 in spine = 1.41e-12;  // substance in mole
  species PP2B_CamN_Ca2 in spine = 2.1e-13;  // substance in mole
  species PP2B_Cam_Ca4 in spine = 0;  // substance in mole
  species CK in spine = 1.193e-11;  // substance in mole
  species pCK_PP1 in spine = 0;  // substance in mole
  species pCK_Cam_Ca4_PP1 in spine = 0;  // substance in mole
  species AC1 in spine = 1e-13;  // substance in mole
  species AC1_GsaGTP in spine = 0;  // substance in mole
  species AC1_Cam_Ca4 in spine = 0;  // substance in mole
  species AC1_GsaGTP_Cam_Ca4 in spine = 0;  // substance in mole
  species AC1_Cam_Ca4_ATP in spine = 0;  // substance in mole
  species AC1_GsaGTP_Cam_ATP in spine = 0;  // substance in mole
  species D32 in spine = 3.756e-11;  // substance in mole
  species D32_PKAc in spine = 0;  // substance in mole
  species D32_p34 in spine = 0;  // substance in mole
  species D32_p34_PP1 in spine = 5.8e-13;  // substance in mole
  species D32_p34_PP2B_Cam_Ca4 in spine = 0;  // substance in mole
  species D32_p34_PP1_PP2B_Cam_Ca4 in spine = 0;  // substance in mole
  species D32_p34_PP2A_B56d in spine = 0;  // substance in mole
  species D32_p34_PP2A_BPR72 in spine = 0;  // substance in mole
  species D32_p34_PP1_PP2A_B56d in spine = 1e-14;  // substance in mole
  species D32_p34_PP1_PP2A_BPR72 in spine = 1e-14;  // substance in mole
  species D32_p75 in spine = 1.0085e-11;  // substance in mole
  species CDK5 in spine = 3.7e-13;  // substance in mole
  species D32_CDK5 in spine = 1.215e-12;  // substance in mole
  species D32_p75_PP2A_BPR72 in spine = 2.6e-13;  // substance in mole
  species D32_p75_PP2A_B56d in spine = 2.3e-13;  // substance in mole
  species D32_p75_pPP2A in spine = 4e-14;  // substance in mole
  species D32_p75_PP2A_Ca in spine = 1e-14;  // substance in mole
  species D32_p75_PKAc in spine = 0;  // substance in mole
  species PKA in spine = 1.6e-12;  // substance in mole
  species PKA_cAMP2 in spine = 2.8e-13;  // substance in mole
  species PKA_cAMP4 in spine = 2e-14;  // substance in mole
  species AIP in spine = 0;  // substance in mole
  species CK_Cam_Ca4_AIP in spine = 0;  // substance in mole
  species OA in spine = 0;  // substance in mole
  species OA_PP2A_B56d in spine = 0;  // substance in mole
  species OA_PP2A_BPR72 in spine = 0;  // substance in mole
  species OA_PP2A_Ca in spine = 0;  // substance in mole
  species OA_pPP2A in spine = 0;  // substance in mole
  species Telenz_M1R in spine = 0;  // substance in mole
  species Telenz in spine = 0;  // substance in mole
  species Telenz_m1R_Gq in spine = 0;  // substance in mole
  species PD102840 in spine = 0;  // substance in mole
  species PD_M4R in spine = 0;  // substance in mole
  species PD_M4R_Giabg in spine = 0;  // substance in mole
  species OA_PP1 in spine = 0;  // substance in mole
  species AKAR3 in spine = 0;  // substance in mole
  species PKAc_AKAR3 in spine = 0;  // substance in mole
  species pAKAR3 in spine = 0;  // substance in mole
  species PP1_pAKAR3 in spine = 0;  // substance in mole
  species PKAr in spine = 0;  // substance in mole
  species pD1R_Gsabg in spine = 0;  // substance in mole
  species total_Cam in spine;  // substance in mole
  species total_D1R in spine;  // substance in mole
  species total_PP2B in spine;  // substance in mole
  species total_PDE1 in spine;  // substance in mole
  species total_PDE4 in spine;  // substance in mole
  species total_PDE2 in spine;  // substance in mole
  species total_PP1 in spine;  // substance in mole
  species total_D32 in spine;  // substance in mole
  species total_PP2A in spine;  // substance in mole
  species total_PKC in spine;  // substance in mole
  species total_PKA in spine;  // substance in mole
  species total_M4R in spine;  // substance in mole
  species total_M1R in spine;  // substance in mole
  species Total_AC5 in spine;  // substance in mole
  species Total_mGluR in spine;  // substance in mole
  species Total_PDE10 in spine;  // substance in mole
  species Total_DagL in spine;  // substance in mole
  species total_DagK in spine;  // substance in mole
  species total_PIKinase in spine;  // substance in mole
  species total_Pip2 in spine;  // substance in mole
  species Total_Gq in spine;  // substance in mole
  species Total_Gs in spine;  // substance in mole
  species Total_Gi in spine;  // substance in mole
  species Total_Plc in spine;  // substance in mole
  species Total_CK in spine;  // substance in mole
  species Total_Epac1 in spine;  // substance in mole
  species Total_AC1 in spine;  // substance in mole
  species Ca_pDagL_Dag in spine = 0;  // substance in mole
  species Gbg in spine = 3.6e-13;  // substance in mole
  species et in spine = 10;
  species r in spine = A*(k2 - k1);
  species s in spine = 0;  // substance in mole

  // Parameters:
  tstart = 98 second;
  frequency = 10;
  kf_DhpgmGluRxGabg = 0.009 MWDERIVEDUNIT_1__nanomolarity_second;
  kb_DhpgmGluRxGabg = 1.36 MWDERIVEDUNIT_1__second;
  kf_DaxD1R_Gsabg = 0.005 MWDERIVEDUNIT_1__nanomolarity_second;
  kb_DaxD1R_Gsabg = 5 MWDERIVEDUNIT_1__second;
  kf_Da = 1 MWDERIVEDUNIT_1__nanomolarity_second;
  kb_Da = 5.5e-5 MWDERIVEDUNIT_1__second;
  kf_DaxD1R = 0.0016666667 MWDERIVEDUNIT_1__nanomolarity_second;
  Kb_DaxD1R = 5 MWDERIVEDUNIT_1__second;
  kf_GsabgxD1R = 0.01 MWDERIVEDUNIT_1__nanomolarity_second;
  kb_GsabgxD1R = 0.4 MWDERIVEDUNIT_1__second;
  kf_GsabgxDaD1R = 0.03 MWDERIVEDUNIT_1__nanomolarity_second;
  kb_GsabgxDaD1R = 0.4 MWDERIVEDUNIT_1__second;
  kf_DaD1R_Gs = 0.15 MWDERIVEDUNIT_1__second;
  kf_GasGDPxGbg = 2 MWDERIVEDUNIT_1__nanomolarity_second;
  kf_GsaGTP = 0.01 MWDERIVEDUNIT_1__second;
  Kcat_PlcGqGTP = 12 MWDERIVEDUNIT_1__second;
  kf_Ach = 6 MWDERIVEDUNIT_1__second;
  kf_AchM4RxGiabg = 0.192 MWDERIVEDUNIT_1__nanomolarity_second;
  kb_AchM4RxGiabg = 3.36 MWDERIVEDUNIT_1__second;
  kf_M4RxGiabg = 0.00178 MWDERIVEDUNIT_1__nanomolarity_second;
  kb_M4RxGiabg = 0.42 MWDERIVEDUNIT_1__second;
  kf_Ach_M4R_Gi = 8 MWDERIVEDUNIT_1__second;
  kf_AchxM1R = 9.5e-5 MWDERIVEDUNIT_1__nanomolarity_second;
  kb_AchxM1R = 2.5 MWDERIVEDUNIT_1__second;
  kf_M1RxGqabg = 0.000576 MWDERIVEDUNIT_1__nanomolarity_second;
  kb_M1RxGqabg = 0.42 MWDERIVEDUNIT_1__second;
  kf_AchM1RxGqabg = 0.024 MWDERIVEDUNIT_1__nanomolarity_second;
  kb_AchM1RxGqabg = 0.42 MWDERIVEDUNIT_1__second;
  kf_AchxM1RGq = 0.00396 MWDERIVEDUNIT_1__nanomolarity_second;
  kb_AchxM1RGq = 2.5 MWDERIVEDUNIT_1__second;
  kcat_AchM1RGq = 0.5 MWDERIVEDUNIT_1__second;
  kf_GsaGTPxAC5 = 0.0148 MWDERIVEDUNIT_1__nanomolarity_second;
  kb_GsaGTPxAC5 = 3.996 MWDERIVEDUNIT_1__second;
  kb_ATPxAC5GsaGTP = 0.2612 MWDERIVEDUNIT_1__second;
  kf_ATPxAC5xGsaGTP = 255.2 MWDERIVEDUNIT_1__nanomolarity_second;
  kb_AC5GsaGTP_ATP = 0.0002592 MWDERIVEDUNIT_1__nanomolarity_second;
  kb_AC5_GsaGTPGiaGTP_ATP = 0.0002592 MWDERIVEDUNIT_1__nanomolarity_second;
  kf_AC5_GsaGTP_GiaGTPxATP = 25.52 MWDERIVEDUNIT_1__nanomolarity_second;
  kb_AC5_GsaGTP_GiaGTPxATP = 0.02612 MWDERIVEDUNIT_1__second;
  kf_AC5xGiaGTP_GsaGTP = 0.0037 MWDERIVEDUNIT_1__nanomolarity_second;
  kf_PDE1xCamCa4 = 0.1 MWDERIVEDUNIT_1__nanomolarity_second;
  kb_PDE1xCamCa4 = 1 MWDERIVEDUNIT_1__second;
  kcat_PDE1CamCa4cAMP = 11 MWDERIVEDUNIT_1__second;
  kb_PDE1_CamCa4xcAMP = 44 MWDERIVEDUNIT_1__second;
  kf_pPDE10 = 0.005 MWDERIVEDUNIT_1__second;
  kcat_pPDE10cAMP = 16.8 MWDERIVEDUNIT_1__second;
  kf_PDE10xcAMP = 0.084 MWDERIVEDUNIT_1__nanomolarity_second;
  kb_PDE10xcAMP = 16.8 MWDERIVEDUNIT_1__second;
  kf_PKAcxPDE10 = 0.00025 MWDERIVEDUNIT_1__nanomolarity_second;
  kb_PKAcxPDE10 = 0.024 MWDERIVEDUNIT_1__second;
  kcat_PKAcPDE10 = 0.006 MWDERIVEDUNIT_1__second;
  kf_PKAcxPDE10cAMP = 0.00025 MWDERIVEDUNIT_1__nanomolarity_second;
  kb_PKAcxPDE10cAMP = 0.024 MWDERIVEDUNIT_1__second;
  kf_PKAcPDE10cAMP = 0.006 MWDERIVEDUNIT_1__second;
  kf_cAMP = 0.1 MWDERIVEDUNIT_1__second;
  kf_mGluRxGqabg = 0.00225 MWDERIVEDUNIT_1__nanomolarity_second;
  kb_mGluRxGqabg = 0.68 MWDERIVEDUNIT_1__second;
  kcat_GqGDPxGbg = 2 MWDERIVEDUNIT_1__nanomolarity_second;
  kf_GqGTPxPlc = 0.0007 MWDERIVEDUNIT_1__nanomolarity_second;
  kb_GqGTPxPlc = 0.7 MWDERIVEDUNIT_1__second;
  kcat_Dhpg_mGluR_Gabg = 1.5 MWDERIVEDUNIT_1__second;
  kf_mGluRxDhpg1 = 0.001 MWDERIVEDUNIT_1__nanomolarity_second;
  Kb_mGluRxDhpg1 = 13.2 MWDERIVEDUNIT_1__second;
  kf_glu = 1.2 MWDERIVEDUNIT_1__nanomolarity_second;
  kb_glu = 6e-5 MWDERIVEDUNIT_1__second;
  kb_Dhpg_mGluRxdhpg_mGluRdesens = 0.001 MWDERIVEDUNIT_1__second;
  kf_Dhpg_mGluRxdhpg_mGluRdesens = 0.0625 MWDERIVEDUNIT_1__second;
  kf_GqGTP = 0.1 MWDERIVEDUNIT_1__second;
  kf_PlcxCa = 0.0004 MWDERIVEDUNIT_1__nanomolarity_second;
  kb_PlcxCa = 1 MWDERIVEDUNIT_1__second;
  kf_CaxPlc_GqGTP = 0.002 MWDERIVEDUNIT_1__nanomolarity_second;
  kb_CaxPlc_GqGTP = 1 MWDERIVEDUNIT_1__second;
  kf_PlcCaxGqGTP = 0.0035 MWDERIVEDUNIT_1__nanomolarity_second;
  kb_PlcCaxGqGTP = 0.7 MWDERIVEDUNIT_1__second;
  kf_PlcCa_GqGTPxPip2 = 0.001665 MWDERIVEDUNIT_1__nanomolarity_second;
  kb_PlcCa_GqGTPxPip2 = 60 MWDERIVEDUNIT_1__second;
  kcat_PlcCaGqGTPPip2 = 30 MWDERIVEDUNIT_1__second;
  kf_PlcCaGqGTP = 12 MWDERIVEDUNIT_1__second;
  kf_Pip2 xPlcCa = 5e-5 MWDERIVEDUNIT_1__nanomolarity_second;
  kb_Pip2 xPlcCa = 1.8 MWDERIVEDUNIT_1__second;
  kcat_PlcCaPip2 = 0.45 MWDERIVEDUNIT_1__second;
  kf_Ip3 = 0.1 MWDERIVEDUNIT_1__second;
  kcat_IP3deg_PIkin = 0.1 MWDERIVEDUNIT_1__second;
  kf_PIKinasexIp3deg = 0.0005 MWDERIVEDUNIT_1__nanomolarity_second;
  kb_PIKinasexIp3deg = 0.4 MWDERIVEDUNIT_1__second;
  kf_mGluR_GqabgxGlu = 0.004 MWDERIVEDUNIT_1__nanomolarity_second;
  kb_mGluR_GqabgxGlu = 26.4 MWDERIVEDUNIT_1__second;
  kf_GiaGTP = 4 MWDERIVEDUNIT_1__second;
  kf_GiaGDP = 2 MWDERIVEDUNIT_1__nanomolarity_second;
  kf_DagLxCa = 0.125 MWDERIVEDUNIT_1__nanomolarity_second;
  kb_DagLxCa = 50 MWDERIVEDUNIT_1__second;
  kf_DagKxDag = 7e-5 MWDERIVEDUNIT_1__nanomolarity_second;
  kb_DagKxDag = 0.8 MWDERIVEDUNIT_1__second;
  kcat_DagKDag = 0.2 MWDERIVEDUNIT_1__second;
  kf_CaDagLxDag = 0.0005 MWDERIVEDUNIT_1__nanomolarity_second;
  kb_CaDagLxDag = 0.15 MWDERIVEDUNIT_1__second;
  kcat_DagCaDagL = 0.25 MWDERIVEDUNIT_1__second;
  kf_TwoAG = 0.25 MWDERIVEDUNIT_1__second;
  kf_PKCxCa = 0.02 MWDERIVEDUNIT_1__nanomolarity_second;
  kb_PKCxCa = 50 MWDERIVEDUNIT_1__second;
  kf_PKCCaxDag = 1.5e-5 MWDERIVEDUNIT_1__nanomolarity_second;
  kb_PKCCaxDa = 0.15 MWDERIVEDUNIT_1__second;
  kf_AchxM4R = 0.000338 MWDERIVEDUNIT_1__nanomolarity_second;
  kb_AchxM4R = 2.5 MWDERIVEDUNIT_1__second;
  kf_Ca1xCalbindin = 0.028 MWDERIVEDUNIT_1__nanomolarity_second;
  kb_Ca1xCalbindin = 19.6 MWDERIVEDUNIT_1__second;
  kf_CamCxCa = 0.006 MWDERIVEDUNIT_1__nanomolarity_second;
  kb_CamNxCa = 1000 MWDERIVEDUNIT_1__second;
  kf_CamN_Ca2xCa1 = 0.006 MWDERIVEDUNIT_1__nanomolarity_second;
  kb_CamN_Ca2xCa1 = 9.1 MWDERIVEDUNIT_1__second;
  kf_CamC_Ca2 xCa1 = 0.1 MWDERIVEDUNIT_1__nanomolarity_second;
  kbCamC_Ca2xCa1 = 1000 MWDERIVEDUNIT_1__second;
  kf_GiaGTPxAC5 = 0.0125 MWDERIVEDUNIT_1__nanomolarity_second;
  kb_GiaGTPxAC5 = 2 MWDERIVEDUNIT_1__second;
  kf_GiaGTPxAC5_GsaGTP = 0.0125 MWDERIVEDUNIT_1__nanomolarity_second;
  kb_AC5xGiaGTP_GsaGTP = 2.997 MWDERIVEDUNIT_1__second;
  kf_AC5_GsaGTPGiaGTP_ATP = 0.2746 MWDERIVEDUNIT_1__second;
  kf_pPDE10xcAMP = 0.336 MWDERIVEDUNIT_1__nanomolarity_second;
  kcat_PDE10cAMP = 4.2 MWDERIVEDUNIT_1__second;
  kf_PKAcxPDE4 = 0.00025 MWDERIVEDUNIT_1__nanomolarity_second;
  kb_PKAcxPDE4 = 0.08 MWDERIVEDUNIT_1__second;
  Kf_PDE2_cAMPxcAMP = 0.0059 MWDERIVEDUNIT_1__nanomolarity_second;
  Kb_cAMPxPDE4 = 68.95 MWDERIVEDUNIT_1__second;
  kcat_PDE4cAMP = 17.233 MWDERIVEDUNIT_1__second;
  kb_pPDE10xcAMP = 67.2 MWDERIVEDUNIT_1__second;
  kf_cAMPxpPDE4 = 0.0864 MWDERIVEDUNIT_1__nanomolarity_second;
  kb_cAMPxpPDE4 = 275.8 MWDERIVEDUNIT_1__second;
  kcat_PKAcPDE4 = 0.02 MWDERIVEDUNIT_1__second;
  kf_PP1_pPDE4cAMP = 8e-6 MWDERIVEDUNIT_1__nanomolarity_second;
  kb_PP1_pPDE4cAMP = 0.0032 MWDERIVEDUNIT_1__second;
  kf_PDE2xcAMP = 2e-5 MWDERIVEDUNIT_1__nanomolarity_second;
  kb_PDE2xcAMP = 0.5 MWDERIVEDUNIT_1__second;
  kcat_PDE2_cAMP2 = 5.4 MWDERIVEDUNIT_1__second;
  kr_PP2ABPR72xpPDE4 = 0.0096 MWDERIVEDUNIT_1__second;
  kcat_pPDE4_PP2A = 0.0024 MWDERIVEDUNIT_1__second;
  Kf_pPDE4xPP2ACa = 4.8e-5 MWDERIVEDUNIT_1__nanomolarity_second;
  kb_pPDE4xPP2ACa = 0.0192 MWDERIVEDUNIT_1__second;
  kcat_pPDE10PP2ACa = 0.0048 MWDERIVEDUNIT_1__second;
  kcat_pPDE10_PP2A = 0.0024 MWDERIVEDUNIT_1__second;
  kcat_PKAcPDE4cAMP = 0.02 MWDERIVEDUNIT_1__second;
  kf_PKAcxPDE4cAMP = 0.00025 MWDERIVEDUNIT_1__nanomolarity_second;
  kb_PKAcxPDE4cAMP = 0.08 MWDERIVEDUNIT_1__second;
  kf_pPDE4 = 0.005 MWDERIVEDUNIT_1__second;
  kcat_pPDE4cAMP = 68.932 MWDERIVEDUNIT_1__second;
  kf_pPDE10xPP2ACa = 4.8e-5 MWDERIVEDUNIT_1__nanomolarity_second;
  kb_pPDE10xPP2ACa = 0.0192 MWDERIVEDUNIT_1__second;
  kf_pPDE4_PP2ABPR = 0.024 MWDERIVEDUNIT_1__nanomolarity_second;
  kb_pPDE4xPP2ABPR72 = 0.0096 MWDERIVEDUNIT_1__second;
  kcat_pPDE4_PP2ACa = 0.0048 MWDERIVEDUNIT_1__second;
  kf_CamNxCa = 0.1 MWDERIVEDUNIT_1__nanomolarity_second;
  kf_CamxPP2B = 0.0046 MWDERIVEDUNIT_1__nanomolarity_second;
  kb_CamxPP2B = 0.0012 MWDERIVEDUNIT_1__second;
  kf_PP2BxCamCa2C = 0.046 MWDERIVEDUNIT_1__nanomolarity_second;
  kb_PP2BxCamCa2C = 0.0012 MWDERIVEDUNIT_1__second;
  kf_PP2BxCamCa4 = 0.046 MWDERIVEDUNIT_1__nanomolarity_second;
  kb_PP2BxCamCa4 = 0.0012 MWDERIVEDUNIT_1__second;
  kf_PP2B_CamCa2NxCa1 = 0.006 MWDERIVEDUNIT_1__nanomolarity_second;
  kb_PP2B_CamCa2NxCa1 = 9.1 MWDERIVEDUNIT_1__second;
  kf_PP2B_CamCa2CxCa1 = 0.1 MWDERIVEDUNIT_1__nanomolarity_second;
  kb_PP2B_CamCa2CxCa1 = 1000 MWDERIVEDUNIT_1__second;
  kf_CamCa4xCK = 0.01 MWDERIVEDUNIT_1__nanomolarity_second;
  kb_CamCa4xCK = 3 MWDERIVEDUNIT_1__second;
  kf_CKp_CamCa4xPP1 = 4.5e-6 MWDERIVEDUNIT_1__nanomolarity_second;
  kb_CKp_CamCa4xPP1 = 0.04 MWDERIVEDUNIT_1__second;
  kf_CKpxPP1 = 9e-6 MWDERIVEDUNIT_1__nanomolarity_second;
  kb_CKpxPP1 = 0.08 MWDERIVEDUNIT_1__second;
  kcat_CKp_PP1 = 0.019 MWDERIVEDUNIT_1__second;
  Kcat_CKp_CamCa4_PP1 = 0.0095 MWDERIVEDUNIT_1__second;
  kf_PP2B_CamxCa1N = 0.1 MWDERIVEDUNIT_1__nanomolarity_second;
  kb_PP2B_CamxCa1N = 100 MWDERIVEDUNIT_1__second;
  kf_PP2BxCamCa2N = 0.046 MWDERIVEDUNIT_1__nanomolarity_second;
  kb_PP2BxCamCa2N = 0.0012 MWDERIVEDUNIT_1__second;
  kf_4xCK_CamCa4 = 1.3e-14 MWDERIVEDUNIT_1__nanomolarity___3_second;
  kf_2xCK_CamCa4x2xpCK_CamCa4 = 2.71e-14 MWDERIVEDUNIT_1__nanomolarity___3_second;
  kf_PP2B_CamxCa1C = 0.006 MWDERIVEDUNIT_1__nanomolarity_second;
  kb_PP2BCamxCa1C = 0.91 MWDERIVEDUNIT_1__second;
  kf_PKA_cAMP2x2cAMP = 0.00035 MWDERIVEDUNIT_1__nanomolarity_second;
  kb_PKA_cAMP2x2cAMP = 0.6 MWDERIVEDUNIT_1__second;
  kf_PKAxcAMP2 = 0.000261 MWDERIVEDUNIT_1__nanomolarity_second;
  kb_PKAxcAMP2 = 0.06 MWDERIVEDUNIT_1__second;
  kf_PP2AB56dxPKAc = 0.00125 MWDERIVEDUNIT_1__nanomolarity_second;
  kb_PP2AB56dxPKAc = 0.185 MWDERIVEDUNIT_1__second;
  kcat_PKAc_PP2AB56d = 0.03 MWDERIVEDUNIT_1__second;
  kf_DARPP32xPKAc = 0.0027 MWDERIVEDUNIT_1__nanomolarity_second;
  kb_DARPP32xPKAc = 8 MWDERIVEDUNIT_1__second;
  kf_PP2ABPR72xCa = 2e-5 MWDERIVEDUNIT_1__nanomolarity_second;
  kb_PP2ABPR72xCa = 0.1 MWDERIVEDUNIT_1__second;
  Kb_PP2B_CamxCa1C = 0.91 MWDERIVEDUNIT_1__second;
  kf_PKAcAMP = 0.24 MWDERIVEDUNIT_1__nanomolarity_second;
  kb_PKAcAMP = 0.0255 MWDERIVEDUNIT_1__second;
  kf_pPP2A = 0.02 MWDERIVEDUNIT_1__second;
  kf_Epac1xcAMP = 3.3e-5 MWDERIVEDUNIT_1__nanomolarity_second;
  kb_Epac1xcAMP = 0.08 MWDERIVEDUNIT_1__second;
  kcat_DARPP32_PKA = 2 MWDERIVEDUNIT_1__second;
  kf_D32p34xPP1 = 0.4 MWDERIVEDUNIT_1__nanomolarity_second;
  kb_D32p34xPP1 = 0.58 MWDERIVEDUNIT_1__second;
  kf_PP2B_CamCa4xD32p34 = 0.004 MWDERIVEDUNIT_1__nanomolarity_second;
  kb_PP2B_CamCa4xD32p34 = 4 MWDERIVEDUNIT_1__second;
  kcat_PP2BCamCa4D32p34 = 1 MWDERIVEDUNIT_1__second;
  kf_D32p34xPP2ABPR72 = 0.00152 MWDERIVEDUNIT_1__nanomolarity_second;
  kb_D32p34xPP2ABPR72 = 56 MWDERIVEDUNIT_1__second;
  kf_D32p34xPP2AB56d = 0.00152 MWDERIVEDUNIT_1__nanomolarity_second;
  kb_D32p34xPP2AB56d = 56 MWDERIVEDUNIT_1__second;
  kf_D32p34_PP1xPP2AB56d = 0.00036 MWDERIVEDUNIT_1__nanomolarity_second;
  kb_D32p34_PP1xPP2AB56d = 14.6 MWDERIVEDUNIT_1__second;
  kf_DARPP32xCDK5 = 0.0045 MWDERIVEDUNIT_1__nanomolarity_second;
  kb_DARPP32xCDK5 = 40 MWDERIVEDUNIT_1__second;
  kf_D32p75xPKAc = 0.00037 MWDERIVEDUNIT_1__nanomolarity_second;
  kb_D32p75xPKAc = 1 MWDERIVEDUNIT_1__second;
  kcat_D32p34_PP1_PP2B_CamCa4 = 1 MWDERIVEDUNIT_1__second;
  kf_D32p34_PP1xPP2B_CamCa4 = 0.004 MWDERIVEDUNIT_1__nanomolarity_second;
  kb_D32p34_PP1xPP2B_CamCa4 = 4 MWDERIVEDUNIT_1__second;
  kf_D32p75xpPP2A = 0.015 MWDERIVEDUNIT_1__nanomolarity_second;
  kb_D32p75xpPP2A = 168 MWDERIVEDUNIT_1__second;
  kcat_D32p75_pPP2A = 42 MWDERIVEDUNIT_1__second;
  kcat_D32p75_PP2ACa = 42 MWDERIVEDUNIT_1__second;
  kf_D32p75xPP2ABPR72 = 0.0023 MWDERIVEDUNIT_1__nanomolarity_second;
  kb_D32p75xPP2ABPR72 = 84 MWDERIVEDUNIT_1__second;
  kf_D32p75xPP2AB56d = 0.0023 MWDERIVEDUNIT_1__nanomolarity_second;
  kb_D32p75xPP2AB56d = 84 MWDERIVEDUNIT_1__second;
  kcat_D32p75_PP2AB56d = 21 MWDERIVEDUNIT_1__second;
  kcatD32p75PP2ABPR72 = 21 MWDERIVEDUNIT_1__second;
  kcat_D32p34_PP2ABPR72 = 14 MWDERIVEDUNIT_1__second;
  kcat_D32p34_PP1_PP2ABPR72 = 3.36 MWDERIVEDUNIT_1__second;
  kf_D32p34_PP1xPP2ABPR72 = 0.00036 MWDERIVEDUNIT_1__nanomolarity_second;
  kb_D32p34_PP1xPP2ABPR72 = 14.6 MWDERIVEDUNIT_1__second;
  kcat_D32p34_PP1_PP2AB56d = 3.36 MWDERIVEDUNIT_1__second;
  kcat_DARPP32_CDK5 = 10 MWDERIVEDUNIT_1__second;
  kf_D32p75xPP2ACa = 0.015 MWDERIVEDUNIT_1__nanomolarity_second;
  kb_D32p75xPP2ACa = 168 MWDERIVEDUNIT_1__second;
  kf_AC1xGsaGTP = 0.0385 MWDERIVEDUNIT_1__nanomolarity_second;
  kb_AC1xGsaGTP = 10 MWDERIVEDUNIT_1__second;
  kcat_AC1_CamCa4_ATP = 5.684 MWDERIVEDUNIT_1__second;
  kf_AC1_CamCa4xATP = 200 MWDERIVEDUNIT_1__nanomolarity_second;
  kb_AC1_CamCa4xATP = 227.3 MWDERIVEDUNIT_1__second;
  kf_AC1x CamCa4 = 0.006 MWDERIVEDUNIT_1__nanomolarity_second;
  kb_AC1x CamCa4 = 0.9 MWDERIVEDUNIT_1__second;
  kf_AC1GsaGTPxCamCa4 = 0.006 MWDERIVEDUNIT_1__nanomolarity_second;
  kf_AC1_GsaGTP_CamCa4xATP = 20 MWDERIVEDUNIT_1__nanomolarity_second;
  kb_AC1_GsaGTP_CamCa4xATP = 2273 MWDERIVEDUNIT_1__second;
  kb_AC1GsaGTPxCamCa4 = 0.9 MWDERIVEDUNIT_1__second;
  kcat_AC1_GsaGTP_Cam_ATP = 56.84 MWDERIVEDUNIT_1__second;
  kf_CK_CamCa4xAIP = 0.025 MWDERIVEDUNIT_1__nanomolarity_second;
  kb_CK_CamCa4xAIP = 1 MWDERIVEDUNIT_1__second;
  kf_PP2ABPR72xOA = 0.005 MWDERIVEDUNIT_1__nanomolarity_second;
  kb_PP2ABPR72xOA = 0.00015 MWDERIVEDUNIT_1__second;
  kf_PP2ACaxOA = 0.005 MWDERIVEDUNIT_1__nanomolarity_second;
  kb_PP2ACaxOA = 0.00015 MWDERIVEDUNIT_1__second;
  kf_PP2AB56dxOA = 0.005 MWDERIVEDUNIT_1__nanomolarity_second;
  kb_PP2AB56dxOA = 0.00015 MWDERIVEDUNIT_1__second;
  kf_PP1xOA = 0.001 MWDERIVEDUNIT_1__nanomolarity_second;
  kb_PP1xOA = 0.15 MWDERIVEDUNIT_1__second;
  kf_pPP2AxOA = 0.005 MWDERIVEDUNIT_1__nanomolarity_second;
  kb_pPP2AxOA = 0.00015 MWDERIVEDUNIT_1__second;
  kf_TelenzxM1R = 0.95 MWDERIVEDUNIT_1__nanomolarity_second;
  kb_TelenzxM1R = 2.5 MWDERIVEDUNIT_1__second;
  kf_TelenzxM1R_Gq = 39.6 MWDERIVEDUNIT_1__nanomolarity_second;
  kb_TelenzxM1R_Gq = 2.5 MWDERIVEDUNIT_1__second;
  kf_PDxM4R_Gi = 3.02 MWDERIVEDUNIT_1__nanomolarity_second;
  kb_PDxM4R_Gi = 20 MWDERIVEDUNIT_1__second;
  kf_PKAcxAKAR3 = 0.0025 MWDERIVEDUNIT_1__nanomolarity_second;
  kb_PKAcxAKAR3 = 0.75 MWDERIVEDUNIT_1__second;
  kcat_PKAcxAKAR3 = 0.1875 MWDERIVEDUNIT_1__second;
  kcat_PP1_pAKAR3 = 0.312 MWDERIVEDUNIT_1__second;
  kf_pAKAR3xPP1 = 0.00025 MWDERIVEDUNIT_1__nanomolarity_second;
  kb_pAKAR3xPP1 = 1.2 MWDERIVEDUNIT_1__second;
  kf_PDxM4R = 0.028 MWDERIVEDUNIT_1__nanomolarity_second;
  kb_PDxM4R = 2.5 MWDERIVEDUNIT_1__second;
  kf_DagLxCK_CamCa4 = 0.00036 MWDERIVEDUNIT_1__nanomolarity_second;
  kb_DagLxCK_CamCa4 = 0.1 MWDERIVEDUNIT_1__second;
  kf_DagLxpCK_CamCa4 = 0.0054 MWDERIVEDUNIT_1__nanomolarity_second;
  kb_DagLxpCKCamCa4 = 1.5 MWDERIVEDUNIT_1__second;
  kcat_pCKCamCa4DagL = 0.375 MWDERIVEDUNIT_1__second;
  kf_CaDagLxpCK_CamCa4 = 0.0054 MWDERIVEDUNIT_1__nanomolarity_second;
  kb_CaDagLxpCK_CamCa4 = 1.5 MWDERIVEDUNIT_1__second;
  kcat_CKCamCa4CaDagL = 0.025 MWDERIVEDUNIT_1__second;
  kf_CaDagLxCamKIICamCa4 = 0.00036 MWDERIVEDUNIT_1__nanomolarity_second;
  kb_CaDagLxCamKIICamCa4 = 0.1 MWDERIVEDUNIT_1__second;
  kf_pDagLxCa1 = 0.125 MWDERIVEDUNIT_1__nanomolarity_second;
  kb_pDagLxCa1 = 50 MWDERIVEDUNIT_1__second;
  kf_CapDagLxDag = 0.0001 MWDERIVEDUNIT_1__nanomolarity_second;
  kb_CapDagLxDag = 0.2 MWDERIVEDUNIT_1__second;
  kcat_CKpxDagL = 0.025 MWDERIVEDUNIT_1__second;
  kcat_CKCamCa4DagL = 0.025 MWDERIVEDUNIT_1__second;
  kcat_pCKCamCa4CaDagL = 0.375 MWDERIVEDUNIT_1__second;
  kcat_CapDagLDag = 0.05 MWDERIVEDUNIT_1__second;
  kf_pDagL = 0.1 MWDERIVEDUNIT_1__second;
  kf_CKpxDagL = 0.00036 MWDERIVEDUNIT_1__nanomolarity_second;
  kb_CKpxDagL = 0.1 MWDERIVEDUNIT_1__second;
  kf_GluoutxGbuf = 0.001 MWDERIVEDUNIT_1__nanomolarity_second;
  kf_GluGbuf = 20 MWDERIVEDUNIT_1__second;
  kf_Ca1xncx = 0.011 MWDERIVEDUNIT_1__nanomolarity_second;
  kb_Ca1xncx = 11.2 MWDERIVEDUNIT_1__second;
  kcat_CaOut_Leak = 1.1 MWDERIVEDUNIT_1__second;
  kf_Ca1xPMCA = 0.05 MWDERIVEDUNIT_1__nanomolarity_second;
  kb_Ca1xPMCA = 9 MWDERIVEDUNIT_1__second;
  kcat_PMCA_Ca = 3 MWDERIVEDUNIT_1__second;
  kcat_ncx_Ca = 5.6 MWDERIVEDUNIT_1__second;
  kf_CaOutxLeak = 1e-5 MWDERIVEDUNIT_1__nanomolarity_second;
  kb_CaOutxLeak = 1.1 MWDERIVEDUNIT_1__second;
  kf_pDa_D1R_Gs = 0.0002 MWDERIVEDUNIT_1__second;
  kf_Da_D1R_GsxPKAc = 0.006 MWDERIVEDUNIT_1__nanomolarity_second;
  kb_Da_D1R_GsxPKAc = 0.6 MWDERIVEDUNIT_1__second;
  kcat_PKAc_Da_D1R_Gs = 0.15 MWDERIVEDUNIT_1__second;
  kf_3xCK_CamCa4 = 2e-9 MWDERIVEDUNIT_1__nanomolarity___2_second;
  kf_DaDbuf = 20 MWDERIVEDUNIT_1__second;
  kf_AchxM4R_Gi = 0.036 MWDERIVEDUNIT_1__nanomolarity_second;
  kbAchxM4R_Gi = 20 MWDERIVEDUNIT_1__second;
  kb_GiaGTPxAC5_GsaGTP = 6 MWDERIVEDUNIT_1__second;
  kf_PDE1_CamCa4xcAMP = 0.0046 MWDERIVEDUNIT_1__nanomolarity_second;
  kb_PDE2_cAMPxcAMP = 0.5 MWDERIVEDUNIT_1__second;
  kcat_PP2B_CamCa4_D32p34 = 1 MWDERIVEDUNIT_1__second;
  kf_D32 = 1;
  kcat_D32p75_PP2ABPR72 = 21 MWDERIVEDUNIT_1__second;
  kf_PKA_cAMP4 = 0.24 MWDERIVEDUNIT_1__second;
  kb_PKA_cAMP4 = 0.00255 MWDERIVEDUNIT_1__nanomolarity_second;
  kf_CKp_CamCa4 = 0.0008 MWDERIVEDUNIT_1__second;
  kb_CKp_CamCa4 = 0.01 MWDERIVEDUNIT_1__nanomolarity_second;
  kf_AC5_GsaGTP_ATP = 28.46 MWDERIVEDUNIT_1__second;
  kf_AC5_GsaGTP_ATP1 = 0.03 MWDERIVEDUNIT_1__second;
  kf_AC5_GsaGTP_GiaGTP_ATP1 = 0.4 MWDERIVEDUNIT_1__second;
  Kb_CamC_Ca2xCa1 = 1000 MWDERIVEDUNIT_1__second;
  Kb_CamCxCa = 9.1 MWDERIVEDUNIT_1__second;
  kf_pD1R_Gsabg = 0.02 MWDERIVEDUNIT_1__second;
  kf_Da_pD1R_Gsabg = 10 MWDERIVEDUNIT_1__second;
  kb_Da_pD1R_Gsabg = 0.1 MWDERIVEDUNIT_1__nanomolarity_second;
  kf_OA_PP2A_B56d = 0.005 MWDERIVEDUNIT_1__nanomolarity_second;
  kb_OA_PP2A_B56d = 0.00015 MWDERIVEDUNIT_1__second;
  kcat_D32_p34_PP2A_B56d = 14 MWDERIVEDUNIT_1__second;
  kcat_Ca_pDagL_Dag = 0.05 MWDERIVEDUNIT_1__second;
  kf_Ca_pDagL_Dag = 0.0001 MWDERIVEDUNIT_1__nanomolarity_second;
  kb_Ca_pDagL_Dag = 0.2 MWDERIVEDUNIT_1__second;
  kf_Ca_pDagL = 0.125 MWDERIVEDUNIT_1__nanomolarity_second;
  kb_Ca_pDagL = 50 MWDERIVEDUNIT_1__second;
  kf_Da_OutxDbuf = 0.001 MWDERIVEDUNIT_1__nanomolarity_second;
  kf_cAMPxPDE4 = 0.0216 MWDERIVEDUNIT_1__nanomolarity_second;
  k1 = 1.1937;
  k2 = 1.7;
  A = 7.7;

  // Assignment rules:
  total_Cam := Cam + CamC_Ca2 + CamN_Ca2 + Cam_Ca4 + PP2B_Cam + PP2B_Cam_Ca4 + PP2B_CamC_Ca2 + PP2B_CamN_Ca2 + CK_Cam_Ca4_DagL + pCK_Cam_Ca4 + CK_Cam_Ca4_Ca_DagL + PDE1_Cam_Ca4 + PDE1_Cam_Ca4_cAMP + AC1_GsaGTP_Cam_Ca4 + AC1_Cam_Ca4_ATP + AC1_GsaGTP_Cam_ATP + D32_p34_PP2B_Cam_Ca4 + D32_p34_PP1_PP2B_Cam_Ca4;
  total_D1R := D1R + Da_D1R + Da_D1R_Gsabg + Da_pD1R_Gsabg + pD1R_Gsabg + PKAc_Da_D1R_Gsabg + Gsabg_D1R;
  total_PP2B := PP2B + PP2B_Cam + PP2B_Cam_Ca4 + PP2B_CamC_Ca2 + PP2B_CamN_Ca2 + D32_p34_PP2B_Cam_Ca4 + D32_p34_PP1_PP2B_Cam_Ca4;
  total_PDE1 := PDE1 + PDE1_Cam_Ca4 + PDE1_Cam_Ca4_cAMP;
  total_PDE4 := PDE4 + PDE4_cAMP + pPDE4 + pPDE4_PP2A + pPDE4_PP2A_Ca + PKAc_PDE4 + pPDE4_cAMP + PKAc_PDE4_cAMP;
  total_PDE2 := PDE2 + PDE2_cAMP + PDE2_cAMP2;
  total_PP1 := PP1 + D32_p34_PP1 + D32_p34_PP1_PP2A_B56d + D32_p34_PP1_PP2A_BPR72 + pPDE10_PP2A_Ca + pCK_PP1 + pCK_Cam_Ca4_PP1 + D32_p34_PP1_PP2B_Cam_Ca4 + OA_PP1 + PP1_pAKAR3 + PP1_pAKAR3;
  total_D32 := D32 + D32_p34 + D32_CDK5 + D32_p34_PP1 + D32_p34_PP1_PP2A_B56d + D32_p34_PP1_PP2A_BPR72 + D32_p34_PP1_PP2B_Cam_Ca4 + D32_p34_PP2A_B56d + D32_p34_PP2A_BPR72 + D32_p75 + D32_p75_PKAc + D32_p75_PP2A_B56d + D32_p75_PP2A_BPR72 + D32_p75_PP2A_Ca + D32_p75_pPP2A + D32_PKAc + D32_p34_PP2B_Cam_Ca4;
  total_PP2A := PP2A_B56d + PP2A_BPR72 + PP2A_Ca + pPDE4_PP2A + pPDE10_PP2A_Ca + PKAc_PP2A_B56d + pPDE4_PP2A + pPDE4_PP2A_Ca + pPP2A + D32_p34_PP2A_B56d + D32_p34_PP2A_BPR72 + D32_p34_PP2A_BPR72 + D32_p34_PP1_PP2A_BPR72 + D32_p34_PP1_PP2A_B56d + D32_p75_PP2A_BPR72 + D32_p75_PP2A_B56d + D32_p75_pPP2A + D32_p75_PP2A_Ca + OA_PP2A_B56d + OA_PP2A_BPR72 + OA_PP2A_Ca + OA_pPP2A;
  total_PKC := PKC + PKC_Ca + PKCt;
  total_PKA := PKA + PKA_cAMP2 + PKA_cAMP4 + PKAc + PKAc_PDE4 + PKAc_Da_D1R_Gsabg + PKAc_PDE4_cAMP + PKAc_PDE10 + PKAc_PDE10_cAMP + PKAc_PP2A_B56d + PKAr + D32_PKAc + D32_p75_PKAc;
  total_M4R := M4R + Ach_M4R + Ach_M4R_Giabg + Giabg_M4R + PD_M4R + PD_M4R_Giabg;
  total_M1R := M1R + M1R_Gqabg;
  Total_AC5 := AC5 + AC5_GiaGTP + AC5_GsaGTP + AC5_GsaGTP_ATP + AC5_GsaGTP_GiaGTP + AC5_GsaGTP_GiaGTP_ATP;
  Total_mGluR := mGluR + Glu_mGluR_desens + Glu_mGluR_Gqabg + Gqabg_mGluR + Glu_mGluR;
  Total_PDE10 := PDE10 + PDE10_cAMP + pPDE10 + pPDE10_cAMP + PKAc_PDE10 + PKAc_PDE10_cAMP + pPDE10_PP2A_Ca + pPDE10_PP2A_Ca;
  Total_DagL := DagL + Ca_DagL + Dag_Ca_DagL + pDagL + pCK_DagL + pCK_Cam_Ca4_DagL + pCK_Cam_Ca4_Ca_DagL + CK_Cam_Ca4_DagL + Ca_pDagL_Dag + Ca_pDagL + CK_Cam_Ca4_Ca_DagL + Ca_pDagL_Dag;
  total_DagK := DagK + DagK_Dag;
  total_PIKinase := IP3_deg_PIkin + PIkin;
  total_Pip2 := Pip2 + Plc_Ca_Pip2 + Plc_Ca_GqaGTP_Pip2;
  Total_Gq := Gqabg + Gqabg_mGluR + GqaGDP + GqaGTP + Glu_mGluR_Gqabg + M1R_Gqabg + Plc_Ca_GqaGTP + Plc_Ca_GqaGTP_Pip2 + Ach_M1R_Gqabg + Telenz_m1R_Gq + Plc_GqaGTP;
  Total_Gs := Gsabg + Gsabg_D1R + GsaGTP + GsaGDP + Da_D1R_Gsabg + PKAc_Da_D1R_Gsabg + Da_pD1R_Gsabg + AC5_GsaGTP + AC5_GsaGTP_GiaGTP + AC5_GsaGTP_GiaGTP_ATP + AC5_GsaGTP_ATP + AC1_GsaGTP + AC1_GsaGTP_Cam_Ca4 + AC1_GsaGTP_Cam_ATP + pD1R_Gsabg;
  Total_Gi := Giabg + Giabg_M4R + GiaGTP + GiaGDP + Ach_M4R_Giabg + AC5_GiaGTP + AC5_GsaGTP_GiaGTP_ATP;
  Total_Plc := Plc + Plc_Ca + Plc_Ca_GqaGTP + Plc_Ca_Pip2 + Plc_Ca_GqaGTP_Pip2 + Plc_GqaGTP;
  Total_CK := CK + CK_Cam_Ca4 + CK_Cam_Ca4_Ca_DagL + CK_Cam_Ca4_DagL + CK_Cam_Ca4_AIP + pCK + pCK_Cam_Ca4 + pCK_Cam_Ca4_Ca_DagL + pCK_Cam_Ca4_DagL + pCK_Cam_Ca4_PP1 + pCK_DagL + pCK_PP1;
  Total_Epac1 := Epac1 + Epac1_cAMP;
  Total_AC1 := AC1 + AC1_Cam_Ca4 + AC1_Cam_Ca4_ATP + AC1_GsaGTP + AC1_GsaGTP_Cam_ATP + AC1_GsaGTP_Cam_Ca4;
  Ca1 := 75 + 4925*s;

  // Rate rules:
  s' = r;
  r' = -(k1 + k2)*r - k1*k2*s;

  // Reactions:
  reaction_552: mGluR + $Glu -> Glu_mGluR; kf_mGluRxDhpg1*mGluR*Glu*spine - Kb_mGluRxDhpg1*Glu_mGluR*spine;
  reaction_553: $Ca1 + Plc -> Plc_Ca; kf_PlcxCa*Ca1*Plc*spine - kb_PlcxCa*Plc_Ca*spine;
  reaction_554: Plc_Ca + GqaGTP -> Plc_Ca_GqaGTP; kf_PlcCaxGqGTP*Plc_Ca*GqaGTP*spine - kb_PlcCaxGqGTP*Plc_Ca_GqaGTP*spine;
  reaction_555: Pip2 + Plc_Ca -> Plc_Ca_Pip2; kf_Pip2 xPlcCa*Pip2*Plc_Ca*spine - kb_Pip2 xPlcCa*Plc_Ca_Pip2*spine;
  reaction_556: Plc_Ca_Pip2 => IP3 + Plc_Ca + Dag; kcat_PlcCaPip2*Plc_Ca_Pip2*spine;
  reaction_557: Glu_mGluR + Gqabg -> Glu_mGluR_Gqabg; kf_DhpgmGluRxGabg*Glu_mGluR*Gqabg*spine - kb_DhpgmGluRxGabg*Glu_mGluR_Gqabg*spine;
  reaction_558: Glu_mGluR_Gqabg => Glu_mGluR + GqaGTP + Gbg; kcat_Dhpg_mGluR_Gabg*Glu_mGluR_Gqabg*spine;
  reaction_559: GqaGTP + Plc -> Plc_GqaGTP; kf_GqGTPxPlc*GqaGTP*Plc*spine - kb_GqGTPxPlc*Plc_GqaGTP*spine;
  reaction_560: $Ca1 + Plc_GqaGTP -> Plc_Ca_GqaGTP; kf_CaxPlc_GqGTP*Ca1*Plc_GqaGTP*spine - kb_CaxPlc_GqGTP*Plc_Ca_GqaGTP*spine;
  reaction_561: Plc_GqaGTP => Plc + GqaGDP; Kcat_PlcGqGTP*Plc_GqaGTP*spine;
  // ip3 degradation
  reaction_562: IP3 => IP3_deg; kf_Ip3*IP3*spine;
  reaction_563: DagL + $Ca1 -> Ca_DagL; kf_DagLxCa*DagL*Ca1*spine - kb_DagLxCa*Ca_DagL*spine;
  reaction_564: Ca_DagL + Dag -> Dag_Ca_DagL; kf_CaDagLxDag*Ca_DagL*Dag*spine - kb_CaDagLxDag*Dag_Ca_DagL*spine;
  reaction_565: Dag_Ca_DagL => Ca_DagL + TwoAG; kcat_DagCaDagL*Dag_Ca_DagL*spine;
  // 2ag degradation
  reaction_566: TwoAG => TwoAG_degrad; kf_TwoAG*TwoAG*spine;
  reaction_567: DagK + Dag -> DagK_Dag; kf_DagKxDag*DagK*Dag*spine - kb_DagKxDag*DagK_Dag*spine;
  reaction_568: DagK_Dag => PA + DagK; kcat_DagKDag*DagK_Dag*spine;
  reaction_569: PKC + $Ca1 -> PKC_Ca; kf_PKCxCa*PKC*Ca1*spine - kb_PKCxCa*PKC_Ca*spine;
  reaction_570: PKC_Ca + Dag -> PKCt; kf_PKCCaxDag*PKC_Ca*Dag*spine - kb_PKCCaxDa*PKCt*spine;
  reaction_571: PIkin + IP3_deg -> IP3_deg_PIkin; kf_PIKinasexIp3deg*PIkin*IP3_deg*spine - kb_PIKinasexIp3deg*IP3_deg_PIkin*spine;
  reaction_572: IP3_deg_PIkin => Pip2 + PIkin; kcat_IP3deg_PIkin*IP3_deg_PIkin*spine;
  reaction_573: Plc_Ca_GqaGTP + Pip2 -> Plc_Ca_GqaGTP_Pip2; kf_PlcCa_GqGTPxPip2*Plc_Ca_GqaGTP*Pip2*spine - kb_PlcCa_GqGTPxPip2*Plc_Ca_GqaGTP_Pip2*spine;
  reaction_574: GqaGTP => GqaGDP; kf_GqGTP*GqaGTP*spine;
  reaction_575: GqaGDP + Gbg => Gqabg; kcat_GqGDPxGbg*GqaGDP*Gbg*spine;
  reaction_576: Glu_mGluR -> Glu_mGluR_desens; kf_Dhpg_mGluRxdhpg_mGluRdesens*Glu_mGluR*spine - kb_Dhpg_mGluRxdhpg_mGluRdesens*Glu_mGluR_desens*spine;
  reaction_577: Plc_Ca_GqaGTP => Plc_Ca + GqaGDP; kf_PlcCaGqGTP*Plc_Ca_GqaGTP*spine;
  reaction_578: $Glu -> Glu_out; kf_glu*Glu - kb_glu*Glu_out;
  reaction_579: mGluR + Gqabg -> Gqabg_mGluR; kf_mGluRxGqabg*mGluR*Gqabg*spine - kb_mGluRxGqabg*Gqabg_mGluR*spine;
  reaction_580: Gqabg_mGluR + $Glu -> Glu_mGluR_Gqabg; kf_mGluR_GqabgxGlu*Gqabg_mGluR*Glu*spine - kb_mGluR_GqabgxGlu*Glu_mGluR_Gqabg*spine;
  reaction_581: Plc_Ca_GqaGTP_Pip2 => IP3 + Plc_Ca_GqaGTP + Dag; kcat_PlcCaGqGTPPip2*Plc_Ca_GqaGTP_Pip2*spine;
  reaction_582: $Da -> Da_Out; kf_Da*Da - kb_Da*Da_Out;
  reaction_583: $Da + D1R -> Da_D1R; kf_DaxD1R*Da*D1R*spine - Kb_DaxD1R*Da_D1R*spine;
  reaction_584: Gsabg + Da_D1R -> Da_D1R_Gsabg; kf_GsabgxDaD1R*Gsabg*Da_D1R*spine - kb_GsabgxDaD1R*Da_D1R_Gsabg*spine;
  reaction_585: Da_D1R_Gsabg => GsaGTP + Da_D1R + Gbg; kf_DaD1R_Gs*Da_D1R_Gsabg*spine;
  reaction_586: D1R + Gsabg -> Gsabg_D1R; kf_GsabgxD1R*D1R*Gsabg*spine - kb_GsabgxD1R*Gsabg_D1R*spine;
  reaction_587: $Da + Gsabg_D1R -> Da_D1R_Gsabg; kf_DaxD1R_Gsabg*Da*Gsabg_D1R*spine - kb_DaxD1R_Gsabg*Da_D1R_Gsabg*spine;
  reaction_588: GsaGTP => GsaGDP; kf_GsaGTP*GsaGTP*spine;
  reaction_589: GsaGDP + Gbg => Gsabg; kf_GasGDPxGbg*GsaGDP*Gbg*spine;
  reaction_590: $Ach + M4R -> Ach_M4R; kf_AchxM4R*Ach*M4R*spine - kb_AchxM4R*Ach_M4R*spine;
  reaction_591: Ach_M4R + Giabg -> Ach_M4R_Giabg; kf_AchM4RxGiabg*Ach_M4R*Giabg*spine - kb_AchM4RxGiabg*Ach_M4R_Giabg*spine;
  reaction_592: Ach_M4R_Giabg => GiaGTP + Ach_M4R + Gbg; kf_Ach_M4R_Gi*Ach_M4R_Giabg*spine;
  reaction_593: M4R + Giabg -> Giabg_M4R; kf_M4RxGiabg*M4R*Giabg*spine - kb_M4RxGiabg*Giabg_M4R*spine;
  reaction_594: M1R + $Ach -> Ach_M1R; kf_AchxM1R*M1R*Ach*spine - kb_AchxM1R*Ach_M1R*spine;
  reaction_595: Ach_M1R + Gqabg -> Ach_M1R_Gqabg; kf_AchM1RxGqabg*Ach_M1R*Gqabg*spine - kb_AchM1RxGqabg*Ach_M1R_Gqabg*spine;
  reaction_596: M1R + Gqabg -> M1R_Gqabg; kf_M1RxGqabg*M1R*Gqabg*spine - kb_M1RxGqabg*M1R_Gqabg*spine;
  reaction_597: $Ach + M1R_Gqabg -> Ach_M1R_Gqabg; kf_AchxM1RGq*Ach*M1R_Gqabg*spine - kb_AchxM1RGq*Ach_M1R_Gqabg*spine;
  reaction_598: Ach_M1R_Gqabg => GqaGTP + Ach_M1R + Gbg; kcat_AchM1RGq*Ach_M1R_Gqabg*spine;
  reaction_599: GiaGTP => GiaGDP; kf_GiaGTP*GiaGTP*spine;
  reaction_600: GiaGDP + Gbg => Giabg; kf_GiaGDP*GiaGDP*Gbg*spine;
  reaction_601: AMP => ; kf_cAMP*AMP*spine;
  reaction_602: pPDE10 => PDE10; kf_pPDE10*pPDE10*spine;
  reaction_603: PDE10 + cAMP -> PDE10_cAMP; kf_PDE10xcAMP*PDE10*cAMP*spine - kb_PDE10xcAMP*PDE10_cAMP*spine;
  reaction_604: PDE10_cAMP => AMP + PDE10; kcat_PDE10cAMP*PDE10_cAMP*spine;
  reaction_605: pPDE10 + cAMP -> pPDE10_cAMP; kf_pPDE10xcAMP*pPDE10*cAMP*spine - kb_pPDE10xcAMP*pPDE10_cAMP*spine;
  reaction_606: pPDE10_cAMP => pPDE10 + AMP; kcat_pPDE10cAMP*pPDE10_cAMP*spine;
  reaction_607: PKAc + PDE10 -> PKAc_PDE10; kf_PKAcxPDE10*PKAc*PDE10*spine - kb_PKAcxPDE10*PKAc_PDE10*spine;
  reaction_608: PKAc_PDE10 => pPDE10 + PKAc; kcat_PKAcPDE10*PKAc_PDE10*spine;
  reaction_609: PDE10_cAMP + PKAc -> PKAc_PDE10_cAMP; kf_PKAcxPDE10cAMP*PDE10_cAMP*PKAc*spine - kb_PKAcxPDE10cAMP*PKAc_PDE10_cAMP*spine;
  reaction_610: PKAc_PDE10_cAMP => pPDE10_cAMP + PKAc; kf_PKAcPDE10cAMP*PKAc_PDE10_cAMP*spine;
  reaction_611: PKAc + PDE4 -> PKAc_PDE4; kf_PKAcxPDE4*PKAc*PDE4*spine - kb_PKAcxPDE4*PKAc_PDE4*spine;
  reaction_612: PKAc_PDE4 => pPDE4 + PKAc; kcat_PKAcPDE4*PKAc_PDE4*spine;
  reaction_613: PDE4_cAMP => AMP + PDE4; kcat_PDE4cAMP*PDE4_cAMP*spine;
  reaction_614: cAMP + pPDE4 -> pPDE4_cAMP; kf_cAMPxpPDE4*cAMP*pPDE4*spine - kb_cAMPxpPDE4*pPDE4_cAMP*spine;
  reaction_615: pPDE4_cAMP => AMP + pPDE4; kcat_pPDE4cAMP*pPDE4_cAMP*spine;
  reaction_616: PDE4_cAMP + PKAc -> PKAc_PDE4_cAMP; kf_PKAcxPDE4cAMP*PDE4_cAMP*PKAc*spine - kb_PKAcxPDE4cAMP*PKAc_PDE4_cAMP*spine;
  reaction_617: PKAc_PDE4_cAMP => pPDE4_cAMP + PKAc; kcat_PKAcPDE4cAMP*PKAc_PDE4_cAMP*spine;
  reaction_618: pPDE4 => PDE4; kf_pPDE4*pPDE4*spine;
  reaction_619: DagL + CK_Cam_Ca4 -> CK_Cam_Ca4_DagL; kf_DagLxCK_CamCa4*DagL*CK_Cam_Ca4*spine - kb_DagLxCK_CamCa4*CK_Cam_Ca4_DagL*spine;
  reaction_620: CK_Cam_Ca4_DagL => pDagL + CK_Cam_Ca4; kcat_CKCamCa4DagL*CK_Cam_Ca4_DagL*spine;
  reaction_621: DagL + pCK_Cam_Ca4 -> pCK_Cam_Ca4_DagL; kf_DagLxpCK_CamCa4*DagL*pCK_Cam_Ca4*spine - kb_DagLxpCKCamCa4*pCK_Cam_Ca4_DagL*spine;
  reaction_622: pCK_Cam_Ca4_DagL => pDagL + pCK_Cam_Ca4; kcat_pCKCamCa4DagL*pCK_Cam_Ca4_DagL*spine;
  reaction_623: Ca_DagL + pCK_Cam_Ca4 -> pCK_Cam_Ca4_Ca_DagL; kf_CaDagLxpCK_CamCa4*Ca_DagL*pCK_Cam_Ca4*spine - kb_CaDagLxpCK_CamCa4*pCK_Cam_Ca4_Ca_DagL*spine;
  reaction_624: pCK_Cam_Ca4_Ca_DagL => Ca_pDagL + pCK_Cam_Ca4; kcat_pCKCamCa4CaDagL*pCK_Cam_Ca4_Ca_DagL*spine;
  reaction_625: Ca_DagL + CK_Cam_Ca4 -> CK_Cam_Ca4_Ca_DagL; kf_CaDagLxCamKIICamCa4*Ca_DagL*CK_Cam_Ca4*spine - kb_CaDagLxCamKIICamCa4*CK_Cam_Ca4_Ca_DagL*spine;
  reaction_626: CK_Cam_Ca4_Ca_DagL => Ca_pDagL + CK_Cam_Ca4; kcat_CKCamCa4CaDagL*CK_Cam_Ca4_Ca_DagL*spine;
  reaction_627: pDagL => DagL; kf_pDagL*pDagL*spine;
  reaction_628: pCK + DagL -> pCK_DagL; kf_CKpxDagL*pCK*DagL*spine - kb_CKpxDagL*pCK_DagL*spine;
  reaction_629: pCK_DagL => pDagL + pCK; kcat_CKpxDagL*pCK_DagL*spine;
  reaction_630: Glu_Gbuf => $Glu + Gbuf; kf_GluGbuf*Glu_Gbuf*spine;
  reaction_631: Glu_out + Gbuf => ; kf_GluoutxGbuf*Glu_out*Gbuf*spine;
  reaction_632: $Ca1 + PMCA -> PMCA_Ca; kf_Ca1xPMCA*Ca1*PMCA*spine - kb_Ca1xPMCA*PMCA_Ca*spine;
  reaction_633: $Ca1 + ncx -> ncx_Ca; kf_Ca1xncx*Ca1*ncx*spine - kb_Ca1xncx*ncx_Ca*spine;
  reaction_634: PMCA_Ca => PMCA + Ca_Out; kcat_PMCA_Ca*PMCA_Ca*spine;
  reaction_635: ncx_Ca => ncx + Ca_Out; kcat_ncx_Ca*ncx_Ca*spine;
  reaction_636: Ca_Out + Leak -> CaOut_Leak; kf_CaOutxLeak*Ca_Out*Leak*spine - kb_CaOutxLeak*CaOut_Leak*spine;
  reaction_637: CaOut_Leak => Leak + $Ca1; kcat_CaOut_Leak*CaOut_Leak*spine;
  reaction_638: Da_D1R_Gsabg + PKAc -> PKAc_Da_D1R_Gsabg; kf_Da_D1R_GsxPKAc*Da_D1R_Gsabg*PKAc*spine - kb_Da_D1R_GsxPKAc*PKAc_Da_D1R_Gsabg*spine;
  reaction_639: PKAc_Da_D1R_Gsabg => PKAc + Da_pD1R_Gsabg; kcat_PKAc_Da_D1R_Gs*PKAc_Da_D1R_Gsabg*spine;
  reaction_640: Da_pD1R_Gsabg => $Da + Gsabg + D1R; kf_pDa_D1R_Gs*Da_pD1R_Gsabg*spine;
  reaction_641: Da_Dbuf => Dbuf + $Da; kf_DaDbuf*Da_Dbuf*spine;
  reaction_642: $Ach + Giabg_M4R -> Ach_M4R_Giabg; kf_AchxM4R_Gi*Ach*Giabg_M4R*spine - kbAchxM4R_Gi*Ach_M4R_Giabg*spine;
  reaction_643: GiaGTP + AC5 -> AC5_GiaGTP; kf_GiaGTPxAC5*GiaGTP*AC5*spine - kb_GiaGTPxAC5*AC5_GiaGTP*spine;
  reaction_644: AC5 + GsaGTP -> AC5_GsaGTP; kf_GsaGTPxAC5*AC5*GsaGTP*spine - kb_GsaGTPxAC5*AC5_GsaGTP*spine;
  reaction_645: ATP + AC5_GsaGTP -> AC5_GsaGTP_ATP; kf_ATPxAC5xGsaGTP*ATP*AC5_GsaGTP*spine - kb_ATPxAC5GsaGTP*AC5_GsaGTP_ATP*spine;
  reaction_646: GiaGTP + AC5_GsaGTP -> AC5_GsaGTP_GiaGTP; kf_GiaGTPxAC5_GsaGTP*GiaGTP*AC5_GsaGTP*spine - kb_GiaGTPxAC5_GsaGTP*AC5_GsaGTP_GiaGTP*spine;
  reaction_647: GsaGTP + AC5_GiaGTP -> AC5_GsaGTP_GiaGTP; kf_AC5xGiaGTP_GsaGTP*GsaGTP*AC5_GiaGTP*spine - kb_AC5xGiaGTP_GsaGTP*AC5_GsaGTP_GiaGTP*spine;
  reaction_648: ATP + AC5_GsaGTP_GiaGTP -> AC5_GsaGTP_GiaGTP_ATP; kf_AC5_GsaGTP_GiaGTPxATP*ATP*AC5_GsaGTP_GiaGTP*spine - kb_AC5_GsaGTP_GiaGTPxATP*AC5_GsaGTP_GiaGTP_ATP*spine;
  reaction_649: AC5_GsaGTP_GiaGTP_ATP -> cAMP + AC5_GsaGTP_GiaGTP; kf_AC5_GsaGTPGiaGTP_ATP*AC5_GsaGTP_GiaGTP_ATP*spine - kb_AC5_GsaGTPGiaGTP_ATP*cAMP*AC5_GsaGTP_GiaGTP*spine;
  reaction_650: AC5_GsaGTP_ATP -> AC5_GsaGTP + cAMP; kf_AC5_GsaGTP_ATP*AC5_GsaGTP_ATP*spine - kb_AC5GsaGTP_ATP*AC5_GsaGTP*cAMP*spine;
  reaction_651: PDE1 + Cam_Ca4 -> PDE1_Cam_Ca4; kf_PDE1xCamCa4*PDE1*Cam_Ca4*spine - kb_PDE1xCamCa4*PDE1_Cam_Ca4*spine;
  reaction_652: PDE1_Cam_Ca4 + cAMP -> PDE1_Cam_Ca4_cAMP; kf_PDE1_CamCa4xcAMP*PDE1_Cam_Ca4*cAMP*spine - kb_PDE1_CamCa4xcAMP*PDE1_Cam_Ca4_cAMP*spine;
  reaction_653: PDE1_Cam_Ca4_cAMP => PDE1_Cam_Ca4 + AMP; kcat_PDE1CamCa4cAMP*PDE1_Cam_Ca4_cAMP*spine;
  reaction_654: pPDE4_PP2A_Ca => PP2A_Ca + PDE4; kcat_pPDE4_PP2ACa*pPDE4_PP2A_Ca*spine;
  reaction_655: pPDE4_PP2A => PP2A_BPR72 + PDE4; kcat_pPDE4_PP2A*pPDE4_PP2A*spine;
  reaction_656: pPDE4 + PP2A_Ca -> pPDE4_PP2A_Ca; Kf_pPDE4xPP2ACa*pPDE4*PP2A_Ca*spine - kb_pPDE4xPP2ACa*pPDE4_PP2A_Ca*spine;
  reaction_657: PP2A_BPR72 + pPDE4 -> pPDE4_PP2A; kf_pPDE4_PP2ABPR*PP2A_BPR72*pPDE4*spine - kb_pPDE4xPP2ABPR72*pPDE4_PP2A*spine;
  reaction_658: PP2A_BPR72 + pPDE10 -> pPDE10_PP2A; kf_pPDE4_PP2ABPR*PP2A_BPR72*pPDE10*spine - kb_pPDE4xPP2ABPR72*pPDE10_PP2A*spine;
  reaction_659: PP2A_Ca + pPDE10 -> pPDE10_PP2A_Ca; kf_pPDE10xPP2ACa*PP2A_Ca*pPDE10*spine - kb_pPDE10xPP2ACa*pPDE10_PP2A_Ca*spine;
  reaction_660: pPDE10_PP2A_Ca => PP2A_Ca + PDE10; kcat_pPDE10PP2ACa*pPDE10_PP2A_Ca*spine;
  reaction_661: pPDE10_PP2A => PP2A_BPR72 + PDE10; kcat_pPDE10_PP2A*pPDE10_PP2A*spine;
  reaction_662: PDE2 + cAMP -> PDE2_cAMP; kf_PDE2xcAMP*PDE2*cAMP*spine - kb_PDE2xcAMP*PDE2_cAMP*spine;
  reaction_663: cAMP + PDE2_cAMP -> PDE2_cAMP2; Kf_PDE2_cAMPxcAMP*cAMP*PDE2_cAMP*spine - kb_PDE2_cAMPxcAMP*PDE2_cAMP2*spine;
  reaction_664: PDE2_cAMP2 => PDE2_cAMP + AMP; kcat_PDE2_cAMP2*PDE2_cAMP2*spine;
  reaction_665: Cam + $Ca1 -> CamN_Ca2; kf_CamNxCa*Cam*Ca1*spine - kb_CamNxCa*CamN_Ca2*spine;
  reaction_666: CamC_Ca2 + $Ca1 -> Cam_Ca4; kf_CamC_Ca2 xCa1*CamC_Ca2*Ca1*spine - Kb_CamC_Ca2xCa1*Cam_Ca4*spine;
  reaction_667: CamN_Ca2 + $Ca1 -> Cam_Ca4; kf_CamN_Ca2xCa1*CamN_Ca2*Ca1*spine - kb_CamN_Ca2xCa1*Cam_Ca4*spine;
  reaction_668: Cam + $Ca1 -> CamC_Ca2; kf_CamCxCa*Cam*Ca1*spine - Kb_CamCxCa*CamC_Ca2*spine;
  reaction_669: $Ca1 + PP2A_BPR72 -> PP2A_Ca; kf_PP2ABPR72xCa*Ca1*PP2A_BPR72*spine - kb_PP2ABPR72xCa*PP2A_Ca*spine;
  reaction_670: PKAc + PP2A_B56d -> PKAc_PP2A_B56d; kf_PP2AB56dxPKAc*PKAc*PP2A_B56d*spine - kb_PP2AB56dxPKAc*PKAc_PP2A_B56d*spine;
  reaction_671: PKAc_PP2A_B56d => PKAc + pPP2A; kcat_PKAc_PP2AB56d*PKAc_PP2A_B56d*spine;
  reaction_672: pPP2A => PP2A_B56d; kf_pPP2A*pPP2A*spine;
  reaction_673: Epac1 + cAMP -> Epac1_cAMP; kf_Epac1xcAMP*Epac1*cAMP*spine - kb_Epac1xcAMP*Epac1_cAMP*spine;
  reaction_674: PP2B + Cam -> PP2B_Cam; kf_CamxPP2B*PP2B*Cam*spine - kb_CamxPP2B*PP2B_Cam*spine;
  reaction_675: PP2B + CamC_Ca2 -> PP2B_CamC_Ca2; kf_PP2BxCamCa2C*PP2B*CamC_Ca2*spine - kb_PP2BxCamCa2C*PP2B_CamC_Ca2*spine;
  reaction_676: PP2B + CamN_Ca2 -> PP2B_CamN_Ca2; kf_PP2BxCamCa2N*PP2B*CamN_Ca2*spine - kb_PP2BxCamCa2N*PP2B_CamN_Ca2*spine;
  reaction_677: PP2B_Cam + $Ca1 -> PP2B_CamC_Ca2; kf_PP2B_CamxCa1C*PP2B_Cam*Ca1*spine - Kb_PP2B_CamxCa1C*PP2B_CamC_Ca2*spine;
  reaction_678: PP2B_Cam + $Ca1 -> PP2B_CamN_Ca2; kf_PP2B_CamxCa1N*PP2B_Cam*Ca1*spine - kb_PP2B_CamxCa1N*PP2B_CamN_Ca2*spine;
  reaction_679: PP2B_CamC_Ca2 + $Ca1 -> PP2B_Cam_Ca4; kf_PP2B_CamCa2CxCa1*PP2B_CamC_Ca2*Ca1*spine - kb_PP2B_CamCa2CxCa1*PP2B_Cam_Ca4*spine;
  reaction_680: PP2B_CamN_Ca2 + $Ca1 -> PP2B_Cam_Ca4; kf_PP2B_CamCa2NxCa1*PP2B_CamN_Ca2*Ca1*spine - kb_PP2B_CamCa2NxCa1*PP2B_Cam_Ca4*spine;
  reaction_681: PP2B + Cam_Ca4 -> PP2B_Cam_Ca4; kf_PP2BxCamCa4*PP2B*Cam_Ca4*spine - kb_PP2BxCamCa4*PP2B_Cam_Ca4*spine;
  reaction_682: Cam_Ca4 + CK -> CK_Cam_Ca4; kf_CamCa4xCK*Cam_Ca4*CK*spine - kb_CamCa4xCK*CK_Cam_Ca4*spine;
  reaction_683: 3 CK_Cam_Ca4 => pCK_Cam_Ca4 + 2 CK_Cam_Ca4; kf_3xCK_CamCa4*CK_Cam_Ca4^3*spine;
  reaction_684: 2 CK_Cam_Ca4 + 2 pCK_Cam_Ca4 => pCK_Cam_Ca4 + 3 CK_Cam_Ca4; kf_2xCK_CamCa4x2xpCK_CamCa4*CK_Cam_Ca4^2*pCK_Cam_Ca4^2*spine;
  reaction_685: pCK + PP1 -> pCK_PP1; kf_CKpxPP1*pCK*PP1*spine - kb_CKpxPP1*pCK_PP1*spine;
  reaction_686: PP1 + pCK_Cam_Ca4 -> pCK_Cam_Ca4_PP1; kf_CKp_CamCa4xPP1*PP1*pCK_Cam_Ca4*spine - kb_CKp_CamCa4xPP1*pCK_Cam_Ca4_PP1*spine;
  reaction_687: pCK_PP1 => PP1 + CK; kcat_CKp_PP1*pCK_PP1*spine;
  reaction_688: pCK_Cam_Ca4_PP1 => CK_Cam_Ca4 + PP1; Kcat_CKp_CamCa4_PP1*pCK_Cam_Ca4_PP1*spine;
  reaction_689: GsaGTP + AC1 -> AC1_GsaGTP; kf_AC1xGsaGTP*GsaGTP*AC1*spine - kb_AC1xGsaGTP*AC1_GsaGTP*spine;
  reaction_690: AC1 + Cam_Ca4 -> AC1_Cam_Ca4; kf_AC1x CamCa4*AC1*Cam_Ca4*spine - kb_AC1x CamCa4*AC1_Cam_Ca4*spine;
  reaction_691: AC1_GsaGTP + Cam_Ca4 -> AC1_GsaGTP_Cam_Ca4; kf_AC1GsaGTPxCamCa4*AC1_GsaGTP*Cam_Ca4*spine - kb_AC1GsaGTPxCamCa4*AC1_GsaGTP_Cam_Ca4*spine;
  reaction_692: AC1_GsaGTP_Cam_ATP => cAMP + AC1_GsaGTP_Cam_Ca4; kcat_AC1_GsaGTP_Cam_ATP*AC1_GsaGTP_Cam_ATP*spine;
  reaction_693: AC1_Cam_Ca4 + ATP -> AC1_Cam_Ca4_ATP; kf_AC1_CamCa4xATP*AC1_Cam_Ca4*ATP*spine - kb_AC1_CamCa4xATP*AC1_Cam_Ca4_ATP*spine;
  reaction_694: AC1_Cam_Ca4_ATP => AC1_Cam_Ca4 + cAMP; kcat_AC1_CamCa4_ATP*AC1_Cam_Ca4_ATP*spine;
  reaction_695: ATP + AC1_GsaGTP_Cam_Ca4 -> AC1_GsaGTP_Cam_ATP; kf_AC1_GsaGTP_CamCa4xATP*ATP*AC1_GsaGTP_Cam_Ca4*spine - kb_AC1_GsaGTP_CamCa4xATP*AC1_GsaGTP_Cam_ATP*spine;
  reaction_696: D32 + PKAc -> D32_PKAc; kf_DARPP32xPKAc*D32*PKAc*spine - kb_DARPP32xPKAc*D32_PKAc*spine;
  reaction_697: D32_PKAc => D32_p34 + PKAc; kcat_DARPP32_PKA*D32_PKAc*spine;
  reaction_698: D32_p34 + PP1 -> D32_p34_PP1; kf_D32p34xPP1*D32_p34*PP1*spine - kb_D32p34xPP1*D32_p34_PP1*spine;
  reaction_699: D32_p34_PP2B_Cam_Ca4 => PP2B_Cam_Ca4 + D32; kcat_PP2B_CamCa4_D32p34*D32_p34_PP2B_Cam_Ca4*spine;
  reaction_700: D32_p34 + PP2B_Cam_Ca4 -> D32_p34_PP2B_Cam_Ca4; kf_PP2B_CamCa4xD32p34*D32_p34*PP2B_Cam_Ca4*spine - kb_PP2B_CamCa4xD32p34*D32_p34_PP2B_Cam_Ca4*spine;
  reaction_701: PP2B_Cam_Ca4 + D32_p34_PP1 -> D32_p34_PP1_PP2B_Cam_Ca4; kf_D32p34_PP1xPP2B_CamCa4*PP2B_Cam_Ca4*D32_p34_PP1*spine - kb_D32p34_PP1xPP2B_CamCa4*D32_p34_PP1_PP2B_Cam_Ca4*spine;
  reaction_702: D32_p34_PP1_PP2B_Cam_Ca4 => D32 + PP2B_Cam_Ca4 + PP1; kcat_D32p34_PP1_PP2B_CamCa4*D32_p34_PP1_PP2B_Cam_Ca4*spine;
  reaction_703: D32_p34_PP2A_B56d => PP2A_B56d + D32; kcat_D32_p34_PP2A_B56d*D32_p34_PP2A_B56d*spine;
  reaction_704: D32_p34 + PP2A_B56d -> D32_p34_PP2A_B56d; kf_D32p34xPP2AB56d*D32_p34*PP2A_B56d*spine - kb_D32p34xPP2AB56d*D32_p34_PP2A_B56d*spine;
  reaction_705: D32_p34_PP2A_BPR72 => PP2A_BPR72 + D32; kcat_D32p34_PP2ABPR72*D32_p34_PP2A_BPR72*spine;
  reaction_706: D32_p34 + PP2A_BPR72 -> D32_p34_PP2A_BPR72; kf_D32p34xPP2ABPR72*D32_p34*PP2A_BPR72*spine - kb_D32p34xPP2ABPR72*D32_p34_PP2A_BPR72*spine;
  reaction_707: D32_p34_PP1_PP2A_B56d => D32 + PP1 + PP2A_B56d; kcat_D32p34_PP1_PP2AB56d*D32_p34_PP1_PP2A_B56d*spine;
  reaction_708: D32_p34_PP1 + PP2A_B56d -> D32_p34_PP1_PP2A_B56d; kf_D32p34_PP1xPP2AB56d*D32_p34_PP1*PP2A_B56d*spine - kb_D32p34_PP1xPP2AB56d*D32_p34_PP1_PP2A_B56d*spine;
  reaction_709: D32_p34_PP1_PP2A_BPR72 => D32 + PP1 + PP2A_BPR72; kcat_D32p34_PP1_PP2ABPR72*D32_p34_PP1_PP2A_BPR72*spine;
  reaction_710: D32_p34_PP1 + PP2A_BPR72 -> D32_p34_PP1_PP2A_BPR72; kf_D32p34_PP1xPP2ABPR72*D32_p34_PP1*PP2A_BPR72*spine - kb_D32p34_PP1xPP2ABPR72*D32_p34_PP1_PP2A_BPR72*spine;
  reaction_711: D32_CDK5 => D32_p75 + CDK5; kcat_DARPP32_CDK5*D32_CDK5*spine;
  reaction_712: D32 + CDK5 -> D32_CDK5; kf_DARPP32xCDK5*D32*CDK5*spine - kb_DARPP32xCDK5*D32_CDK5*spine;
  reaction_713: D32_p75 + PP2A_B56d -> D32_p75_PP2A_B56d; kf_D32p75xPP2AB56d*D32_p75*PP2A_B56d*spine - kb_D32p75xPP2AB56d*D32_p75_PP2A_B56d*spine;
  reaction_714: D32_p75_PP2A_B56d => D32 + PP2A_B56d; kcat_D32p75_PP2AB56d*D32_p75_PP2A_B56d*spine;
  reaction_715: D32_p75 + PP2A_BPR72 -> D32_p75_PP2A_BPR72; kf_D32p75xPP2ABPR72*D32_p75*PP2A_BPR72*spine - kb_D32p75xPP2ABPR72*D32_p75_PP2A_BPR72*spine;
  reaction_716: D32_p75_PP2A_BPR72 => D32 + PP2A_BPR72; kcat_D32p75_PP2ABPR72*D32_p75_PP2A_BPR72*spine;
  reaction_717: D32_p75 + pPP2A -> D32_p75_pPP2A; kf_D32p75xpPP2A*D32_p75*pPP2A*spine - kb_D32p75xpPP2A*D32_p75_pPP2A*spine;
  reaction_718: D32_p75_pPP2A => pPP2A + D32; kcat_D32p75_pPP2A*D32_p75_pPP2A*spine;
  reaction_719: PP2A_Ca + D32_p75 -> D32_p75_PP2A_Ca; kf_D32p75xPP2ACa*PP2A_Ca*D32_p75*spine - kb_D32p75xPP2ACa*D32_p75_PP2A_Ca*spine;
  reaction_720: D32_p75_PP2A_Ca => PP2A_Ca + D32; kcat_D32p75_PP2ACa*D32_p75_PP2A_Ca*spine;
  reaction_721: D32_p75 + PKAc -> D32_p75_PKAc; kf_D32p75xPKAc*D32_p75*PKAc*spine - kb_D32p75xPKAc*D32_p75_PKAc*spine;
  reaction_722: PKA + cAMP -> PKA_cAMP2; kf_PKAxcAMP2*PKA*cAMP*spine - kb_PKAxcAMP2*PKA_cAMP2*spine;
  reaction_723: PKA_cAMP2 + cAMP -> PKA_cAMP4; kf_PKA_cAMP2x2cAMP*PKA_cAMP2*cAMP*spine - kb_PKA_cAMP2x2cAMP*PKA_cAMP4*spine;
  reaction_724: CK_Cam_Ca4 + AIP -> CK_Cam_Ca4_AIP; kf_CK_CamCa4xAIP*CK_Cam_Ca4*AIP*spine - kb_CK_CamCa4xAIP*CK_Cam_Ca4_AIP*spine;
  reaction_725: OA + PP2A_B56d -> OA_PP2A_B56d; kf_OA_PP2A_B56d*OA*PP2A_B56d*spine - kb_OA_PP2A_B56d*OA_PP2A_B56d*spine;
  reaction_726: OA + PP2A_Ca -> OA_PP2A_Ca; kf_PP2ACaxOA*OA*PP2A_Ca*spine - kb_PP2ACaxOA*OA_PP2A_Ca*spine;
  reaction_727: OA + PP2A_BPR72 -> OA_PP2A_BPR72; kf_PP2ABPR72xOA*OA*PP2A_BPR72*spine - kb_PP2ABPR72xOA*OA_PP2A_BPR72*spine;
  reaction_728: OA + pPP2A -> OA_pPP2A; kf_pPP2AxOA*OA*pPP2A*spine - kb_pPP2AxOA*OA_pPP2A*spine;
  reaction_729: M1R + Telenz -> Telenz_M1R; kf_TelenzxM1R*M1R*Telenz*spine - kb_TelenzxM1R*Telenz_M1R*spine;
  reaction_730: Telenz + M1R_Gqabg -> Telenz_m1R_Gq; kf_TelenzxM1R_Gq*Telenz*M1R_Gqabg*spine - kb_TelenzxM1R_Gq*Telenz_m1R_Gq*spine;
  reaction_731: M4R + PD102840 -> PD_M4R; kf_PDxM4R*M4R*PD102840*spine - kb_PDxM4R*PD_M4R*spine;
  reaction_732: Giabg_M4R + PD102840 -> PD_M4R_Giabg; kf_PDxM4R_Gi*Giabg_M4R*PD102840*spine - kb_PDxM4R_Gi*PD_M4R_Giabg*spine;
  reaction_733: OA + PP1 -> OA_PP1; kf_PP1xOA*OA*PP1*spine - kb_PP1xOA*OA_PP1*spine;
  reaction_734: AKAR3 + PKAc -> PKAc_AKAR3; kf_PKAcxAKAR3*AKAR3*PKAc*spine - kb_PKAcxAKAR3*PKAc_AKAR3*spine;
  reaction_735: PKAc_AKAR3 => PKAc + pAKAR3; kcat_PKAcxAKAR3*PKAc_AKAR3*spine;
  reaction_736: pAKAR3 + PP1 -> PP1_pAKAR3; kf_pAKAR3xPP1*pAKAR3*PP1*spine - kb_pAKAR3xPP1*PP1_pAKAR3*spine;
  reaction_737: PP1_pAKAR3 => PP1 + AKAR3; kcat_PP1_pAKAR3*PP1_pAKAR3*spine;
  reaction_738: PKA_cAMP4 -> PKAr + PKAc; kf_PKA_cAMP4*PKA_cAMP4*spine - kb_PKA_cAMP4*PKAr*PKAc*spine;
  reaction_739: pCK_Cam_Ca4 -> Cam_Ca4 + pCK; kf_CKp_CamCa4*pCK_Cam_Ca4*spine - kb_CKp_CamCa4*Cam_Ca4*pCK*spine;
  reaction_740: AC5_GsaGTP_ATP => GsaGDP + cAMP + AC5; kf_AC5_GsaGTP_ATP1*AC5_GsaGTP_ATP*spine;
  reaction_741: AC5_GsaGTP_GiaGTP_ATP => GiaGDP + cAMP + AC5_GsaGTP; kf_AC5_GsaGTP_GiaGTP_ATP1*AC5_GsaGTP_GiaGTP_ATP*spine;
  reaction_742: 4 CK_Cam_Ca4 => 3 pCK_Cam_Ca4 + CK_Cam_Ca4; kf_4xCK_CamCa4*CK_Cam_Ca4^4*spine;
  reaction_743: Da_pD1R_Gsabg -> $Da + pD1R_Gsabg; kf_Da_pD1R_Gsabg*Da_pD1R_Gsabg*spine - kb_Da_pD1R_Gsabg*Da*pD1R_Gsabg*spine;
  reaction_744: pD1R_Gsabg => Gsabg_D1R; kf_pD1R_Gsabg*pD1R_Gsabg*spine;
  reaction_745: $Ca1 + pDagL -> Ca_pDagL; kf_Ca_pDagL*Ca1*pDagL*spine - kb_Ca_pDagL*Ca_pDagL*spine;
  reaction_746: Ca_pDagL + Dag -> Ca_pDagL_Dag; kf_Ca_pDagL_Dag*Ca_pDagL*Dag*spine - kb_Ca_pDagL_Dag*Ca_pDagL_Dag*spine;
  reaction_747: Ca_pDagL_Dag => TwoAG; kcat_Ca_pDagL_Dag*Ca_pDagL_Dag*spine;
  reaction_748: Da_Out + Dbuf => ; kf_Da_OutxDbuf*Da_Out*Dbuf*spine;
  reaction_749: PDE4 + cAMP -> PDE4_cAMP; kf_cAMPxPDE4*PDE4*cAMP*spine - Kb_cAMPxPDE4*PDE4_cAMP*spine;

  // Events:
  event_ca: at ((time >= et) && (time < et + 0.1)): r = A*(k2 - k1), et = et + 10;

  // Unit definitions:
  unit MWDERIVEDUNIT_micrometer___3 = metre^3 * 1e-18 dimensionless; MWDERIVEDUNIT_micrometer___3 is "micrometer^3";
  unit MWBUILTINUNIT_liter = metre^3 * 1e-3 dimensionless;
  unit MWDERIVEDUNIT_1__nanomolarity_second = metre^3 * 1000000 dimensionless / (mole * second); MWDERIVEDUNIT_1__nanomolarity_second is "1/(nanomolarity*second)";
  unit MWDERIVEDUNIT_1__second = dimensionless / second; MWDERIVEDUNIT_1__second is "1/second";
  unit MWDERIVEDUNIT_1__nanomolarity___3_second = metre^9 * 1e18 dimensionless / (mole^3 * second); MWDERIVEDUNIT_1__nanomolarity___3_second is "1/(nanomolarity^3*second)";
  unit MWDERIVEDUNIT_1__nanomolarity___2_second = metre^6 * 1e12 dimensionless / (mole^2 * second); MWDERIVEDUNIT_1__nanomolarity___2_second is "1/(nanomolarity^2*second)";
end
