// SBML level 3 version 1

model Ecoli_translation()
  // Hu2020 - E. coli translation model
  // This translation model consists of 274 biochemical reactions, including 119 reactions with non-linear kinetics. This mechanistic model accounts for the concentrations of mRNA, the ribosome, the different charged tRNAs, and the elongation factors Ts (EF-Ts) and Tu (EF-Tu). We fully parameterized the model with molecular masses and kinetic constants measured experimentally; the only exceptions are the initiation parameters, which were previously estimated from gene expression data, and the ribosomal Michaelis constant for the ternary complexes, which was estimated based on the diffusion limit and hence represents a lower bound. The model is based purely on biochemical and biophysical considerations; it contains no free parameters for fitting, nor does it include any explicit growth-rate dependencies. This model is used to test our hypothesis that, to maximize the E. coli growth rate in a given environment, natural selection minimizes the total cost of translation components utilized to achieve the required protein production rate.
  // hasProperty mamo:MAMO_0000008

  // Compartments:
  compartment cytosol = 1 litre;

  // Species:
  species EFTu in cytosol = 1; EFTu is "translation elongation factor Tu (EF-Tu)";  // substance in micromole; uniprot:P0CE47
  species $GDP in cytosol = 680; GDP is "Guanosine-5'-diphosphate";  // substance in micromole; kegg.compound:C00035
  species EFTu_GDP in cytosol = 1; EFTu_GDP is "The complex of EF-Tu and GFP";  // substance in micromole; isDescribedBy pubmed:11772013
  species EFTs in cytosol = 1; EFTs is "translation elongation factor Ts (EF-Ts)";  // substance in micromole; uniprot:P0A6P1
  species EFTu_EFTs in cytosol = 1; EFTu_EFTs is "The complex of EF-Tu and EF-Ts";  // substance in micromole; isDescribedBy pubmed:11772013
  species EFTu_GDP_EFTs in cytosol = 1; EFTu_GDP_EFTs is "The complex of EF-Tu, GDP, and EF-Ts";  // substance in micromole; isDescribedBy pubmed:11772013
  species $GTP in cytosol = 4900; GTP is "Guanosine-5'-triphosphate";  // substance in micromole; kegg.compound:C00044
  species EFTu_GTP in cytosol = 1; EFTu_GTP is "The complex of EF-Tu and GTP";  // substance in micromole; isDescribedBy pubmed:11772013
  species EFTu_GTP_EFTs in cytosol = 1; EFTu_GTP_EFTs is "The complex of EF-Tu, GTP, and EF-Ts";  // substance in micromole; isDescribedBy pubmed:11772013
  species Ala1B_tRNA in cytosol = 1; Ala1B_tRNA is "charged tRNA Ala1B";  // substance in micromole; isDescribedBy pubmed:8709146
  species EFTu_GTP_Ala1B_tRNA in cytosol = 1; EFTu_GTP_Ala1B_tRNA is "The ternary complex (TC) of EF-Tu, GTP, and charged Ala1B tRNA";  // substance in micromole; isDescribedBy pubmed:3910093
  species Ala2_tRNA in cytosol = 1; Ala2_tRNA is "charged tRNA Ala2";  // substance in micromole; isDescribedBy pubmed:8709146
  species EFTu_GTP_Ala2_tRNA in cytosol = 1; EFTu_GTP_Ala2_tRNA is "The ternary complex (TC) of EF-Tu, GTP, and charged Ala2 tRNA";  // substance in micromole; isDescribedBy pubmed:3910093
  species Arg2_tRNA in cytosol = 1; Arg2_tRNA is "charged tRNA Arg2";  // substance in micromole; isDescribedBy pubmed:8709146
  species EFTu_GTP_Arg2_tRNA in cytosol = 1; EFTu_GTP_Arg2_tRNA is "The ternary complex (TC) of EF-Tu, GTP, and charged Arg2 tRNA";  // substance in micromole; isDescribedBy pubmed:3910093
  species Arg3_tRNA in cytosol = 1; Arg3_tRNA is "charged tRNA Arg3";  // substance in micromole; isDescribedBy pubmed:8709146
  species EFTu_GTP_Arg3_tRNA in cytosol = 1; EFTu_GTP_Arg3_tRNA is "The ternary complex (TC) of EF-Tu, GTP, and charged Arg3 tRNA";  // substance in micromole; isDescribedBy pubmed:3910093
  species Arg4_tRNA in cytosol = 1; Arg4_tRNA is "charged tRNA Arg4";  // substance in micromole; isDescribedBy pubmed:8709146
  species EFTu_GTP_Arg4_tRNA in cytosol = 1; EFTu_GTP_Arg4_tRNA is "The ternary complex (TC) of EF-Tu, GTP, and charged Arg4 tRNA";  // substance in micromole; isDescribedBy pubmed:3910093
  species Arg5_tRNA in cytosol = 1; Arg5_tRNA is "charged tRNA Arg5";  // substance in micromole; isDescribedBy pubmed:8709146
  species EFTu_GTP_Arg5_tRNA in cytosol = 1; EFTu_GTP_Arg5_tRNA is "The ternary complex (TC) of EF-Tu, GTP, and charged Arg5 tRNA";  // substance in micromole; isDescribedBy pubmed:3910093
  species Asn_tRNA in cytosol = 1; Asn_tRNA is "charged tRNA Asn";  // substance in micromole; isDescribedBy pubmed:8709146
  species EFTu_GTP_Asn_tRNA in cytosol = 1; EFTu_GTP_Asn_tRNA is "The ternary complex (TC) of EF-Tu, GTP, and charged Asn tRNA";  // substance in micromole; isDescribedBy pubmed:3910093
  species Asp1_tRNA in cytosol = 1; Asp1_tRNA is "charged tRNA Asp1";  // substance in micromole; isDescribedBy pubmed:8709146
  species EFTu_GTP_Asp1_tRNA in cytosol = 1; EFTu_GTP_Asp1_tRNA is "The ternary complex (TC) of EF-Tu, GTP, and charged Asp1 tRNA";  // substance in micromole; isDescribedBy pubmed:3910093
  species Cys_tRNA in cytosol = 1; Cys_tRNA is "charged tRNA Cys";  // substance in micromole; isDescribedBy pubmed:8709146
  species EFTu_GTP_Cys_tRNA in cytosol = 1; EFTu_GTP_Cys_tRNA is "The ternary complex (TC) of EF-Tu, GTP, and charged Cys tRNA";  // substance in micromole; isDescribedBy pubmed:3910093
  species Gln1_tRNA in cytosol = 1; Gln1_tRNA is "charged tRNA Gln1";  // substance in micromole; isDescribedBy pubmed:8709146
  species EFTu_GTP_Gln1_tRNA in cytosol = 1; EFTu_GTP_Gln1_tRNA is "The ternary complex (TC) of EF-Tu, GTP, and charged Gln1 tRNA";  // substance in micromole; isDescribedBy pubmed:3910093
  species Gln2_tRNA in cytosol = 1; Gln2_tRNA is "charged tRNA Gln2";  // substance in micromole; isDescribedBy pubmed:8709146
  species EFTu_GTP_Gln2_tRNA in cytosol = 1; EFTu_GTP_Gln2_tRNA is "The ternary complex (TC) of EF-Tu, GTP, and charged Gln2 tRNA";  // substance in micromole; isDescribedBy pubmed:3910093
  species Glu2_tRNA in cytosol = 1; Glu2_tRNA is "charged tRNA Glu2";  // substance in micromole; isDescribedBy pubmed:8709146
  species EFTu_GTP_Glu2_tRNA in cytosol = 1; EFTu_GTP_Glu2_tRNA is "The ternary complex (TC) of EF-Tu, GTP, and charged Glu2 tRNA";  // substance in micromole; isDescribedBy pubmed:3910093
  species Gly1_tRNA in cytosol = 1; Gly1_tRNA is "charged tRNA Gly1";  // substance in micromole; isDescribedBy pubmed:8709146
  species EFTu_GTP_Gly1_tRNA in cytosol = 1; EFTu_GTP_Gly1_tRNA is "The ternary complex (TC) of EF-Tu, GTP, and charged Gly1 tRNA";  // substance in micromole; isDescribedBy pubmed:3910093
  species Gly2_tRNA in cytosol = 1; Gly2_tRNA is "charged tRNA Gly2";  // substance in micromole; isDescribedBy pubmed:8709146
  species EFTu_GTP_Gly2_tRNA in cytosol = 1; EFTu_GTP_Gly2_tRNA is "The ternary complex (TC) of EF-Tu, GTP, and charged Gly2 tRNA";  // substance in micromole; isDescribedBy pubmed:3910093
  species Gly3_tRNA in cytosol = 1; Gly3_tRNA is "charged tRNA Gly3";  // substance in micromole; isDescribedBy pubmed:8709146
  species EFTu_GTP_Gly3_tRNA in cytosol = 1; EFTu_GTP_Gly3_tRNA is "The ternary complex (TC) of EF-Tu, GTP, and charged Gly3 tRNA";  // substance in micromole; isDescribedBy pubmed:3910093
  species His_tRNA in cytosol = 1; His_tRNA is "charged tRNA His";  // substance in micromole; isDescribedBy pubmed:8709146
  species EFTu_GTP_His_tRNA in cytosol = 1; EFTu_GTP_His_tRNA is "The ternary complex (TC) of EF-Tu, GTP, and charged His tRNA";  // substance in micromole; isDescribedBy pubmed:3910093
  species Ile1_tRNA in cytosol = 1; Ile1_tRNA is "charged tRNA Ile1";  // substance in micromole; isDescribedBy pubmed:8709146
  species EFTu_GTP_Ile1_tRNA in cytosol = 1; EFTu_GTP_Ile1_tRNA is "The ternary complex (TC) of EF-Tu, GTP, and charged Ile1 tRNA";  // substance in micromole; isDescribedBy pubmed:3910093
  species Ile2_tRNA in cytosol = 1; Ile2_tRNA is "charged tRNA Ile2";  // substance in micromole; isDescribedBy pubmed:8709146
  species EFTu_GTP_Ile2_tRNA in cytosol = 1; EFTu_GTP_Ile2_tRNA is "The ternary complex (TC) of EF-Tu, GTP, and charged Ile2 tRNA";  // substance in micromole; isDescribedBy pubmed:3910093
  species Leu1_tRNA in cytosol = 1; Leu1_tRNA is "charged tRNA Leu1";  // substance in micromole; isDescribedBy pubmed:8709146
  species EFTu_GTP_Leu1_tRNA in cytosol = 1; EFTu_GTP_Leu1_tRNA is "The ternary complex (TC) of EF-Tu, GTP, and charged Leu1 tRNA";  // substance in micromole; isDescribedBy pubmed:3910093
  species Leu3_tRNA in cytosol = 1; Leu3_tRNA is "charged tRNA Leu3";  // substance in micromole; isDescribedBy pubmed:8709146
  species EFTu_GTP_Leu3_tRNA in cytosol = 1; EFTu_GTP_Leu3_tRNA is "The ternary complex (TC) of EF-Tu, GTP, and charged Leu3 tRNA";  // substance in micromole; isDescribedBy pubmed:3910093
  species Leu2_tRNA in cytosol = 1; Leu2_tRNA is "charged tRNA Leu2";  // substance in micromole; isDescribedBy pubmed:8709146
  species EFTu_GTP_Leu2_tRNA in cytosol = 1; EFTu_GTP_Leu2_tRNA is "The ternary complex (TC) of EF-Tu, GTP, and charged Leu2 tRNA";  // substance in micromole; isDescribedBy pubmed:3910093
  species Leu4_tRNA in cytosol = 1; Leu4_tRNA is "charged tRNA Leu4";  // substance in micromole; isDescribedBy pubmed:8709146
  species EFTu_GTP_Leu4_tRNA in cytosol = 1; EFTu_GTP_Leu4_tRNA is "The ternary complex (TC) of EF-Tu, GTP, and charged Leu4 tRNA";  // substance in micromole; isDescribedBy pubmed:3910093
  species Leu5_tRNA in cytosol = 1; Leu5_tRNA is "charged tRNA Leu5";  // substance in micromole; isDescribedBy pubmed:8709146
  species EFTu_GTP_Leu5_tRNA in cytosol = 1; EFTu_GTP_Leu5_tRNA is "The ternary complex (TC) of EF-Tu, GTP, and charged Leu5 tRNA";  // substance in micromole; isDescribedBy pubmed:3910093
  species Lys_tRNA in cytosol = 1; Lys_tRNA is "charged tRNA Lys";  // substance in micromole; isDescribedBy pubmed:8709146
  species EFTu_GTP_Lys_tRNA in cytosol = 1; EFTu_GTP_Lys_tRNA is "The ternary complex (TC) of EF-Tu, GTP, and charged Lys tRNA";  // substance in micromole; isDescribedBy pubmed:3910093
  species Met_tRNA in cytosol = 1; Met_tRNA is "charged tRNA Met";  // substance in micromole; isDescribedBy pubmed:8709146
  species EFTu_GTP_Met_tRNA in cytosol = 1; EFTu_GTP_Met_tRNA is "The ternary complex (TC) of EF-Tu, GTP, and charged Met tRNA";  // substance in micromole; isDescribedBy pubmed:3910093
  species Phe_tRNA in cytosol = 1; Phe_tRNA is "charged tRNA Phe";  // substance in micromole; isDescribedBy pubmed:8709146
  species EFTu_GTP_Phe_tRNA in cytosol = 1; EFTu_GTP_Phe_tRNA is "The ternary complex (TC) of EF-Tu, GTP, and charged Phe tRNA";  // substance in micromole; isDescribedBy pubmed:3910093
  species Pro1_tRNA in cytosol = 1; Pro1_tRNA is "charged tRNA Pro1";  // substance in micromole; isDescribedBy pubmed:8709146
  species EFTu_GTP_Pro1_tRNA in cytosol = 1; EFTu_GTP_Pro1_tRNA is "The ternary complex (TC) of EF-Tu, GTP, and charged Pro1 tRNA";  // substance in micromole; isDescribedBy pubmed:3910093
  species Pro3_tRNA in cytosol = 1; Pro3_tRNA is "charged tRNA Pro3";  // substance in micromole; isDescribedBy pubmed:8709146
  species EFTu_GTP_Pro3_tRNA in cytosol = 1; EFTu_GTP_Pro3_tRNA is "The ternary complex (TC) of EF-Tu, GTP, and charged Pro3 tRNA";  // substance in micromole; isDescribedBy pubmed:3910093
  species Pro2_tRNA in cytosol = 1; Pro2_tRNA is "charged tRNA Pro2";  // substance in micromole; isDescribedBy pubmed:8709146
  species EFTu_GTP_Pro2_tRNA in cytosol = 1; EFTu_GTP_Pro2_tRNA is "The ternary complex (TC) of EF-Tu, GTP, and charged Pro2 tRNA";  // substance in micromole; isDescribedBy pubmed:3910093
  species Ser1_tRNA in cytosol = 1; Ser1_tRNA is "charged tRNA Ser1";  // substance in micromole; isDescribedBy pubmed:8709146
  species EFTu_GTP_Ser1_tRNA in cytosol = 1; EFTu_GTP_Ser1_tRNA is "The ternary complex (TC) of EF-Tu, GTP, and charged Ser1 tRNA";  // substance in micromole; isDescribedBy pubmed:3910093
  species Ser2_tRNA in cytosol = 1; Ser2_tRNA is "charged tRNA Ser2";  // substance in micromole; isDescribedBy pubmed:8709146
  species EFTu_GTP_Ser2_tRNA in cytosol = 1; EFTu_GTP_Ser2_tRNA is "The ternary complex (TC) of EF-Tu, GTP, and charged Ser2 tRNA";  // substance in micromole; isDescribedBy pubmed:3910093
  species Ser5_tRNA in cytosol = 1; Ser5_tRNA is "charged tRNA Ser5";  // substance in micromole; isDescribedBy pubmed:8709146
  species EFTu_GTP_Ser5_tRNA in cytosol = 1; EFTu_GTP_Ser5_tRNA is "The ternary complex (TC) of EF-Tu, GTP, and charged Ser5 tRNA";  // substance in micromole; isDescribedBy pubmed:3910093
  species Ser3_tRNA in cytosol = 1; Ser3_tRNA is "charged tRNA Ser3";  // substance in micromole; isDescribedBy pubmed:8709146
  species EFTu_GTP_Ser3_tRNA in cytosol = 1; EFTu_GTP_Ser3_tRNA is "The ternary complex (TC) of EF-Tu, GTP, and charged Ser3 tRNA";  // substance in micromole; isDescribedBy pubmed:3910093
  species Thr13_tRNA in cytosol = 1; Thr13_tRNA is "charged tRNA Thr13";  // substance in micromole; isDescribedBy pubmed:8709146
  species EFTu_GTP_Thr13_tRNA in cytosol = 1; EFTu_GTP_Thr13_tRNA is "The ternary complex (TC) of EF-Tu, GTP, and charged Thr13 tRNA";  // substance in micromole; isDescribedBy pubmed:3910093
  species Thr4_tRNA in cytosol = 1; Thr4_tRNA is "charged tRNA Thr4";  // substance in micromole; isDescribedBy pubmed:8709146
  species EFTu_GTP_Thr4_tRNA in cytosol = 1; EFTu_GTP_Thr4_tRNA is "The ternary complex (TC) of EF-Tu, GTP, and charged Thr4 tRNA";  // substance in micromole; isDescribedBy pubmed:3910093
  species Thr2_tRNA in cytosol = 1; Thr2_tRNA is "charged tRNA Thr2";  // substance in micromole; isDescribedBy pubmed:8709146
  species EFTu_GTP_Thr2_tRNA in cytosol = 1; EFTu_GTP_Thr2_tRNA is "The ternary complex (TC) of EF-Tu, GTP, and charged Thr2 tRNA";  // substance in micromole; isDescribedBy pubmed:3910093
  species Trp_tRNA in cytosol = 1; Trp_tRNA is "charged tRNA Trp";  // substance in micromole; isDescribedBy pubmed:8709146
  species EFTu_GTP_Trp_tRNA in cytosol = 1; EFTu_GTP_Trp_tRNA is "The ternary complex (TC) of EF-Tu, GTP, and charged Trp tRNA";  // substance in micromole; isDescribedBy pubmed:3910093
  species Tyr12_tRNA in cytosol = 1; Tyr12_tRNA is "charged tRNA Tyr12";  // substance in micromole; isDescribedBy pubmed:8709146
  species EFTu_GTP_Tyr12_tRNA in cytosol = 1; EFTu_GTP_Tyr12_tRNA is "The ternary complex (TC) of EF-Tu, GTP, and charged Tyr12 tRNA";  // substance in micromole; isDescribedBy pubmed:3910093
  species Val1_tRNA in cytosol = 1; Val1_tRNA is "charged tRNA Val1";  // substance in micromole; isDescribedBy pubmed:8709146
  species EFTu_GTP_Val1_tRNA in cytosol = 1; EFTu_GTP_Val1_tRNA is "The ternary complex (TC) of EF-Tu, GTP, and charged Val1 tRNA";  // substance in micromole; isDescribedBy pubmed:3910093
  species Val2_tRNA in cytosol = 1; Val2_tRNA is "charged tRNA Val2";  // substance in micromole; isDescribedBy pubmed:8709146
  species EFTu_GTP_Val2_tRNA in cytosol = 1; EFTu_GTP_Val2_tRNA is "The ternary complex (TC) of EF-Tu, GTP, and charged Val2 tRNA";  // substance in micromole; isDescribedBy pubmed:3910093
  species Ribo_free in cytosol = 1; Ribo_free is "Free ribosome";  // substance in micromole; isVersionOf ECOLI:CPLX0-3964
  species Ribo_active in cytosol = 1; Ribo_active is "Ribosome engaged in elongation";  // substance in micromole; isVersionOf ECOLI:CPLX0-3964
  species mRNA in cytosol = 1; mRNA is "Messenger mRNA";  // substance in micromole
  species Ribo_GCA in cytosol = 1; Ribo_GCA is "The ribosome translating codon GCA";  // substance in micromole; isVersionOf ECOLI:CPLX0-3964
  species Ribo_GCG in cytosol = 1; Ribo_GCG is "The ribosome translating codon GCG";  // substance in micromole; isVersionOf ECOLI:CPLX0-3964
  species Ribo_GCU in cytosol = 1; Ribo_GCU is "The ribosome translating codon GCU";  // substance in micromole; isVersionOf ECOLI:CPLX0-3964
  species Ribo_GCC in cytosol = 1; Ribo_GCC is "The ribosome translating codon GCC";  // substance in micromole; isVersionOf ECOLI:CPLX0-3964
  species Ribo_CGC in cytosol = 1; Ribo_CGC is "The ribosome translating codon CGC";  // substance in micromole; isVersionOf ECOLI:CPLX0-3964
  species Ribo_CGU in cytosol = 1; Ribo_CGU is "The ribosome translating codon CGU";  // substance in micromole; isVersionOf ECOLI:CPLX0-3964
  species Ribo_CGA in cytosol = 1; Ribo_CGA is "The ribosome translating codon CGA";  // substance in micromole; isVersionOf ECOLI:CPLX0-3964
  species Ribo_CGG in cytosol = 1; Ribo_CGG is "The ribosome translating codon CGG";  // substance in micromole; isVersionOf ECOLI:CPLX0-3964
  species Ribo_AGA in cytosol = 1; Ribo_AGA is "The ribosome translating codon AGA";  // substance in micromole; isVersionOf ECOLI:CPLX0-3964
  species Ribo_AGG in cytosol = 1; Ribo_AGG is "The ribosome translating codon AGG";  // substance in micromole; isVersionOf ECOLI:CPLX0-3964
  species Ribo_AAC in cytosol = 1; Ribo_AAC is "The ribosome translating codon AAC";  // substance in micromole; isVersionOf ECOLI:CPLX0-3964
  species Ribo_AAU in cytosol = 1; Ribo_AAU is "The ribosome translating codon AAU";  // substance in micromole; isVersionOf ECOLI:CPLX0-3964
  species Ribo_GAC in cytosol = 1; Ribo_GAC is "The ribosome translating codon GAC";  // substance in micromole; isVersionOf ECOLI:CPLX0-3964
  species Ribo_GAU in cytosol = 1; Ribo_GAU is "The ribosome translating codon GAU";  // substance in micromole; isVersionOf ECOLI:CPLX0-3964
  species Ribo_UGC in cytosol = 1; Ribo_UGC is "The ribosome translating codon UGC";  // substance in micromole; isVersionOf ECOLI:CPLX0-3964
  species Ribo_UGU in cytosol = 1; Ribo_UGU is "The ribosome translating codon UGU";  // substance in micromole; isVersionOf ECOLI:CPLX0-3964
  species Ribo_CAA in cytosol = 1; Ribo_CAA is "The ribosome translating codon CAA";  // substance in micromole; isVersionOf ECOLI:CPLX0-3964
  species Ribo_CAG in cytosol = 1; Ribo_CAG is "The ribosome translating codon CAG";  // substance in micromole; isVersionOf ECOLI:CPLX0-3964
  species Ribo_GAG in cytosol = 1; Ribo_GAG is "The ribosome translating codon GAG";  // substance in micromole; isVersionOf ECOLI:CPLX0-3964
  species Ribo_GAA in cytosol = 1; Ribo_GAA is "The ribosome translating codon GAA";  // substance in micromole; isVersionOf ECOLI:CPLX0-3964
  species Ribo_GGG in cytosol = 1; Ribo_GGG is "The ribosome translating codon GGG";  // substance in micromole; isVersionOf ECOLI:CPLX0-3964
  species Ribo_GGA in cytosol = 1; Ribo_GGA is "The ribosome translating codon GGA";  // substance in micromole; isVersionOf ECOLI:CPLX0-3964
  species Ribo_GGU in cytosol = 1; Ribo_GGU is "The ribosome translating codon GGU";  // substance in micromole; isVersionOf ECOLI:CPLX0-3964
  species Ribo_GGC in cytosol = 1; Ribo_GGC is "The ribosome translating codon GGC";  // substance in micromole; isVersionOf ECOLI:CPLX0-3964
  species Ribo_CAC in cytosol = 1; Ribo_CAC is "The ribosome translating codon CAC";  // substance in micromole; isVersionOf ECOLI:CPLX0-3964
  species Ribo_CAU in cytosol = 1; Ribo_CAU is "The ribosome translating codon CAU";  // substance in micromole; isVersionOf ECOLI:CPLX0-3964
  species Ribo_AUC in cytosol = 1; Ribo_AUC is "The ribosome translating codon AUC";  // substance in micromole; isVersionOf ECOLI:CPLX0-3964
  species Ribo_AUU in cytosol = 1; Ribo_AUU is "The ribosome translating codon AUU";  // substance in micromole; isVersionOf ECOLI:CPLX0-3964
  species Ribo_AUA in cytosol = 1; Ribo_AUA is "The ribosome translating codon AUA";  // substance in micromole; isVersionOf ECOLI:CPLX0-3964
  species Ribo_CUG in cytosol = 1; Ribo_CUG is "The ribosome translating codon CUG";  // substance in micromole; isVersionOf ECOLI:CPLX0-3964
  species Ribo_CUU in cytosol = 1; Ribo_CUU is "The ribosome translating codon CUU";  // substance in micromole; isVersionOf ECOLI:CPLX0-3964
  species Ribo_CUC in cytosol = 1; Ribo_CUC is "The ribosome translating codon CUC";  // substance in micromole; isVersionOf ECOLI:CPLX0-3964
  species Ribo_CUA in cytosol = 1; Ribo_CUA is "The ribosome translating codon CUA";  // substance in micromole; isVersionOf ECOLI:CPLX0-3964
  species Ribo_UUG in cytosol = 1; Ribo_UUG is "The ribosome translating codon UUG";  // substance in micromole; isVersionOf ECOLI:CPLX0-3964
  species Ribo_UUA in cytosol = 1; Ribo_UUA is "The ribosome translating codon UUA";  // substance in micromole; isVersionOf ECOLI:CPLX0-3964
  species Ribo_AAG in cytosol = 1; Ribo_AAG is "The ribosome translating codon AAG";  // substance in micromole; isVersionOf ECOLI:CPLX0-3964
  species Ribo_AAA in cytosol = 1; Ribo_AAA is "The ribosome translating codon AAA";  // substance in micromole; isVersionOf ECOLI:CPLX0-3964
  species Ribo_AUG in cytosol = 1; Ribo_AUG is "The ribosome translating codon AUG";  // substance in micromole; isVersionOf ECOLI:CPLX0-3964
  species Ribo_UUU in cytosol = 1; Ribo_UUU is "The ribosome translating codon UUU";  // substance in micromole; isVersionOf ECOLI:CPLX0-3964
  species Ribo_UUC in cytosol = 1; Ribo_UUC is "The ribosome translating codon UUC";  // substance in micromole; isVersionOf ECOLI:CPLX0-3964
  species Ribo_CCG in cytosol = 1; Ribo_CCG is "The ribosome translating codon CCG";  // substance in micromole; isVersionOf ECOLI:CPLX0-3964
  species Ribo_CCC in cytosol = 1; Ribo_CCC is "The ribosome translating codon CCC";  // substance in micromole; isVersionOf ECOLI:CPLX0-3964
  species Ribo_CCU in cytosol = 1; Ribo_CCU is "The ribosome translating codon CCU";  // substance in micromole; isVersionOf ECOLI:CPLX0-3964
  species Ribo_CCA in cytosol = 1; Ribo_CCA is "The ribosome translating codon CCA";  // substance in micromole; isVersionOf ECOLI:CPLX0-3964
  species Ribo_UCA in cytosol = 1; Ribo_UCA is "The ribosome translating codon UCA";  // substance in micromole; isVersionOf ECOLI:CPLX0-3964
  species Ribo_UCG in cytosol = 1; Ribo_UCG is "The ribosome translating codon UCG";  // substance in micromole; isVersionOf ECOLI:CPLX0-3964
  species Ribo_UCU in cytosol = 1; Ribo_UCU is "The ribosome translating codon UCU";  // substance in micromole; isVersionOf ECOLI:CPLX0-3964
  species Ribo_AGU in cytosol = 1; Ribo_AGU is "The ribosome translating codon AGU";  // substance in micromole; isVersionOf ECOLI:CPLX0-3964
  species Ribo_AGC in cytosol = 1; Ribo_AGC is "The ribosome translating codon AGC";  // substance in micromole; isVersionOf ECOLI:CPLX0-3964
  species Ribo_UCC in cytosol = 1; Ribo_UCC is "The ribosome translating codon UCC";  // substance in micromole; isVersionOf ECOLI:CPLX0-3964
  species Ribo_ACC in cytosol = 1; Ribo_ACC is "The ribosome translating codon ACC";  // substance in micromole; isVersionOf ECOLI:CPLX0-3964
  species Ribo_ACU in cytosol = 1; Ribo_ACU is "The ribosome translating codon ACU";  // substance in micromole; isVersionOf ECOLI:CPLX0-3964
  species Ribo_ACG in cytosol = 1; Ribo_ACG is "The ribosome translating codon ACG";  // substance in micromole; isVersionOf ECOLI:CPLX0-3964
  species Ribo_ACA in cytosol = 1; Ribo_ACA is "The ribosome translating codon ACA";  // substance in micromole; isVersionOf ECOLI:CPLX0-3964
  species Ribo_UGG in cytosol = 1; Ribo_UGG is "The ribosome translating codon UGG";  // substance in micromole; isVersionOf ECOLI:CPLX0-3964
  species Ribo_UAU in cytosol = 1; Ribo_UAU is "The ribosome translating codon UAU";  // substance in micromole; isVersionOf ECOLI:CPLX0-3964
  species Ribo_UAC in cytosol = 1; Ribo_UAC is "The ribosome translating codon UAC";  // substance in micromole; isVersionOf ECOLI:CPLX0-3964
  species Ribo_GUG in cytosol = 1; Ribo_GUG is "The ribosome translating codon GUG";  // substance in micromole; isVersionOf ECOLI:CPLX0-3964
  species Ribo_GUA in cytosol = 1; Ribo_GUA is "The ribosome translating codon GUA";  // substance in micromole; isVersionOf ECOLI:CPLX0-3964
  species Ribo_GUU in cytosol = 1; Ribo_GUU is "The ribosome translating codon GUU";  // substance in micromole; isVersionOf ECOLI:CPLX0-3964
  species Ribo_GUC in cytosol = 1; Ribo_GUC is "The ribosome translating codon GUC";  // substance in micromole; isVersionOf ECOLI:CPLX0-3964

  // Parameters:
  k_TuTs1_on = 2 per_micromolar_per_second;  // isDescribedBy pubmed:11772013
  k_TuTs1_off = 0.002 per_second;  // isDescribedBy pubmed:11772013
  k_TuTs2_on = 10 per_micromolar_per_second;  // isDescribedBy pubmed:11772013
  k_TuTs2_off = 0.03 per_second;  // isDescribedBy pubmed:11772013
  k_TuTs3_on = 60 per_micromolar_per_second;  // isDescribedBy pubmed:11772013
  k_TuTs3_off = 350 per_second;  // isDescribedBy pubmed:11772013
  k_TuTs4_on = 14 per_micromolar_per_second;  // isDescribedBy pubmed:11772013
  k_TuTs4_off = 125 per_second;  // isDescribedBy pubmed:11772013
  k_TuTs5_on = 0.5 per_micromolar_per_second;  // isDescribedBy pubmed:11772013
  k_TuTs5_off = 0.03 per_second;  // isDescribedBy pubmed:11772013
  k_TuTs6_on = 30 per_micromolar_per_second;  // isDescribedBy pubmed:11772013
  k_TuTs6_off = 60 per_second;  // isDescribedBy pubmed:11772013
  k_TuTs7_on = 6 per_micromolar_per_second;  // isDescribedBy pubmed:11772013
  k_TuTs7_off = 85 per_second;  // isDescribedBy pubmed:11772013
  k_Ala1B_on = 1 per_micromolar_per_second;  // isDescribedBy pubmed:3910093
  k_Ala1B_off = 0.0024 per_second;  // isDescribedBy pubmed:3910093
  k_Ala2_on = 1 per_micromolar_per_second;  // isDescribedBy pubmed:3910093
  k_Ala2_off = 0.0024 per_second;  // isDescribedBy pubmed:3910093
  k_Arg2_on = 1.55 per_micromolar_per_second;  // isDescribedBy pubmed:3910093
  k_Arg2_off = 0.0031 per_second;  // isDescribedBy pubmed:3910093
  k_Arg3_on = 1.55 per_micromolar_per_second;  // isDescribedBy pubmed:3910093
  k_Arg3_off = 0.0031 per_second;  // isDescribedBy pubmed:3910093
  k_Arg4_on = 1.55 per_micromolar_per_second;  // isDescribedBy pubmed:3910093
  k_Arg4_off = 0.0031 per_second;  // isDescribedBy pubmed:3910093
  k_Arg5_on = 1.55 per_micromolar_per_second;  // isDescribedBy pubmed:3910093
  k_Arg5_off = 0.0031 per_second;  // isDescribedBy pubmed:3910093
  k_Asn_on = 1.4 per_micromolar_per_second;  // isDescribedBy pubmed:3910093
  k_Asn_off = 0.0011 per_second;  // isDescribedBy pubmed:3910093
  k_Asp1_on = 0.95 per_micromolar_per_second;  // isDescribedBy pubmed:3910093
  k_Asp1_off = 0.0022 per_second;  // isDescribedBy pubmed:3910093
  k_Cys_on = 1.7 per_micromolar_per_second;  // isDescribedBy pubmed:3910093
  k_Cys_off = 0.0018 per_second;  // isDescribedBy pubmed:3910093
  k_Gln1_on = 1.7 per_micromolar_per_second;  // isDescribedBy pubmed:3910093
  k_Gln1_off = 0.0009 per_second;  // isDescribedBy pubmed:3910093
  k_Gln2_on = 1.7 per_micromolar_per_second;  // isDescribedBy pubmed:3910093
  k_Gln2_off = 0.0009 per_second;  // isDescribedBy pubmed:3910093
  k_Glu2_on = 0.57 per_micromolar_per_second;  // isDescribedBy pubmed:3910093
  k_Glu2_off = 0.0019 per_second;  // isDescribedBy pubmed:3910093
  k_Gly1_on = 1.65 per_micromolar_per_second;  // isDescribedBy pubmed:3910093
  k_Gly1_off = 0.0015 per_second;  // isDescribedBy pubmed:3910093
  k_Gly2_on = 1.65 per_micromolar_per_second;  // isDescribedBy pubmed:3910093
  k_Gly2_off = 0.0015 per_second;  // isDescribedBy pubmed:3910093
  k_Gly3_on = 1.65 per_micromolar_per_second;  // isDescribedBy pubmed:3910093
  k_Gly3_off = 0.0015 per_second;  // isDescribedBy pubmed:3910093
  k_His_on = 2.5 per_micromolar_per_second;  // isDescribedBy pubmed:3910093
  k_His_off = 0.003 per_second;  // isDescribedBy pubmed:3910093
  k_Ile1_on = 0.64 per_micromolar_per_second;  // isDescribedBy pubmed:3910093
  k_Ile1_off = 0.0013 per_second;  // isDescribedBy pubmed:3910093
  k_Ile2_on = 0.64 per_micromolar_per_second;  // isDescribedBy pubmed:3910093
  k_Ile2_off = 0.0013 per_second;  // isDescribedBy pubmed:3910093
  k_Leu1_on = 0.5175 per_micromolar_per_second;  // isDescribedBy pubmed:3910093
  k_Leu1_off = 0.0019 per_second;  // isDescribedBy pubmed:3910093
  k_Leu3_on = 0.5175 per_micromolar_per_second;  // isDescribedBy pubmed:3910093
  k_Leu3_off = 0.0019 per_second;  // isDescribedBy pubmed:3910093
  k_Leu2_on = 0.5175 per_micromolar_per_second;  // isDescribedBy pubmed:3910093
  k_Leu2_off = 0.0019 per_second;  // isDescribedBy pubmed:3910093
  k_Leu4_on = 0.5175 per_micromolar_per_second;  // isDescribedBy pubmed:3910093
  k_Leu4_off = 0.0019 per_second;  // isDescribedBy pubmed:3910093
  k_Leu5_on = 0.5175 per_micromolar_per_second;  // isDescribedBy pubmed:3910093
  k_Leu5_off = 0.0019 per_second;  // isDescribedBy pubmed:3910093
  k_Lys_on = 0.745 per_micromolar_per_second;  // isDescribedBy pubmed:3910093
  k_Lys_off = 0.0029 per_second;  // isDescribedBy pubmed:3910093
  k_Met_on = 1.8 per_micromolar_per_second;  // isDescribedBy pubmed:3910093
  k_Met_off = 0.0016 per_second;  // isDescribedBy pubmed:3910093
  k_Phe_on = 1.5 per_micromolar_per_second;  // isDescribedBy pubmed:3910093
  k_Phe_off = 0.0017 per_second;  // isDescribedBy pubmed:3910093
  k_Pro1_on = 1.2 per_micromolar_per_second;  // isDescribedBy pubmed:3910093
  k_Pro1_off = 0.0012 per_second;  // isDescribedBy pubmed:3910093
  k_Pro3_on = 1.2 per_micromolar_per_second;  // isDescribedBy pubmed:3910093
  k_Pro3_off = 0.0012 per_second;  // isDescribedBy pubmed:3910093
  k_Pro2_on = 1.2 per_micromolar_per_second;  // isDescribedBy pubmed:3910093
  k_Pro2_off = 0.0012 per_second;  // isDescribedBy pubmed:3910093
  k_Ser1_on = 1.5 per_micromolar_per_second;  // isDescribedBy pubmed:3910093
  k_Ser1_off = 0.002 per_second;  // isDescribedBy pubmed:3910093
  k_Ser2_on = 1.5 per_micromolar_per_second;  // isDescribedBy pubmed:3910093
  k_Ser2_off = 0.002 per_second;  // isDescribedBy pubmed:3910093
  k_Ser5_on = 1.5 per_micromolar_per_second;  // isDescribedBy pubmed:3910093
  k_Ser5_off = 0.002 per_second;  // isDescribedBy pubmed:3910093
  k_Ser3_on = 1.5 per_micromolar_per_second;  // isDescribedBy pubmed:3910093
  k_Ser3_off = 0.002 per_second;  // isDescribedBy pubmed:3910093
  k_Thr13_on = 0.84 per_micromolar_per_second;  // isDescribedBy pubmed:3910093
  k_Thr13_off = 0.0011 per_second;  // isDescribedBy pubmed:3910093
  k_Thr4_on = 0.84 per_micromolar_per_second;  // isDescribedBy pubmed:3910093
  k_Thr4_off = 0.0011 per_second;  // isDescribedBy pubmed:3910093
  k_Thr2_on = 0.84 per_micromolar_per_second;  // isDescribedBy pubmed:3910093
  k_Thr2_off = 0.0011 per_second;  // isDescribedBy pubmed:3910093
  k_Trp_on = 1.5 per_micromolar_per_second;  // isDescribedBy pubmed:3910093
  k_Trp_off = 0.0012 per_second;  // isDescribedBy pubmed:3910093
  k_Tyr12_on = 1.5 per_micromolar_per_second;  // isDescribedBy pubmed:3910093
  k_Tyr12_off = 0.002 per_second;  // isDescribedBy pubmed:3910093
  k_Val1_on = 0.69 per_micromolar_per_second;  // isDescribedBy pubmed:3910093
  k_Val1_off = 0.0049 per_second;  // isDescribedBy pubmed:3910093
  k_Val2_on = 0.69 per_micromolar_per_second;  // isDescribedBy pubmed:3910093
  k_Val2_off = 0.0049 per_second;  // isDescribedBy pubmed:3910093
  kcat_mRNA = 1.33 per_second;  // isDescribedBy pubmed:18437222 pubmed:27193784
  kM_ribo = 8.5 micromolar;  // isDescribedBy pubmed:18437222 pubmed:27193784
  kcat_ribo = 22 per_second;  // isDescribedBy pubmed:24082144
  kM_TC = 3 micromolar;  // isDescribedBy pubmed:24082144
  MW_EFTu = 43.2895 kDa;
  MW_GDP = 0.4432 kDa;
  MW_EFTu_GDP = 43.7327 kDa;
  MW_EFTs = 30.4274 kDa;
  MW_EFTu_EFTs = 73.7169 kDa;
  MW_EFTu_GDP_EFTs = 74.1601 kDa;
  MW_GTP = 0.5232 kDa;
  MW_EFTu_GTP = 43.8127 kDa;
  MW_EFTu_GTP_EFTs = 74.2401 kDa;
  MW_Ala1B_tRNA = 24.6113 kDa;
  MW_EFTu_GTP_Ala1B_tRNA = 68.424 kDa;
  MW_Ala2_tRNA = 24.6593 kDa;
  MW_EFTu_GTP_Ala2_tRNA = 68.472 kDa;
  MW_Arg2_tRNA = 25.0166 kDa;
  MW_EFTu_GTP_Arg2_tRNA = 68.8293 kDa;
  MW_Arg3_tRNA = 25.0556 kDa;
  MW_EFTu_GTP_Arg3_tRNA = 68.8683 kDa;
  MW_Arg4_tRNA = 25.0096 kDa;
  MW_EFTu_GTP_Arg4_tRNA = 68.8223 kDa;
  MW_Arg5_tRNA = 24.2592 kDa;
  MW_EFTu_GTP_Arg5_tRNA = 68.0719 kDa;
  MW_Asn_tRNA = 24.6113 kDa;
  MW_EFTu_GTP_Asn_tRNA = 68.424 kDa;
  MW_Asp1_tRNA = 24.9945 kDa;
  MW_EFTu_GTP_Asp1_tRNA = 68.8072 kDa;
  MW_Cys_tRNA = 23.946 kDa;
  MW_EFTu_GTP_Cys_tRNA = 67.7587 kDa;
  MW_Gln1_tRNA = 24.2532 kDa;
  MW_EFTu_GTP_Gln1_tRNA = 68.0659 kDa;
  MW_Gln2_tRNA = 24.2522 kDa;
  MW_EFTu_GTP_Gln2_tRNA = 68.0649 kDa;
  MW_Glu2_tRNA = 24.5713 kDa;
  MW_EFTu_GTP_Glu2_tRNA = 68.384 kDa;
  MW_Gly1_tRNA = 23.8369 kDa;
  MW_EFTu_GTP_Gly1_tRNA = 67.6496 kDa;
  MW_Gly2_tRNA = 24.0561 kDa;
  MW_EFTu_GTP_Gly2_tRNA = 67.8688 kDa;
  MW_Gly3_tRNA = 24.5993 kDa;
  MW_EFTu_GTP_Gly3_tRNA = 68.412 kDa;
  MW_His_tRNA = 24.8936 kDa;
  MW_EFTu_GTP_His_tRNA = 68.7063 kDa;
  MW_Ile1_tRNA = 24.9263 kDa;
  MW_EFTu_GTP_Ile1_tRNA = 68.739 kDa;
  MW_Ile2_tRNA = 24.6224 kDa;
  MW_EFTu_GTP_Ile2_tRNA = 68.4351 kDa;
  MW_Leu1_tRNA = 28.2229 kDa;
  MW_EFTu_GTP_Leu1_tRNA = 72.0356 kDa;
  MW_Leu3_tRNA = 28.2716 kDa;
  MW_EFTu_GTP_Leu3_tRNA = 72.0843 kDa;
  MW_Leu2_tRNA = 28.2296 kDa;
  MW_EFTu_GTP_Leu2_tRNA = 72.0423 kDa;
  MW_Leu4_tRNA = 27.6182 kDa;
  MW_EFTu_GTP_Leu4_tRNA = 71.4309 kDa;
  MW_Leu5_tRNA = 27.6012 kDa;
  MW_EFTu_GTP_Leu5_tRNA = 71.4139 kDa;
  MW_Lys_tRNA = 24.5704 kDa;
  MW_EFTu_GTP_Lys_tRNA = 68.3831 kDa;
  MW_Met_tRNA = 24.9236 kDa;
  MW_EFTu_GTP_Met_tRNA = 68.7363 kDa;
  MW_Phe_tRNA = 24.6964 kDa;
  MW_EFTu_GTP_Phe_tRNA = 68.5091 kDa;
  MW_Pro1_tRNA = 25.0075 kDa;
  MW_EFTu_GTP_Pro1_tRNA = 68.8202 kDa;
  MW_Pro3_tRNA = 25.0235 kDa;
  MW_EFTu_GTP_Pro3_tRNA = 68.8362 kDa;
  MW_Pro2_tRNA = 25.0375 kDa;
  MW_EFTu_GTP_Pro2_tRNA = 68.8502 kDa;
  MW_Ser1_tRNA = 28.5947 kDa;
  MW_EFTu_GTP_Ser1_tRNA = 72.4074 kDa;
  MW_Ser2_tRNA = 29.2261 kDa;
  MW_EFTu_GTP_Ser2_tRNA = 73.0388 kDa;
  MW_Ser5_tRNA = 28.6107 kDa;
  MW_EFTu_GTP_Ser5_tRNA = 72.4234 kDa;
  MW_Ser3_tRNA = 30.2157 kDa;
  MW_EFTu_GTP_Ser3_tRNA = 74.0284 kDa;
  MW_Thr13_tRNA = 24.6563 kDa;
  MW_EFTu_GTP_Thr13_tRNA = 68.469 kDa;
  MW_Thr4_tRNA = 24.5883 kDa;
  MW_EFTu_GTP_Thr4_tRNA = 68.401 kDa;
  MW_Thr2_tRNA = 24.6053 kDa;
  MW_EFTu_GTP_Thr2_tRNA = 68.418 kDa;
  MW_Trp_tRNA = 24.7124 kDa;
  MW_EFTu_GTP_Trp_tRNA = 68.5251 kDa;
  MW_Tyr12_tRNA = 27.5229 kDa;
  MW_EFTu_GTP_Tyr12_tRNA = 71.3356 kDa;
  MW_Val1_tRNA = 24.6463 kDa;
  MW_EFTu_GTP_Val1_tRNA = 68.459 kDa;
  MW_Val2_tRNA = 24.964 kDa;
  MW_EFTu_GTP_Val2_tRNA = 68.7767 kDa;
  MW_Ribo_free = 2306.967 kDa;
  MW_Ribo_active = 2306.967 kDa;
  MW_Ribo_GCA = 2306.967 kDa;
  MW_Ribo_GCG = 2306.967 kDa;
  MW_Ribo_GCU = 2306.967 kDa;
  MW_Ribo_GCC = 2306.967 kDa;
  MW_Ribo_CGC = 2306.967 kDa;
  MW_Ribo_CGU = 2306.967 kDa;
  MW_Ribo_CGA = 2306.967 kDa;
  MW_Ribo_CGG = 2306.967 kDa;
  MW_Ribo_AGA = 2306.967 kDa;
  MW_Ribo_AGG = 2306.967 kDa;
  MW_Ribo_AAC = 2306.967 kDa;
  MW_Ribo_AAU = 2306.967 kDa;
  MW_Ribo_GAC = 2306.967 kDa;
  MW_Ribo_GAU = 2306.967 kDa;
  MW_Ribo_UGC = 2306.967 kDa;
  MW_Ribo_UGU = 2306.967 kDa;
  MW_Ribo_CAA = 2306.967 kDa;
  MW_Ribo_CAG = 2306.967 kDa;
  MW_Ribo_GAG = 2306.967 kDa;
  MW_Ribo_GAA = 2306.967 kDa;
  MW_Ribo_GGG = 2306.967 kDa;
  MW_Ribo_GGA = 2306.967 kDa;
  MW_Ribo_GGU = 2306.967 kDa;
  MW_Ribo_GGC = 2306.967 kDa;
  MW_Ribo_CAC = 2306.967 kDa;
  MW_Ribo_CAU = 2306.967 kDa;
  MW_Ribo_AUC = 2306.967 kDa;
  MW_Ribo_AUU = 2306.967 kDa;
  MW_Ribo_AUA = 2306.967 kDa;
  MW_Ribo_CUG = 2306.967 kDa;
  MW_Ribo_CUU = 2306.967 kDa;
  MW_Ribo_CUC = 2306.967 kDa;
  MW_Ribo_CUA = 2306.967 kDa;
  MW_Ribo_UUG = 2306.967 kDa;
  MW_Ribo_UUA = 2306.967 kDa;
  MW_Ribo_AAG = 2306.967 kDa;
  MW_Ribo_AAA = 2306.967 kDa;
  MW_Ribo_AUG = 2306.967 kDa;
  MW_Ribo_UUU = 2306.967 kDa;
  MW_Ribo_UUC = 2306.967 kDa;
  MW_Ribo_CCG = 2306.967 kDa;
  MW_Ribo_CCC = 2306.967 kDa;
  MW_Ribo_CCU = 2306.967 kDa;
  MW_Ribo_CCA = 2306.967 kDa;
  MW_Ribo_UCA = 2306.967 kDa;
  MW_Ribo_UCG = 2306.967 kDa;
  MW_Ribo_UCU = 2306.967 kDa;
  MW_Ribo_AGU = 2306.967 kDa;
  MW_Ribo_AGC = 2306.967 kDa;
  MW_Ribo_UCC = 2306.967 kDa;
  MW_Ribo_ACC = 2306.967 kDa;
  MW_Ribo_ACU = 2306.967 kDa;
  MW_Ribo_ACG = 2306.967 kDa;
  MW_Ribo_ACA = 2306.967 kDa;
  MW_Ribo_UGG = 2306.967 kDa;
  MW_Ribo_UAU = 2306.967 kDa;
  MW_Ribo_UAC = 2306.967 kDa;
  MW_Ribo_GUG = 2306.967 kDa;
  MW_Ribo_GUA = 2306.967 kDa;
  MW_Ribo_GUU = 2306.967 kDa;
  MW_Ribo_GUC = 2306.967 kDa;
  MW_mRNA = 283.6391 kDa;

  // Reactions:
  TuTs1: EFTu + $GDP => EFTu_GDP; k_TuTs1_on*EFTu*GDP;  // isDescribedBy pubmed:11772013
  TuTs1rev: EFTu_GDP => EFTu + $GDP; k_TuTs1_off*EFTu_GDP;  // isDescribedBy pubmed:11772013
  TuTs2: EFTu + EFTs => EFTu_EFTs; k_TuTs2_on*EFTu*EFTs;  // isDescribedBy pubmed:11772013
  TuTs2rev: EFTu_EFTs => EFTu + EFTs; k_TuTs2_off*EFTu_EFTs;  // isDescribedBy pubmed:11772013
  TuTs3: EFTu_GDP + EFTs => EFTu_GDP_EFTs; k_TuTs3_on*EFTu_GDP*EFTs;  // isDescribedBy pubmed:11772013
  TuTs3rev: EFTu_GDP_EFTs => EFTu_GDP + EFTs; k_TuTs3_off*EFTu_GDP_EFTs;  // isDescribedBy pubmed:11772013
  TuTs4: EFTu_EFTs + $GDP => EFTu_GDP_EFTs; k_TuTs4_on*EFTu_EFTs*GDP;  // isDescribedBy pubmed:11772013
  TuTs4rev: EFTu_GDP_EFTs => EFTu_EFTs + $GDP; k_TuTs4_off*EFTu_GDP_EFTs;  // isDescribedBy pubmed:11772013
  TuTs5: EFTu + $GTP => EFTu_GTP; k_TuTs5_on*EFTu*GTP;  // isDescribedBy pubmed:11772013
  TuTs5rev: EFTu_GTP => EFTu + $GTP; k_TuTs5_off*EFTu_GTP;  // isDescribedBy pubmed:11772013
  TuTs6: EFTu_GTP + EFTs => EFTu_GTP_EFTs; k_TuTs6_on*EFTu_GTP*EFTs;  // isDescribedBy pubmed:11772013
  TuTs6rev: EFTu_GTP_EFTs => EFTu_GTP + EFTs; k_TuTs6_off*EFTu_GTP_EFTs;  // isDescribedBy pubmed:11772013
  TuTs7: EFTu_EFTs + $GTP => EFTu_GTP_EFTs; k_TuTs7_on*EFTu_EFTs*GTP;  // isDescribedBy pubmed:11772013
  TuTs7rev: EFTu_GTP_EFTs => EFTu_EFTs + $GTP; k_TuTs7_off*EFTu_GTP_EFTs;  // isDescribedBy pubmed:11772013
  EFTu_Ala1B_Ass: EFTu_GTP + Ala1B_tRNA => EFTu_GTP_Ala1B_tRNA; k_Ala1B_on*EFTu_GTP*Ala1B_tRNA;  // isDescribedBy pubmed:3910093
  EFTu_Ala1B_Diss: EFTu_GTP_Ala1B_tRNA => EFTu_GTP + Ala1B_tRNA; k_Ala1B_off*EFTu_GTP_Ala1B_tRNA;  // isDescribedBy pubmed:3910093
  EFTu_Ala2_Ass: EFTu_GTP + Ala2_tRNA => EFTu_GTP_Ala2_tRNA; k_Ala2_on*EFTu_GTP*Ala2_tRNA;  // isDescribedBy pubmed:3910093
  EFTu_Ala2_Diss: EFTu_GTP_Ala2_tRNA => EFTu_GTP + Ala2_tRNA; k_Ala2_off*EFTu_GTP_Ala2_tRNA;  // isDescribedBy pubmed:3910093
  EFTu_Arg2_Ass: EFTu_GTP + Arg2_tRNA => EFTu_GTP_Arg2_tRNA; k_Arg2_on*EFTu_GTP*Arg2_tRNA;  // isDescribedBy pubmed:3910093
  EFTu_Arg2_Diss: EFTu_GTP_Arg2_tRNA => EFTu_GTP + Arg2_tRNA; k_Arg2_off*EFTu_GTP_Arg2_tRNA;  // isDescribedBy pubmed:3910093
  EFTu_Arg3_Ass: EFTu_GTP + Arg3_tRNA => EFTu_GTP_Arg3_tRNA; k_Arg3_on*EFTu_GTP*Arg3_tRNA;  // isDescribedBy pubmed:3910093
  EFTu_Arg3_Diss: EFTu_GTP_Arg3_tRNA => EFTu_GTP + Arg3_tRNA; k_Arg3_off*EFTu_GTP_Arg3_tRNA;  // isDescribedBy pubmed:3910093
  EFTu_Arg4_Ass: EFTu_GTP + Arg4_tRNA => EFTu_GTP_Arg4_tRNA; k_Arg4_on*EFTu_GTP*Arg4_tRNA;  // isDescribedBy pubmed:3910093
  EFTu_Arg4_Diss: EFTu_GTP_Arg4_tRNA => EFTu_GTP + Arg4_tRNA; k_Arg4_off*EFTu_GTP_Arg4_tRNA;  // isDescribedBy pubmed:3910093
  EFTu_Arg5_Ass: EFTu_GTP + Arg5_tRNA => EFTu_GTP_Arg5_tRNA; k_Arg5_on*EFTu_GTP*Arg5_tRNA;  // isDescribedBy pubmed:3910093
  EFTu_Arg5_Diss: EFTu_GTP_Arg5_tRNA => EFTu_GTP + Arg5_tRNA; k_Arg5_off*EFTu_GTP_Arg5_tRNA;  // isDescribedBy pubmed:3910093
  EFTu_Asn_Ass: EFTu_GTP + Asn_tRNA => EFTu_GTP_Asn_tRNA; k_Asn_on*EFTu_GTP*Asn_tRNA;  // isDescribedBy pubmed:3910093
  EFTu_Asn_Diss: EFTu_GTP_Asn_tRNA => EFTu_GTP + Asn_tRNA; k_Asn_off*EFTu_GTP_Asn_tRNA;  // isDescribedBy pubmed:3910093
  EFTu_Asp1_Ass: EFTu_GTP + Asp1_tRNA => EFTu_GTP_Asp1_tRNA; k_Asp1_on*EFTu_GTP*Asp1_tRNA;  // isDescribedBy pubmed:3910093
  EFTu_Asp1_Diss: EFTu_GTP_Asp1_tRNA => EFTu_GTP + Asp1_tRNA; k_Asp1_off*EFTu_GTP_Asp1_tRNA;  // isDescribedBy pubmed:3910093
  EFTu_Cys_Ass: EFTu_GTP + Cys_tRNA => EFTu_GTP_Cys_tRNA; k_Cys_on*EFTu_GTP*Cys_tRNA;  // isDescribedBy pubmed:3910093
  EFTu_Cys_Diss: EFTu_GTP_Cys_tRNA => EFTu_GTP + Cys_tRNA; k_Cys_off*EFTu_GTP_Cys_tRNA;  // isDescribedBy pubmed:3910093
  EFTu_Gln1_Ass: EFTu_GTP + Gln1_tRNA => EFTu_GTP_Gln1_tRNA; k_Gln1_on*EFTu_GTP*Gln1_tRNA;  // isDescribedBy pubmed:3910093
  EFTu_Gln1_Diss: EFTu_GTP_Gln1_tRNA => EFTu_GTP + Gln1_tRNA; k_Gln1_off*EFTu_GTP_Gln1_tRNA;  // isDescribedBy pubmed:3910093
  EFTu_Gln2_Ass: EFTu_GTP + Gln2_tRNA => EFTu_GTP_Gln2_tRNA; k_Gln2_on*EFTu_GTP*Gln2_tRNA;  // isDescribedBy pubmed:3910093
  EFTu_Gln2_Diss: EFTu_GTP_Gln2_tRNA => EFTu_GTP + Gln2_tRNA; k_Gln2_off*EFTu_GTP_Gln2_tRNA;  // isDescribedBy pubmed:3910093
  EFTu_Glu2_Ass: EFTu_GTP + Glu2_tRNA => EFTu_GTP_Glu2_tRNA; k_Glu2_on*EFTu_GTP*Glu2_tRNA;  // isDescribedBy pubmed:3910093
  EFTu_Glu2_Diss: EFTu_GTP_Glu2_tRNA => EFTu_GTP + Glu2_tRNA; k_Glu2_off*EFTu_GTP_Glu2_tRNA;  // isDescribedBy pubmed:3910093
  EFTu_Gly1_Ass: EFTu_GTP + Gly1_tRNA => EFTu_GTP_Gly1_tRNA; k_Gly1_on*EFTu_GTP*Gly1_tRNA;  // isDescribedBy pubmed:3910093
  EFTu_Gly1_Diss: EFTu_GTP_Gly1_tRNA => EFTu_GTP + Gly1_tRNA; k_Gly1_off*EFTu_GTP_Gly1_tRNA;  // isDescribedBy pubmed:3910093
  EFTu_Gly2_Ass: EFTu_GTP + Gly2_tRNA => EFTu_GTP_Gly2_tRNA; k_Gly2_on*EFTu_GTP*Gly2_tRNA;  // isDescribedBy pubmed:3910093
  EFTu_Gly2_Diss: EFTu_GTP_Gly2_tRNA => EFTu_GTP + Gly2_tRNA; k_Gly2_off*EFTu_GTP_Gly2_tRNA;  // isDescribedBy pubmed:3910093
  EFTu_Gly3_Ass: EFTu_GTP + Gly3_tRNA => EFTu_GTP_Gly3_tRNA; k_Gly3_on*EFTu_GTP*Gly3_tRNA;  // isDescribedBy pubmed:3910093
  EFTu_Gly3_Diss: EFTu_GTP_Gly3_tRNA => EFTu_GTP + Gly3_tRNA; k_Gly3_off*EFTu_GTP_Gly3_tRNA;  // isDescribedBy pubmed:3910093
  EFTu_His_Ass: EFTu_GTP + His_tRNA => EFTu_GTP_His_tRNA; k_His_on*EFTu_GTP*His_tRNA;  // isDescribedBy pubmed:3910093
  EFTu_His_Diss: EFTu_GTP_His_tRNA => EFTu_GTP + His_tRNA; k_His_off*EFTu_GTP_His_tRNA;  // isDescribedBy pubmed:3910093
  EFTu_Ile1_Ass: EFTu_GTP + Ile1_tRNA => EFTu_GTP_Ile1_tRNA; k_Ile1_on*EFTu_GTP*Ile1_tRNA;  // isDescribedBy pubmed:3910093
  EFTu_Ile1_Diss: EFTu_GTP_Ile1_tRNA => EFTu_GTP + Ile1_tRNA; k_Ile1_off*EFTu_GTP_Ile1_tRNA;  // isDescribedBy pubmed:3910093
  EFTu_Ile2_Ass: EFTu_GTP + Ile2_tRNA => EFTu_GTP_Ile2_tRNA; k_Ile2_on*EFTu_GTP*Ile2_tRNA;  // isDescribedBy pubmed:3910093
  EFTu_Ile2_Diss: EFTu_GTP_Ile2_tRNA => EFTu_GTP + Ile2_tRNA; k_Ile2_off*EFTu_GTP_Ile2_tRNA;  // isDescribedBy pubmed:3910093
  EFTu_Leu1_Ass: EFTu_GTP + Leu1_tRNA => EFTu_GTP_Leu1_tRNA; k_Leu1_on*EFTu_GTP*Leu1_tRNA;  // isDescribedBy pubmed:3910093
  EFTu_Leu1_Diss: EFTu_GTP_Leu1_tRNA => EFTu_GTP + Leu1_tRNA; k_Leu1_off*EFTu_GTP_Leu1_tRNA;  // isDescribedBy pubmed:3910093
  EFTu_Leu3_Ass: EFTu_GTP + Leu3_tRNA => EFTu_GTP_Leu3_tRNA; k_Leu3_on*EFTu_GTP*Leu3_tRNA;  // isDescribedBy pubmed:3910093
  EFTu_Leu3_Diss: EFTu_GTP_Leu3_tRNA => EFTu_GTP + Leu3_tRNA; k_Leu3_off*EFTu_GTP_Leu3_tRNA;  // isDescribedBy pubmed:3910093
  EFTu_Leu2_Ass: EFTu_GTP + Leu2_tRNA => EFTu_GTP_Leu2_tRNA; k_Leu2_on*EFTu_GTP*Leu2_tRNA;  // isDescribedBy pubmed:3910093
  EFTu_Leu2_Diss: EFTu_GTP_Leu2_tRNA => EFTu_GTP + Leu2_tRNA; k_Leu2_off*EFTu_GTP_Leu2_tRNA;  // isDescribedBy pubmed:3910093
  EFTu_Leu4_Ass: EFTu_GTP + Leu4_tRNA => EFTu_GTP_Leu4_tRNA; k_Leu4_on*EFTu_GTP*Leu4_tRNA;  // isDescribedBy pubmed:3910093
  EFTu_Leu4_Diss: EFTu_GTP_Leu4_tRNA => EFTu_GTP + Leu4_tRNA; k_Leu4_off*EFTu_GTP_Leu4_tRNA;  // isDescribedBy pubmed:3910093
  EFTu_Leu5_Ass: EFTu_GTP + Leu5_tRNA => EFTu_GTP_Leu5_tRNA; k_Leu5_on*EFTu_GTP*Leu5_tRNA;  // isDescribedBy pubmed:3910093
  EFTu_Leu5_Diss: EFTu_GTP_Leu5_tRNA => EFTu_GTP + Leu5_tRNA; k_Leu5_off*EFTu_GTP_Leu5_tRNA;  // isDescribedBy pubmed:3910093
  EFTu_Lys_Ass: EFTu_GTP + Lys_tRNA => EFTu_GTP_Lys_tRNA; k_Lys_on*EFTu_GTP*Lys_tRNA;  // isDescribedBy pubmed:3910093
  EFTu_Lys_Diss: EFTu_GTP_Lys_tRNA => EFTu_GTP + Lys_tRNA; k_Lys_off*EFTu_GTP_Lys_tRNA;  // isDescribedBy pubmed:3910093
  EFTu_Met_Ass: EFTu_GTP + Met_tRNA => EFTu_GTP_Met_tRNA; k_Met_on*EFTu_GTP*Met_tRNA;  // isDescribedBy pubmed:3910093
  EFTu_Met_Diss: EFTu_GTP_Met_tRNA => EFTu_GTP + Met_tRNA; k_Met_off*EFTu_GTP_Met_tRNA;  // isDescribedBy pubmed:3910093
  EFTu_Phe_Ass: EFTu_GTP + Phe_tRNA => EFTu_GTP_Phe_tRNA; k_Phe_on*EFTu_GTP*Phe_tRNA;  // isDescribedBy pubmed:3910093
  EFTu_Phe_Diss: EFTu_GTP_Phe_tRNA => EFTu_GTP + Phe_tRNA; k_Phe_off*EFTu_GTP_Phe_tRNA;  // isDescribedBy pubmed:3910093
  EFTu_Pro1_Ass: EFTu_GTP + Pro1_tRNA => EFTu_GTP_Pro1_tRNA; k_Pro1_on*EFTu_GTP*Pro1_tRNA;  // isDescribedBy pubmed:3910093
  EFTu_Pro1_Diss: EFTu_GTP_Pro1_tRNA => EFTu_GTP + Pro1_tRNA; k_Pro1_off*EFTu_GTP_Pro1_tRNA;  // isDescribedBy pubmed:3910093
  EFTu_Pro3_Ass: EFTu_GTP + Pro3_tRNA => EFTu_GTP_Pro3_tRNA; k_Pro3_on*EFTu_GTP*Pro3_tRNA;  // isDescribedBy pubmed:3910093
  EFTu_Pro3_Diss: EFTu_GTP_Pro3_tRNA => EFTu_GTP + Pro3_tRNA; k_Pro3_off*EFTu_GTP_Pro3_tRNA;  // isDescribedBy pubmed:3910093
  EFTu_Pro2_Ass: EFTu_GTP + Pro2_tRNA => EFTu_GTP_Pro2_tRNA; k_Pro2_on*EFTu_GTP*Pro2_tRNA;  // isDescribedBy pubmed:3910093
  EFTu_Pro2_Diss: EFTu_GTP_Pro2_tRNA => EFTu_GTP + Pro2_tRNA; k_Pro2_off*EFTu_GTP_Pro2_tRNA;  // isDescribedBy pubmed:3910093
  EFTu_Ser1_Ass: EFTu_GTP + Ser1_tRNA => EFTu_GTP_Ser1_tRNA; k_Ser1_on*EFTu_GTP*Ser1_tRNA;  // isDescribedBy pubmed:3910093
  EFTu_Ser1_Diss: EFTu_GTP_Ser1_tRNA => EFTu_GTP + Ser1_tRNA; k_Ser1_off*EFTu_GTP_Ser1_tRNA;  // isDescribedBy pubmed:3910093
  EFTu_Ser2_Ass: EFTu_GTP + Ser2_tRNA => EFTu_GTP_Ser2_tRNA; k_Ser2_on*EFTu_GTP*Ser2_tRNA;  // isDescribedBy pubmed:3910093
  EFTu_Ser2_Diss: EFTu_GTP_Ser2_tRNA => EFTu_GTP + Ser2_tRNA; k_Ser2_off*EFTu_GTP_Ser2_tRNA;  // isDescribedBy pubmed:3910093
  EFTu_Ser5_Ass: EFTu_GTP + Ser5_tRNA => EFTu_GTP_Ser5_tRNA; k_Ser5_on*EFTu_GTP*Ser5_tRNA;  // isDescribedBy pubmed:3910093
  EFTu_Ser5_Diss: EFTu_GTP_Ser5_tRNA => EFTu_GTP + Ser5_tRNA; k_Ser5_off*EFTu_GTP_Ser5_tRNA;  // isDescribedBy pubmed:3910093
  EFTu_Ser3_Ass: EFTu_GTP + Ser3_tRNA => EFTu_GTP_Ser3_tRNA; k_Ser3_on*EFTu_GTP*Ser3_tRNA;  // isDescribedBy pubmed:3910093
  EFTu_Ser3_Diss: EFTu_GTP_Ser3_tRNA => EFTu_GTP + Ser3_tRNA; k_Ser3_off*EFTu_GTP_Ser3_tRNA;  // isDescribedBy pubmed:3910093
  EFTu_Thr13_Ass: EFTu_GTP + Thr13_tRNA => EFTu_GTP_Thr13_tRNA; k_Thr13_on*EFTu_GTP*Thr13_tRNA;  // isDescribedBy pubmed:3910093
  EFTu_Thr13_Diss: EFTu_GTP_Thr13_tRNA => EFTu_GTP + Thr13_tRNA; k_Thr13_off*EFTu_GTP_Thr13_tRNA;  // isDescribedBy pubmed:3910093
  EFTu_Thr4_Ass: EFTu_GTP + Thr4_tRNA => EFTu_GTP_Thr4_tRNA; k_Thr4_on*EFTu_GTP*Thr4_tRNA;  // isDescribedBy pubmed:3910093
  EFTu_Thr4_Diss: EFTu_GTP_Thr4_tRNA => EFTu_GTP + Thr4_tRNA; k_Thr4_off*EFTu_GTP_Thr4_tRNA;  // isDescribedBy pubmed:3910093
  EFTu_Thr2_Ass: EFTu_GTP + Thr2_tRNA => EFTu_GTP_Thr2_tRNA; k_Thr2_on*EFTu_GTP*Thr2_tRNA;  // isDescribedBy pubmed:3910093
  EFTu_Thr2_Diss: EFTu_GTP_Thr2_tRNA => EFTu_GTP + Thr2_tRNA; k_Thr2_off*EFTu_GTP_Thr2_tRNA;  // isDescribedBy pubmed:3910093
  EFTu_Trp_Ass: EFTu_GTP + Trp_tRNA => EFTu_GTP_Trp_tRNA; k_Trp_on*EFTu_GTP*Trp_tRNA;  // isDescribedBy pubmed:3910093
  EFTu_Trp_Diss: EFTu_GTP_Trp_tRNA => EFTu_GTP + Trp_tRNA; k_Trp_off*EFTu_GTP_Trp_tRNA;  // isDescribedBy pubmed:3910093
  EFTu_Tyr12_Ass: EFTu_GTP + Tyr12_tRNA => EFTu_GTP_Tyr12_tRNA; k_Tyr12_on*EFTu_GTP*Tyr12_tRNA;  // isDescribedBy pubmed:3910093
  EFTu_Tyr12_Diss: EFTu_GTP_Tyr12_tRNA => EFTu_GTP + Tyr12_tRNA; k_Tyr12_off*EFTu_GTP_Tyr12_tRNA;  // isDescribedBy pubmed:3910093
  EFTu_Val1_Ass: EFTu_GTP + Val1_tRNA => EFTu_GTP_Val1_tRNA; k_Val1_on*EFTu_GTP*Val1_tRNA;  // isDescribedBy pubmed:3910093
  EFTu_Val1_Diss: EFTu_GTP_Val1_tRNA => EFTu_GTP + Val1_tRNA; k_Val1_off*EFTu_GTP_Val1_tRNA;  // isDescribedBy pubmed:3910093
  EFTu_Val2_Ass: EFTu_GTP + Val2_tRNA => EFTu_GTP_Val2_tRNA; k_Val2_on*EFTu_GTP*Val2_tRNA;  // isDescribedBy pubmed:3910093
  EFTu_Val2_Diss: EFTu_GTP_Val2_tRNA => EFTu_GTP + Val2_tRNA; k_Val2_off*EFTu_GTP_Val2_tRNA;  // isDescribedBy pubmed:3910093
  Transaltion_initiation: Ribo_free => Ribo_active; kcat_mRNA*mRNA*Ribo_free/(kM_ribo + Ribo_free); Transaltion_initiation is "The initiation of transaltion";  // modifiers: mRNA; isDescribedBy pubmed:18437222 pubmed:27193784
  Ribo_GCA_lab: Ribo_active => Ribo_GCA; ; Ribo_GCA_lab is "Active ribosome labeled with codon GCA";
  Ribo_GCG_lab: Ribo_active => Ribo_GCG; ; Ribo_GCG_lab is "Active ribosome labeled with codon GCG";
  Ribo_GCU_lab: Ribo_active => Ribo_GCU; ; Ribo_GCU_lab is "Active ribosome labeled with codon GCU";
  Ribo_GCC_lab: Ribo_active => Ribo_GCC; ; Ribo_GCC_lab is "Active ribosome labeled with codon GCC";
  Ribo_CGC_lab: Ribo_active => Ribo_CGC; ; Ribo_CGC_lab is "Active ribosome labeled with codon CGC";
  Ribo_CGU_lab: Ribo_active => Ribo_CGU; ; Ribo_CGU_lab is "Active ribosome labeled with codon CGU";
  Ribo_CGA_lab: Ribo_active => Ribo_CGA; ; Ribo_CGA_lab is "Active ribosome labeled with codon CGA";
  Ribo_CGG_lab: Ribo_active => Ribo_CGG; ; Ribo_CGG_lab is "Active ribosome labeled with codon CGG";
  Ribo_AGA_lab: Ribo_active => Ribo_AGA; ; Ribo_AGA_lab is "Active ribosome labeled with codon AGA";
  Ribo_AGG_lab: Ribo_active => Ribo_AGG; ; Ribo_AGG_lab is "Active ribosome labeled with codon AGG";
  Ribo_AAC_lab: Ribo_active => Ribo_AAC; ; Ribo_AAC_lab is "Active ribosome labeled with codon AAC";
  Ribo_AAU_lab: Ribo_active => Ribo_AAU; ; Ribo_AAU_lab is "Active ribosome labeled with codon AAU";
  Ribo_GAC_lab: Ribo_active => Ribo_GAC; ; Ribo_GAC_lab is "Active ribosome labeled with codon GAC";
  Ribo_GAU_lab: Ribo_active => Ribo_GAU; ; Ribo_GAU_lab is "Active ribosome labeled with codon GAU";
  Ribo_UGC_lab: Ribo_active => Ribo_UGC; ; Ribo_UGC_lab is "Active ribosome labeled with codon UGC";
  Ribo_UGU_lab: Ribo_active => Ribo_UGU; ; Ribo_UGU_lab is "Active ribosome labeled with codon UGU";
  Ribo_CAA_lab: Ribo_active => Ribo_CAA; ; Ribo_CAA_lab is "Active ribosome labeled with codon CAA";
  Ribo_CAG_lab: Ribo_active => Ribo_CAG; ; Ribo_CAG_lab is "Active ribosome labeled with codon CAG";
  Ribo_GAG_lab: Ribo_active => Ribo_GAG; ; Ribo_GAG_lab is "Active ribosome labeled with codon GAG";
  Ribo_GAA_lab: Ribo_active => Ribo_GAA; ; Ribo_GAA_lab is "Active ribosome labeled with codon GAA";
  Ribo_GGG_lab: Ribo_active => Ribo_GGG; ; Ribo_GGG_lab is "Active ribosome labeled with codon GGG";
  Ribo_GGA_lab: Ribo_active => Ribo_GGA; ; Ribo_GGA_lab is "Active ribosome labeled with codon GGA";
  Ribo_GGU_lab: Ribo_active => Ribo_GGU; ; Ribo_GGU_lab is "Active ribosome labeled with codon GGU";
  Ribo_GGC_lab: Ribo_active => Ribo_GGC; ; Ribo_GGC_lab is "Active ribosome labeled with codon GGC";
  Ribo_CAC_lab: Ribo_active => Ribo_CAC; ; Ribo_CAC_lab is "Active ribosome labeled with codon CAC";
  Ribo_CAU_lab: Ribo_active => Ribo_CAU; ; Ribo_CAU_lab is "Active ribosome labeled with codon CAU";
  Ribo_AUC_lab: Ribo_active => Ribo_AUC; ; Ribo_AUC_lab is "Active ribosome labeled with codon AUC";
  Ribo_AUU_lab: Ribo_active => Ribo_AUU; ; Ribo_AUU_lab is "Active ribosome labeled with codon AUU";
  Ribo_AUA_lab: Ribo_active => Ribo_AUA; ; Ribo_AUA_lab is "Active ribosome labeled with codon AUA";
  Ribo_CUG_lab: Ribo_active => Ribo_CUG; ; Ribo_CUG_lab is "Active ribosome labeled with codon CUG";
  Ribo_CUU_lab: Ribo_active => Ribo_CUU; ; Ribo_CUU_lab is "Active ribosome labeled with codon CUU";
  Ribo_CUC_lab: Ribo_active => Ribo_CUC; ; Ribo_CUC_lab is "Active ribosome labeled with codon CUC";
  Ribo_CUA_lab: Ribo_active => Ribo_CUA; ; Ribo_CUA_lab is "Active ribosome labeled with codon CUA";
  Ribo_UUG_lab: Ribo_active => Ribo_UUG; ; Ribo_UUG_lab is "Active ribosome labeled with codon UUG";
  Ribo_UUA_lab: Ribo_active => Ribo_UUA; ; Ribo_UUA_lab is "Active ribosome labeled with codon UUA";
  Ribo_AAG_lab: Ribo_active => Ribo_AAG; ; Ribo_AAG_lab is "Active ribosome labeled with codon AAG";
  Ribo_AAA_lab: Ribo_active => Ribo_AAA; ; Ribo_AAA_lab is "Active ribosome labeled with codon AAA";
  Ribo_AUG_lab: Ribo_active => Ribo_AUG; ; Ribo_AUG_lab is "Active ribosome labeled with codon AUG";
  Ribo_UUU_lab: Ribo_active => Ribo_UUU; ; Ribo_UUU_lab is "Active ribosome labeled with codon UUU";
  Ribo_UUC_lab: Ribo_active => Ribo_UUC; ; Ribo_UUC_lab is "Active ribosome labeled with codon UUC";
  Ribo_CCG_lab: Ribo_active => Ribo_CCG; ; Ribo_CCG_lab is "Active ribosome labeled with codon CCG";
  Ribo_CCC_lab: Ribo_active => Ribo_CCC; ; Ribo_CCC_lab is "Active ribosome labeled with codon CCC";
  Ribo_CCU_lab: Ribo_active => Ribo_CCU; ; Ribo_CCU_lab is "Active ribosome labeled with codon CCU";
  Ribo_CCA_lab: Ribo_active => Ribo_CCA; ; Ribo_CCA_lab is "Active ribosome labeled with codon CCA";
  Ribo_UCA_lab: Ribo_active => Ribo_UCA; ; Ribo_UCA_lab is "Active ribosome labeled with codon UCA";
  Ribo_UCG_lab: Ribo_active => Ribo_UCG; ; Ribo_UCG_lab is "Active ribosome labeled with codon UCG";
  Ribo_UCU_lab: Ribo_active => Ribo_UCU; ; Ribo_UCU_lab is "Active ribosome labeled with codon UCU";
  Ribo_AGU_lab: Ribo_active => Ribo_AGU; ; Ribo_AGU_lab is "Active ribosome labeled with codon AGU";
  Ribo_AGC_lab: Ribo_active => Ribo_AGC; ; Ribo_AGC_lab is "Active ribosome labeled with codon AGC";
  Ribo_UCC_lab: Ribo_active => Ribo_UCC; ; Ribo_UCC_lab is "Active ribosome labeled with codon UCC";
  Ribo_ACC_lab: Ribo_active => Ribo_ACC; ; Ribo_ACC_lab is "Active ribosome labeled with codon ACC";
  Ribo_ACU_lab: Ribo_active => Ribo_ACU; ; Ribo_ACU_lab is "Active ribosome labeled with codon ACU";
  Ribo_ACG_lab: Ribo_active => Ribo_ACG; ; Ribo_ACG_lab is "Active ribosome labeled with codon ACG";
  Ribo_ACA_lab: Ribo_active => Ribo_ACA; ; Ribo_ACA_lab is "Active ribosome labeled with codon ACA";
  Ribo_UGG_lab: Ribo_active => Ribo_UGG; ; Ribo_UGG_lab is "Active ribosome labeled with codon UGG";
  Ribo_UAU_lab: Ribo_active => Ribo_UAU; ; Ribo_UAU_lab is "Active ribosome labeled with codon UAU";
  Ribo_UAC_lab: Ribo_active => Ribo_UAC; ; Ribo_UAC_lab is "Active ribosome labeled with codon UAC";
  Ribo_GUG_lab: Ribo_active => Ribo_GUG; ; Ribo_GUG_lab is "Active ribosome labeled with codon GUG";
  Ribo_GUA_lab: Ribo_active => Ribo_GUA; ; Ribo_GUA_lab is "Active ribosome labeled with codon GUA";
  Ribo_GUU_lab: Ribo_active => Ribo_GUU; ; Ribo_GUU_lab is "Active ribosome labeled with codon GUU";
  Ribo_GUC_lab: Ribo_active => Ribo_GUC; ; Ribo_GUC_lab is "Active ribosome labeled with codon GUC";
  Ala1B_GCA_elg: EFTu_GTP_Ala1B_tRNA + Ribo_GCA => EFTu_GDP + Ribo_active; kcat_ribo*Ribo_GCA*EFTu_GTP_Ala1B_tRNA/(EFTu_GTP_Ala1B_tRNA + kM_TC); Ala1B_GCA_elg is "Translation of codon GCA by tRNA Ala1B";  // isDescribedBy pubmed:24082144
  Ala1B_GCG_elg: EFTu_GTP_Ala1B_tRNA + Ribo_GCG => EFTu_GDP + Ribo_active; kcat_ribo*Ribo_GCG*EFTu_GTP_Ala1B_tRNA/(EFTu_GTP_Ala1B_tRNA + kM_TC); Ala1B_GCG_elg is "Translation of codon GCG by tRNA Ala1B";  // isDescribedBy pubmed:24082144
  Ala1B_GCU_elg: EFTu_GTP_Ala1B_tRNA + Ribo_GCU => EFTu_GDP + Ribo_active; kcat_ribo*Ribo_GCU*EFTu_GTP_Ala1B_tRNA/(EFTu_GTP_Ala1B_tRNA + kM_TC); Ala1B_GCU_elg is "Translation of codon GCU by tRNA Ala1B";  // isDescribedBy pubmed:24082144
  Ala2_GCC_elg: EFTu_GTP_Ala2_tRNA + Ribo_GCC => EFTu_GDP + Ribo_active; kcat_ribo*Ribo_GCC*EFTu_GTP_Ala2_tRNA/(EFTu_GTP_Ala2_tRNA + kM_TC); Ala2_GCC_elg is "Translation of codon GCC by tRNA Ala2";  // isDescribedBy pubmed:24082144
  Arg2_CGC_elg: EFTu_GTP_Arg2_tRNA + Ribo_CGC => EFTu_GDP + Ribo_active; kcat_ribo*Ribo_CGC*EFTu_GTP_Arg2_tRNA/(EFTu_GTP_Arg2_tRNA + kM_TC); Arg2_CGC_elg is "Translation of codon CGC by tRNA Arg2";  // isDescribedBy pubmed:24082144
  Arg2_CGU_elg: EFTu_GTP_Arg2_tRNA + Ribo_CGU => EFTu_GDP + Ribo_active; kcat_ribo*Ribo_CGU*EFTu_GTP_Arg2_tRNA/(EFTu_GTP_Arg2_tRNA + kM_TC); Arg2_CGU_elg is "Translation of codon CGU by tRNA Arg2";  // isDescribedBy pubmed:24082144
  Arg2_CGA_elg: EFTu_GTP_Arg2_tRNA + Ribo_CGA => EFTu_GDP + Ribo_active; kcat_ribo*Ribo_CGA*EFTu_GTP_Arg2_tRNA/(EFTu_GTP_Arg2_tRNA + kM_TC); Arg2_CGA_elg is "Translation of codon CGA by tRNA Arg2";  // isDescribedBy pubmed:24082144
  Arg3_CGG_elg: EFTu_GTP_Arg3_tRNA + Ribo_CGG => EFTu_GDP + Ribo_active; kcat_ribo*Ribo_CGG*EFTu_GTP_Arg3_tRNA/(EFTu_GTP_Arg3_tRNA + kM_TC); Arg3_CGG_elg is "Translation of codon CGG by tRNA Arg3";  // isDescribedBy pubmed:24082144
  Arg4_AGA_elg: EFTu_GTP_Arg4_tRNA + Ribo_AGA => EFTu_GDP + Ribo_active; kcat_ribo*Ribo_AGA*EFTu_GTP_Arg4_tRNA/(EFTu_GTP_Arg4_tRNA + kM_TC); Arg4_AGA_elg is "Translation of codon AGA by tRNA Arg4";  // isDescribedBy pubmed:24082144
  Arg5_AGG_elg: EFTu_GTP_Arg5_tRNA + Ribo_AGG => EFTu_GDP + Ribo_active; kcat_ribo*Ribo_AGG*EFTu_GTP_Arg5_tRNA/(EFTu_GTP_Arg5_tRNA + kM_TC); Arg5_AGG_elg is "Translation of codon AGG by tRNA Arg5";  // isDescribedBy pubmed:24082144
  Asn_AAC_elg: EFTu_GTP_Asn_tRNA + Ribo_AAC => EFTu_GDP + Ribo_active; kcat_ribo*Ribo_AAC*EFTu_GTP_Asn_tRNA/(EFTu_GTP_Asn_tRNA + kM_TC); Asn_AAC_elg is "Translation of codon AAC by tRNA Asn";  // isDescribedBy pubmed:24082144
  Asn_AAU_elg: EFTu_GTP_Asn_tRNA + Ribo_AAU => EFTu_GDP + Ribo_active; kcat_ribo*Ribo_AAU*EFTu_GTP_Asn_tRNA/(EFTu_GTP_Asn_tRNA + kM_TC); Asn_AAU_elg is "Translation of codon AAU by tRNA Asn";  // isDescribedBy pubmed:24082144
  Asp1_GAC_elg: EFTu_GTP_Asp1_tRNA + Ribo_GAC => EFTu_GDP + Ribo_active; kcat_ribo*Ribo_GAC*EFTu_GTP_Asp1_tRNA/(EFTu_GTP_Asp1_tRNA + kM_TC); Asp1_GAC_elg is "Translation of codon GAC by tRNA Asp1";  // isDescribedBy pubmed:24082144
  Asp1_GAU_elg: EFTu_GTP_Asp1_tRNA + Ribo_GAU => EFTu_GDP + Ribo_active; kcat_ribo*Ribo_GAU*EFTu_GTP_Asp1_tRNA/(EFTu_GTP_Asp1_tRNA + kM_TC); Asp1_GAU_elg is "Translation of codon GAU by tRNA Asp1";  // isDescribedBy pubmed:24082144
  Cys_UGC_elg: EFTu_GTP_Cys_tRNA + Ribo_UGC => EFTu_GDP + Ribo_active; kcat_ribo*Ribo_UGC*EFTu_GTP_Cys_tRNA/(EFTu_GTP_Cys_tRNA + kM_TC); Cys_UGC_elg is "Translation of codon UGC by tRNA Cys";  // isDescribedBy pubmed:24082144
  Cys_UGU_elg: EFTu_GTP_Cys_tRNA + Ribo_UGU => EFTu_GDP + Ribo_active; kcat_ribo*Ribo_UGU*EFTu_GTP_Cys_tRNA/(EFTu_GTP_Cys_tRNA + kM_TC); Cys_UGU_elg is "Translation of codon UGU by tRNA Cys";  // isDescribedBy pubmed:24082144
  Gln1_CAA_elg: EFTu_GTP_Gln1_tRNA + Ribo_CAA => EFTu_GDP + Ribo_active; kcat_ribo*Ribo_CAA*EFTu_GTP_Gln1_tRNA/(EFTu_GTP_Gln1_tRNA + kM_TC); Gln1_CAA_elg is "Translation of codon CAA by tRNA Gln1";  // isDescribedBy pubmed:24082144
  Gln2_CAG_elg: EFTu_GTP_Gln2_tRNA + Ribo_CAG => EFTu_GDP + Ribo_active; kcat_ribo*Ribo_CAG*EFTu_GTP_Gln2_tRNA/(EFTu_GTP_Gln2_tRNA + kM_TC); Gln2_CAG_elg is "Translation of codon CAG by tRNA Gln2";  // isDescribedBy pubmed:24082144
  Glu2_GAG_elg: EFTu_GTP_Glu2_tRNA + Ribo_GAG => EFTu_GDP + Ribo_active; kcat_ribo*Ribo_GAG*EFTu_GTP_Glu2_tRNA/(EFTu_GTP_Glu2_tRNA + kM_TC); Glu2_GAG_elg is "Translation of codon GAG by tRNA Glu2";  // isDescribedBy pubmed:24082144
  Glu2_GAA_elg: EFTu_GTP_Glu2_tRNA + Ribo_GAA => EFTu_GDP + Ribo_active; kcat_ribo*Ribo_GAA*EFTu_GTP_Glu2_tRNA/(EFTu_GTP_Glu2_tRNA + kM_TC); Glu2_GAA_elg is "Translation of codon GAA by tRNA Glu2";  // isDescribedBy pubmed:24082144
  Gly2_GGA_elg: EFTu_GTP_Gly2_tRNA + Ribo_GGA => EFTu_GDP + Ribo_active; kcat_ribo*Ribo_GGA*EFTu_GTP_Gly2_tRNA/(EFTu_GTP_Gly2_tRNA + kM_TC); Gly2_GGA_elg is "Translation of codon GGA by tRNA Gly2";  // isDescribedBy pubmed:24082144
  Gly3_GGU_elg: EFTu_GTP_Gly3_tRNA + Ribo_GGU => EFTu_GDP + Ribo_active; kcat_ribo*Ribo_GGU*EFTu_GTP_Gly3_tRNA/(EFTu_GTP_Gly3_tRNA + kM_TC); Gly3_GGU_elg is "Translation of codon GGU by tRNA Gly3";  // isDescribedBy pubmed:24082144
  Gly3_GGC_elg: EFTu_GTP_Gly3_tRNA + Ribo_GGC => EFTu_GDP + Ribo_active; kcat_ribo*Ribo_GGC*EFTu_GTP_Gly3_tRNA/(EFTu_GTP_Gly3_tRNA + kM_TC); Gly3_GGC_elg is "Translation of codon GGC by tRNA Gly3";  // isDescribedBy pubmed:24082144
  His_CAC_elg: EFTu_GTP_His_tRNA + Ribo_CAC => EFTu_GDP + Ribo_active; kcat_ribo*Ribo_CAC*EFTu_GTP_His_tRNA/(EFTu_GTP_His_tRNA + kM_TC); His_CAC_elg is "Translation of codon CAC by tRNA His";  // isDescribedBy pubmed:24082144
  His_CAU_elg: EFTu_GTP_His_tRNA + Ribo_CAU => EFTu_GDP + Ribo_active; kcat_ribo*Ribo_CAU*EFTu_GTP_His_tRNA/(EFTu_GTP_His_tRNA + kM_TC); His_CAU_elg is "Translation of codon CAU by tRNA His";  // isDescribedBy pubmed:24082144
  Ile1_AUC_elg: EFTu_GTP_Ile1_tRNA + Ribo_AUC => EFTu_GDP + Ribo_active; kcat_ribo*Ribo_AUC*EFTu_GTP_Ile1_tRNA/(EFTu_GTP_Ile1_tRNA + kM_TC); Ile1_AUC_elg is "Translation of codon AUC by tRNA Ile1";  // isDescribedBy pubmed:24082144
  Ile1_AUU_elg: EFTu_GTP_Ile1_tRNA + Ribo_AUU => EFTu_GDP + Ribo_active; kcat_ribo*Ribo_AUU*EFTu_GTP_Ile1_tRNA/(EFTu_GTP_Ile1_tRNA + kM_TC); Ile1_AUU_elg is "Translation of codon AUU by tRNA Ile1";  // isDescribedBy pubmed:24082144
  Ile2_AUA_elg: EFTu_GTP_Ile2_tRNA + Ribo_AUA => EFTu_GDP + Ribo_active; kcat_ribo*Ribo_AUA*EFTu_GTP_Ile2_tRNA/(EFTu_GTP_Ile2_tRNA + kM_TC); Ile2_AUA_elg is "Translation of codon AUA by tRNA Ile2";  // isDescribedBy pubmed:24082144
  Leu2_CUU_elg: EFTu_GTP_Leu2_tRNA + Ribo_CUU => EFTu_GDP + Ribo_active; kcat_ribo*Ribo_CUU*EFTu_GTP_Leu2_tRNA/(EFTu_GTP_Leu2_tRNA + kM_TC); Leu2_CUU_elg is "Translation of codon CUU by tRNA Leu2";  // isDescribedBy pubmed:24082144
  Leu2_CUC_elg: EFTu_GTP_Leu2_tRNA + Ribo_CUC => EFTu_GDP + Ribo_active; kcat_ribo*Ribo_CUC*EFTu_GTP_Leu2_tRNA/(EFTu_GTP_Leu2_tRNA + kM_TC); Leu2_CUC_elg is "Translation of codon CUC by tRNA Leu2";  // isDescribedBy pubmed:24082144
  Leu3_CUA_elg: EFTu_GTP_Leu3_tRNA + Ribo_CUA => EFTu_GDP + Ribo_active; kcat_ribo*Ribo_CUA*EFTu_GTP_Leu3_tRNA/(EFTu_GTP_Leu3_tRNA + kM_TC); Leu3_CUA_elg is "Translation of codon CUA by tRNA Leu3";  // isDescribedBy pubmed:24082144
  Leu5_UUA_elg: EFTu_GTP_Leu5_tRNA + Ribo_UUA => EFTu_GDP + Ribo_active; kcat_ribo*Ribo_UUA*EFTu_GTP_Leu5_tRNA/(EFTu_GTP_Leu5_tRNA + kM_TC); Leu5_UUA_elg is "Translation of codon UUA by tRNA Leu5";  // isDescribedBy pubmed:24082144
  Lys_AAG_elg: EFTu_GTP_Lys_tRNA + Ribo_AAG => EFTu_GDP + Ribo_active; kcat_ribo*Ribo_AAG*EFTu_GTP_Lys_tRNA/(EFTu_GTP_Lys_tRNA + kM_TC); Lys_AAG_elg is "Translation of codon AAG by tRNA Lys";  // isDescribedBy pubmed:24082144
  Lys_AAA_elg: EFTu_GTP_Lys_tRNA + Ribo_AAA => EFTu_GDP + Ribo_active; kcat_ribo*Ribo_AAA*EFTu_GTP_Lys_tRNA/(EFTu_GTP_Lys_tRNA + kM_TC); Lys_AAA_elg is "Translation of codon AAA by tRNA Lys";  // isDescribedBy pubmed:24082144
  Met_AUG_elg: EFTu_GTP_Met_tRNA + Ribo_AUG => EFTu_GDP + Ribo_active; kcat_ribo*Ribo_AUG*EFTu_GTP_Met_tRNA/(EFTu_GTP_Met_tRNA + kM_TC); Met_AUG_elg is "Translation of codon AUG by tRNA Met";  // isDescribedBy pubmed:24082144
  Phe_UUU_elg: EFTu_GTP_Phe_tRNA + Ribo_UUU => EFTu_GDP + Ribo_active; kcat_ribo*Ribo_UUU*EFTu_GTP_Phe_tRNA/(EFTu_GTP_Phe_tRNA + kM_TC); Phe_UUU_elg is "Translation of codon UUU by tRNA Phe";  // isDescribedBy pubmed:24082144
  Phe_UUC_elg: EFTu_GTP_Phe_tRNA + Ribo_UUC => EFTu_GDP + Ribo_active; kcat_ribo*Ribo_UUC*EFTu_GTP_Phe_tRNA/(EFTu_GTP_Phe_tRNA + kM_TC); Phe_UUC_elg is "Translation of codon UUC by tRNA Phe";  // isDescribedBy pubmed:24082144
  Pro2_CCC_elg: EFTu_GTP_Pro2_tRNA + Ribo_CCC => EFTu_GDP + Ribo_active; kcat_ribo*Ribo_CCC*EFTu_GTP_Pro2_tRNA/(EFTu_GTP_Pro2_tRNA + kM_TC); Pro2_CCC_elg is "Translation of codon CCC by tRNA Pro2";  // isDescribedBy pubmed:24082144
  Pro3_CCA_elg: EFTu_GTP_Pro3_tRNA + Ribo_CCA => EFTu_GDP + Ribo_active; kcat_ribo*Ribo_CCA*EFTu_GTP_Pro3_tRNA/(EFTu_GTP_Pro3_tRNA + kM_TC); Pro3_CCA_elg is "Translation of codon CCA by tRNA Pro3";  // isDescribedBy pubmed:24082144
  Ser1_UCA_elg: EFTu_GTP_Ser1_tRNA + Ribo_UCA => EFTu_GDP + Ribo_active; kcat_ribo*Ribo_UCA*EFTu_GTP_Ser1_tRNA/(EFTu_GTP_Ser1_tRNA + kM_TC); Ser1_UCA_elg is "Translation of codon UCA by tRNA Ser1";  // isDescribedBy pubmed:24082144
  Ser3_AGU_elg: EFTu_GTP_Ser3_tRNA + Ribo_AGU => EFTu_GDP + Ribo_active; kcat_ribo*Ribo_AGU*EFTu_GTP_Ser3_tRNA/(EFTu_GTP_Ser3_tRNA + kM_TC); Ser3_AGU_elg is "Translation of codon AGU by tRNA Ser3";  // isDescribedBy pubmed:24082144
  Ser3_AGC_elg: EFTu_GTP_Ser3_tRNA + Ribo_AGC => EFTu_GDP + Ribo_active; kcat_ribo*Ribo_AGC*EFTu_GTP_Ser3_tRNA/(EFTu_GTP_Ser3_tRNA + kM_TC); Ser3_AGC_elg is "Translation of codon AGC by tRNA Ser3";  // isDescribedBy pubmed:24082144
  Ser5_UCC_elg: EFTu_GTP_Ser5_tRNA + Ribo_UCC => EFTu_GDP + Ribo_active; kcat_ribo*Ribo_UCC*EFTu_GTP_Ser5_tRNA/(EFTu_GTP_Ser5_tRNA + kM_TC); Ser5_UCC_elg is "Translation of codon UCC by tRNA Ser5";  // isDescribedBy pubmed:24082144
  Thr13_ACC_elg: EFTu_GTP_Thr13_tRNA + Ribo_ACC => EFTu_GDP + Ribo_active; kcat_ribo*Ribo_ACC*EFTu_GTP_Thr13_tRNA/(EFTu_GTP_Thr13_tRNA + kM_TC); Thr13_ACC_elg is "Translation of codon ACC by tRNA Thr13";  // isDescribedBy pubmed:24082144
  Thr4_ACA_elg: EFTu_GTP_Thr4_tRNA + Ribo_ACA => EFTu_GDP + Ribo_active; kcat_ribo*Ribo_ACA*EFTu_GTP_Thr4_tRNA/(EFTu_GTP_Thr4_tRNA + kM_TC); Thr4_ACA_elg is "Translation of codon ACA by tRNA Thr4";  // isDescribedBy pubmed:24082144
  Trp_UGG_elg: EFTu_GTP_Trp_tRNA + Ribo_UGG => EFTu_GDP + Ribo_active; kcat_ribo*Ribo_UGG*EFTu_GTP_Trp_tRNA/(EFTu_GTP_Trp_tRNA + kM_TC); Trp_UGG_elg is "Translation of codon UGG by tRNA Trp";  // isDescribedBy pubmed:24082144
  Tyr12_UAU_elg: EFTu_GTP_Tyr12_tRNA + Ribo_UAU => EFTu_GDP + Ribo_active; kcat_ribo*Ribo_UAU*EFTu_GTP_Tyr12_tRNA/(EFTu_GTP_Tyr12_tRNA + kM_TC); Tyr12_UAU_elg is "Translation of codon UAU by tRNA Tyr12";  // isDescribedBy pubmed:24082144
  Tyr12_UAC_elg: EFTu_GTP_Tyr12_tRNA + Ribo_UAC => EFTu_GDP + Ribo_active; kcat_ribo*Ribo_UAC*EFTu_GTP_Tyr12_tRNA/(EFTu_GTP_Tyr12_tRNA + kM_TC); Tyr12_UAC_elg is "Translation of codon UAC by tRNA Tyr12";  // isDescribedBy pubmed:24082144
  Val1_GUG_elg: EFTu_GTP_Val1_tRNA + Ribo_GUG => EFTu_GDP + Ribo_active; kcat_ribo*Ribo_GUG*EFTu_GTP_Val1_tRNA/(EFTu_GTP_Val1_tRNA + kM_TC); Val1_GUG_elg is "Translation of codon GUG by tRNA Val1";  // isDescribedBy pubmed:24082144
  Val1_GUA_elg: EFTu_GTP_Val1_tRNA + Ribo_GUA => EFTu_GDP + Ribo_active; kcat_ribo*Ribo_GUA*EFTu_GTP_Val1_tRNA/(EFTu_GTP_Val1_tRNA + kM_TC); Val1_GUA_elg is "Translation of codon GUA by tRNA Val1";  // isDescribedBy pubmed:24082144
  Val2_GUC_elg: EFTu_GTP_Val2_tRNA + Ribo_GUC => EFTu_GDP + Ribo_active; kcat_ribo*Ribo_GUC*EFTu_GTP_Val2_tRNA/(EFTu_GTP_Val2_tRNA + kM_TC); Val2_GUC_elg is "Translation of codon GUC by tRNA Val2";  // isDescribedBy pubmed:24082144
  Gly1_GGG_elg: EFTu_GTP_Gly1_tRNA + Ribo_GGG => EFTu_GDP + Ribo_active; kcat_ribo*Ribo_GGG*EFTu_GTP_Gly1_tRNA/(EFTu_GTP_Gly1_tRNA + kM_TC); Gly1_GGG_elg is "Translation of codon GGG by tRNA Gly1";  // isDescribedBy pubmed:24082144
  Gly2_GGG_elg: EFTu_GTP_Gly2_tRNA + Ribo_GGG => EFTu_GDP + Ribo_active; kcat_ribo*Ribo_GGG*EFTu_GTP_Gly2_tRNA/(EFTu_GTP_Gly2_tRNA + kM_TC); Gly2_GGG_elg is "Translation of codon GGG by tRNA Gly2";  // isDescribedBy pubmed:24082144
  Leu1_CUG_elg: EFTu_GTP_Leu1_tRNA + Ribo_CUG => EFTu_GDP + Ribo_active; kcat_ribo*Ribo_CUG*EFTu_GTP_Leu1_tRNA/(EFTu_GTP_Leu1_tRNA + kM_TC); Leu1_CUG_elg is "Translation of codon CUG by tRNA Leu1";  // isDescribedBy pubmed:24082144
  Leu3_CUG_elg: EFTu_GTP_Leu3_tRNA + Ribo_CUG => EFTu_GDP + Ribo_active; kcat_ribo*Ribo_CUG*EFTu_GTP_Leu3_tRNA/(EFTu_GTP_Leu3_tRNA + kM_TC); Leu3_CUG_elg is "Translation of codon CUG by tRNA Leu3";  // isDescribedBy pubmed:24082144
  Leu4_UUG_elg: EFTu_GTP_Leu4_tRNA + Ribo_UUG => EFTu_GDP + Ribo_active; kcat_ribo*Ribo_UUG*EFTu_GTP_Leu4_tRNA/(EFTu_GTP_Leu4_tRNA + kM_TC); Leu4_UUG_elg is "Translation of codon UUG by tRNA Leu4";  // isDescribedBy pubmed:24082144
  Leu5_UUG_elg: EFTu_GTP_Leu5_tRNA + Ribo_UUG => EFTu_GDP + Ribo_active; kcat_ribo*Ribo_UUG*EFTu_GTP_Leu5_tRNA/(EFTu_GTP_Leu5_tRNA + kM_TC); Leu5_UUG_elg is "Translation of codon UUG by tRNA Leu5";  // isDescribedBy pubmed:24082144
  Pro1_CCG_elg: EFTu_GTP_Pro1_tRNA + Ribo_CCG => EFTu_GDP + Ribo_active; kcat_ribo*Ribo_CCG*EFTu_GTP_Pro1_tRNA/(EFTu_GTP_Pro1_tRNA + kM_TC); Pro1_CCG_elg is "Translation of codon CCG by tRNA Pro1";  // isDescribedBy pubmed:24082144
  Pro3_CCG_elg: EFTu_GTP_Pro3_tRNA + Ribo_CCG => EFTu_GDP + Ribo_active; kcat_ribo*Ribo_CCG*EFTu_GTP_Pro3_tRNA/(EFTu_GTP_Pro3_tRNA + kM_TC); Pro3_CCG_elg is "Translation of codon CCG by tRNA Pro3";  // isDescribedBy pubmed:24082144
  Pro2_CCU_elg: EFTu_GTP_Pro2_tRNA + Ribo_CCU => EFTu_GDP + Ribo_active; kcat_ribo*Ribo_CCU*EFTu_GTP_Pro2_tRNA/(EFTu_GTP_Pro2_tRNA + kM_TC); Pro2_CCU_elg is "Translation of codon CCU by tRNA Pro2";  // isDescribedBy pubmed:24082144
  Pro3_CCU_elg: EFTu_GTP_Pro3_tRNA + Ribo_CCU => EFTu_GDP + Ribo_active; kcat_ribo*Ribo_CCU*EFTu_GTP_Pro3_tRNA/(EFTu_GTP_Pro3_tRNA + kM_TC); Pro3_CCU_elg is "Translation of codon CCU by tRNA Pro3";  // isDescribedBy pubmed:24082144
  Ser1_UCG_elg: EFTu_GTP_Ser1_tRNA + Ribo_UCG => EFTu_GDP + Ribo_active; kcat_ribo*Ribo_UCG*EFTu_GTP_Ser1_tRNA/(EFTu_GTP_Ser1_tRNA + kM_TC); Ser1_UCG_elg is "Translation of codon UCG by tRNA Ser1";  // isDescribedBy pubmed:24082144
  Ser2_UCG_elg: EFTu_GTP_Ser2_tRNA + Ribo_UCG => EFTu_GDP + Ribo_active; kcat_ribo*Ribo_UCG*EFTu_GTP_Ser2_tRNA/(EFTu_GTP_Ser2_tRNA + kM_TC); Ser2_UCG_elg is "Translation of codon UCG by tRNA Ser2";  // isDescribedBy pubmed:24082144
  Ser1_UCU_elg: EFTu_GTP_Ser1_tRNA + Ribo_UCU => EFTu_GDP + Ribo_active; kcat_ribo*Ribo_UCU*EFTu_GTP_Ser1_tRNA/(EFTu_GTP_Ser1_tRNA + kM_TC); Ser1_UCU_elg is "Translation of codon UCU by tRNA Ser1";  // isDescribedBy pubmed:24082144
  Ser5_UCU_elg: EFTu_GTP_Ser5_tRNA + Ribo_UCU => EFTu_GDP + Ribo_active; kcat_ribo*Ribo_UCU*EFTu_GTP_Ser5_tRNA/(EFTu_GTP_Ser5_tRNA + kM_TC); Ser5_UCU_elg is "Translation of codon UCU by tRNA Ser5";  // isDescribedBy pubmed:24082144
  Thr13_ACU_elg: EFTu_GTP_Thr13_tRNA + Ribo_ACU => EFTu_GDP + Ribo_active; kcat_ribo*Ribo_ACU*EFTu_GTP_Thr13_tRNA/(EFTu_GTP_Thr13_tRNA + kM_TC); Thr13_ACU_elg is "Translation of codon ACU by tRNA Thr13";  // isDescribedBy pubmed:24082144
  Thr4_ACU_elg: EFTu_GTP_Thr4_tRNA + Ribo_ACU => EFTu_GDP + Ribo_active; kcat_ribo*Ribo_ACU*EFTu_GTP_Thr4_tRNA/(EFTu_GTP_Thr4_tRNA + kM_TC); Thr4_ACU_elg is "Translation of codon ACU by tRNA Thr4";  // isDescribedBy pubmed:24082144
  Thr2_ACG_elg: EFTu_GTP_Thr2_tRNA + Ribo_ACG => EFTu_GDP + Ribo_active; kcat_ribo*Ribo_ACG*EFTu_GTP_Thr2_tRNA/(EFTu_GTP_Thr2_tRNA + kM_TC); Thr2_ACG_elg is "Translation of codon ACG by tRNA Thr2";  // isDescribedBy pubmed:24082144
  Thr4_ACG_elg: EFTu_GTP_Thr4_tRNA + Ribo_ACG => EFTu_GDP + Ribo_active; kcat_ribo*Ribo_ACG*EFTu_GTP_Thr4_tRNA/(EFTu_GTP_Thr4_tRNA + kM_TC); Thr4_ACG_elg is "Translation of codon ACG by tRNA Thr4";  // isDescribedBy pubmed:24082144
  Val1_GUU_elg: EFTu_GTP_Val1_tRNA + Ribo_GUU => EFTu_GDP + Ribo_active; kcat_ribo*Ribo_GUU*EFTu_GTP_Val1_tRNA/(EFTu_GTP_Val1_tRNA + kM_TC); Val1_GUU_elg is "Translation of codon GUU by tRNA Val1";  // isDescribedBy pubmed:24082144
  Val2_GUU_elg: EFTu_GTP_Val2_tRNA + Ribo_GUU => EFTu_GDP + Ribo_active; kcat_ribo*Ribo_GUU*EFTu_GTP_Val2_tRNA/(EFTu_GTP_Val2_tRNA + kM_TC); Val2_GUU_elg is "Translation of codon GUU by tRNA Val2";  // isDescribedBy pubmed:24082144
  Translation_termination: Ribo_active => Ribo_free; ; Translation_termination is "Translaion termination";
  Tu_exchange: => EFTu; ; Tu_exchange is "Exchange of EF-Tu";
  Ts_exchange: => EFTs; ; Ts_exchange is "Exchange of EF-Ts";
  GDP_exchange: $GDP => ; ; GDP_exchange is "Exchange of GDP";
  GTP_exchange: => $GTP; ; GTP_exchange is "Exchange of GTP";
  Ribosome_exchange: => Ribo_free; ; Ribosome_exchange is "Exchange of Ribosome";
  mRNA_exchange: => mRNA; ; mRNA_exchange is "Exchange of mRNA";
  Ala1B_tRNA_exchange: => Ala1B_tRNA; ; Ala1B_tRNA_exchange is "Exchange of tRNA Ala1B";
  Ala2_tRNA_exchange: => Ala2_tRNA; ; Ala2_tRNA_exchange is "Exchange of tRNA Ala2";
  Arg2_tRNA_exchange: => Arg2_tRNA; ; Arg2_tRNA_exchange is "Exchange of tRNA Arg2";
  Arg3_tRNA_exchange: => Arg3_tRNA; ; Arg3_tRNA_exchange is "Exchange of tRNA Arg3";
  Arg4_tRNA_exchange: => Arg4_tRNA; ; Arg4_tRNA_exchange is "Exchange of tRNA Arg4";
  Arg5_tRNA_exchange: => Arg5_tRNA; ; Arg5_tRNA_exchange is "Exchange of tRNA Arg5";
  Asn_tRNA_exchange: => Asn_tRNA; ; Asn_tRNA_exchange is "Exchange of tRNA Asn";
  Asp1_tRNA_exchange: => Asp1_tRNA; ; Asp1_tRNA_exchange is "Exchange of tRNA Asp1";
  Cys_tRNA_exchange: => Cys_tRNA; ; Cys_tRNA_exchange is "Exchange of tRNA Cys";
  Gln1_tRNA_exchange: => Gln1_tRNA; ; Gln1_tRNA_exchange is "Exchange of tRNA Gln1";
  Gln2_tRNA_exchange: => Gln2_tRNA; ; Gln2_tRNA_exchange is "Exchange of tRNA Gln2";
  Glu2_tRNA_exchange: => Glu2_tRNA; ; Glu2_tRNA_exchange is "Exchange of tRNA Glu2";
  Gly1_tRNA_exchange: => Gly1_tRNA; ; Gly1_tRNA_exchange is "Exchange of tRNA Gly1";
  Gly2_tRNA_exchange: => Gly2_tRNA; ; Gly2_tRNA_exchange is "Exchange of tRNA Gly2";
  Gly3_tRNA_exchange: => Gly3_tRNA; ; Gly3_tRNA_exchange is "Exchange of tRNA Gly3";
  His_tRNA_exchange: => His_tRNA; ; His_tRNA_exchange is "Exchange of tRNA His";
  Ile1_tRNA_exchange: => Ile1_tRNA; ; Ile1_tRNA_exchange is "Exchange of tRNA Ile1";
  Ile2_tRNA_exchange: => Ile2_tRNA; ; Ile2_tRNA_exchange is "Exchange of tRNA Ile2";
  Leu1_tRNA_exchange: => Leu1_tRNA; ; Leu1_tRNA_exchange is "Exchange of tRNA Leu1";
  Leu3_tRNA_exchange: => Leu3_tRNA; ; Leu3_tRNA_exchange is "Exchange of tRNA Leu3";
  Leu2_tRNA_exchange: => Leu2_tRNA; ; Leu2_tRNA_exchange is "Exchange of tRNA Leu2";
  Leu4_tRNA_exchange: => Leu4_tRNA; ; Leu4_tRNA_exchange is "Exchange of tRNA Leu4";
  Leu5_tRNA_exchange: => Leu5_tRNA; ; Leu5_tRNA_exchange is "Exchange of tRNA Leu5";
  Lys_tRNA_exchange: => Lys_tRNA; ; Lys_tRNA_exchange is "Exchange of tRNA Lys";
  Met_tRNA_exchange: => Met_tRNA; ; Met_tRNA_exchange is "Exchange of tRNA Met";
  Phe_tRNA_exchange: => Phe_tRNA; ; Phe_tRNA_exchange is "Exchange of tRNA Phe";
  Pro1_tRNA_exchange: => Pro1_tRNA; ; Pro1_tRNA_exchange is "Exchange of tRNA Pro1";
  Pro3_tRNA_exchange: => Pro3_tRNA; ; Pro3_tRNA_exchange is "Exchange of tRNA Pro3";
  Pro2_tRNA_exchange: => Pro2_tRNA; ; Pro2_tRNA_exchange is "Exchange of tRNA Pro2";
  Ser1_tRNA_exchange: => Ser1_tRNA; ; Ser1_tRNA_exchange is "Exchange of tRNA Ser1";
  Ser2_tRNA_exchange: => Ser2_tRNA; ; Ser2_tRNA_exchange is "Exchange of tRNA Ser2";
  Ser5_tRNA_exchange: => Ser5_tRNA; ; Ser5_tRNA_exchange is "Exchange of tRNA Ser5";
  Ser3_tRNA_exchange: => Ser3_tRNA; ; Ser3_tRNA_exchange is "Exchange of tRNA Ser3";
  Thr13_tRNA_exchange: => Thr13_tRNA; ; Thr13_tRNA_exchange is "Exchange of tRNA Thr13";
  Thr4_tRNA_exchange: => Thr4_tRNA; ; Thr4_tRNA_exchange is "Exchange of tRNA Thr4";
  Thr2_tRNA_exchange: => Thr2_tRNA; ; Thr2_tRNA_exchange is "Exchange of tRNA Thr2";
  Trp_tRNA_exchange: => Trp_tRNA; ; Trp_tRNA_exchange is "Exchange of tRNA Trp";
  Tyr12_tRNA_exchange: => Tyr12_tRNA; ; Tyr12_tRNA_exchange is "Exchange of tRNA Tyr12";
  Val1_tRNA_exchange: => Val1_tRNA; ; Val1_tRNA_exchange is "Exchange of tRNA Val1";
  Val2_tRNA_exchange: => Val2_tRNA; ; Val2_tRNA_exchange is "Exchange of tRNA Val2";

  // Unit definitions:
  unit micromolar = 1e-6 mole / litre;
  unit micromole = 1e-6 mole;
  unit per_second = 1 / second;
  unit per_micromolar_per_second = 1000000 litre / (mole * second);
  unit micromolar_per_second = 1e-6 mole / (litre * second);
  unit kDa = 1000 gram / mole;
end
