// SBML level 2 version 4

function inflamm_by_aec_kin(c2, HYP, AEC, CYT)
  c2*HYP*AEC*(1 - CYT);
end

function recruit_neu_kin(t, t_switch, n1, CYT)
  piecewise(n1*CYT, t < t_switch, 0);
end

function depletion_neu_0(t, t_switch, n2, CYT, NEU)
  piecewise(n2*NEU*CYT, (t > t_switch) && (NEU > 0), 0);
end

function swelling_kin(R0, sigma, t, r1)
  R0*(1/(2*pi*sigma^2))^(1/2)*exp(-(t - r1)^2/(2*sigma^2));
end

function germination_kin(SWO, sigma, t, r1, s1)
  SWO*(1/(2*pi*sigma^2))^(1/2)*exp(-(t - (r1 + s1))^2/(2*sigma^2));
end

function hyp_growth_kin(h1, AEC, L0, HYP)
  h1*(AEC/L0)*HYP;
end

function lysis_am_by_swo_kin(m3, M, S, sigma, t, r1, s1)
  m3*M*S*(1/(2*pi*sigma^2))^(1/2)*exp(-(t - (r1 + s1))^2/(2*sigma^2));
end

function inflamm_by_am_kin(c1, SWO, HYP, AM, CYT)
  c1*(SWO + HYP)*AM*(1 - CYT);
end

function recruit_am_kin(t, t_switch, m1, CYT)
  piecewise(m1*CYT, t < t_switch, 0);
end

function depletion_am_0(t, t_switch, AM, m2, CYT)
  piecewise(m2*AM*CYT, (t > t_switch) && (AM > 0), 0);
end

model Invasive_Aspergillosis___Ewald_2021()
  // Ewald2021 - Innate immune response during invasive aspergillosis by dynamic optimization
  // Aspergillus fumigatus is an important human fungal pathogen and its conidia are constantly inhaled by humans. In immunocompromised individuals, conidia can grow out as hyphae that damage lung epithelium. The resulting invasive aspergillosis is associated with devastating mortality rates. Since infection is a race between the innate immune system and the outgrowth of A. fumigatus conidia, we use dynamic optimization to obtain insight into the recruitment and depletion of alveolar macrophages and neutrophils. We illustrate by modeling the active, but so far neglected, major role of alveolar epithelial cells in phagocytosis and cytokine release as well as the importance of fungal growth states for virulence. Hence, we discovered that germination speed is a key virulence trait of fungal pathogens due to the vulnerability of conidia against host defense. We proved this by linking measured germination kinetics of four Aspergillus spp. with their cytotoxicity against epithelial cells in silico and in vitro.Furthermore, we could reveal by modeling and ex vivo measurements, that epithelial cells are not only important phagocytes to clear conidia, but also potent mediators of cytokine release. In conclusion, our findings illustrate an underestimated role of epithelial cells in invasive aspergillosis. Further, our model affirms the importance of neutrophils and underlines that the role of macrophages in invasive aspergillosis remains elusive. We expect that our model will contribute to improvement of treatment protocols by focusing on the critical components of immune response to fungi but also fungal virulence.
  // hasProperty mamo:MAMO_0000046

  // Compartments:
  compartment Alveolus = 1;

  // Species:
  species NEU in Alveolus = 0.2628;
  species AEC in Alveolus = 11.43;
  species AM in Alveolus = 0.2926;
  species SWO in Alveolus = 0;
  species CYT in Alveolus = 0;
  species HYP in Alveolus = 0;

  // Reactions:
  swelling: => SWO; Alveolus*swelling_kin(R0, swelling_sigma, time, swelling_r1);
    R0 = 1; swelling_sigma = 1; swelling_r1 = 3;
  germination: SWO => HYP; Alveolus*germination_kin(SWO, germination_sigma, time, germination_r1, germination_s1);
    germination_sigma = 1; germination_r1 = 3; germination_s1 = 4;
  hyph_growth: HYP + AEC => 2 HYP + AEC; Alveolus*hyp_growth_kin(h1, HYP, L0, AEC);
    h1 = 0.6533; L0 = 11.43;
  killing_swo_by_am: SWO + AM => AM; Alveolus*killing_swo_by_am_k1*SWO*AM;
    killing_swo_by_am_k1 = 0.4263;
  killing_swo_by_neu: SWO + NEU => NEU; Alveolus*killing_swo_by_neu_k1*SWO*NEU;
    killing_swo_by_neu_k1 = 0.2354;
  killing_swo_by_aec: SWO + AEC => AEC; Alveolus*killing_swo_by_aec_k1*SWO*AEC;
    killing_swo_by_aec_k1 = 0.2278;
  killing_hyp_by_neu: HYP + NEU => NEU; Alveolus*killing_hyp_by_neu_k1*HYP*NEU;
    killing_hyp_by_neu_k1 = 0.7497;
  lysis_am_by_swo: AM + SWO => SWO; Alveolus*lysis_am_by_swo_kin(m3, AM, SWO, lysis_am_by_swo_sigma, time, lysis_am_by_swo_r1, lysis_am_by_swo_s1);
    m3 = 0.0764; lysis_am_by_swo_sigma = 1; lysis_am_by_swo_r1 = 3; lysis_am_by_swo_s1 = 4;
  lysis_neu_by_hyp: NEU + HYP => HYP; Alveolus*lysis_neu_by_hyp_k1*NEU*HYP;
    lysis_neu_by_hyp_k1 = 0.5475;
  lysis_neu_by_swo: NEU + SWO => SWO; Alveolus*lysis_neu_by_swo_k1*NEU*SWO;
    lysis_neu_by_swo_k1 = 0.5475;
  damage_aec_by_neu: AEC + CYT + NEU => CYT + NEU; Alveolus*damage_aec_by_neu_k1*AEC*CYT*NEU;
    damage_aec_by_neu_k1 = 0.1061;
  damage_aec_by_am: AEC + CYT + AM => CYT + AM; Alveolus*damage_aec_by_am_k1*AEC*CYT*AM;
    damage_aec_by_am_k1 = 0.1288;
  inflamm_by_am: CYT => 2 CYT; Alveolus*inflamm_by_am_kin(c1, SWO, HYP, AM, CYT);  // modifiers: SWO, HYP, AM
    c1 = 1;
  inflamm_by_aec: CYT => 2 CYT; Alveolus*inflamm_by_aec_kin(c2, HYP, AEC, CYT);  // modifiers: HYP, AEC
    c2 = 1.438;
  decay_cyt: CYT => ; Alveolus*decay_cyt_k1*CYT;
    decay_cyt_k1 = 0.1;
  recruit_am: => AM; Alveolus*recruit_am_kin(time, recruit_am_t_switch, m1, CYT);  // modifiers: CYT
    recruit_am_t_switch = 1; m1 = 0.2394;
  recruit_neu: => NEU; Alveolus*recruit_neu_kin(time, recruit_neu_t_switch, n1, CYT);  // modifiers: CYT
    recruit_neu_t_switch = 10; n1 = 0.2628;
  depletion_am: AM => ; Alveolus*depletion_am_0(time, depletion_am_t_switch, AM, m2, CYT);  // modifiers: CYT
    depletion_am_t_switch = 1; m2 = 0.0798;
  depletion_neu: NEU => ; Alveolus*depletion_neu_0(time, depletion_neu_t_switch, n2, CYT, NEU);  // modifiers: CYT
    depletion_neu_t_switch = 10; n2 = 0.0594;
  damage_aec_by_hyp: AEC + HYP => HYP; Alveolus*damage_aec_by_hyp_k1*AEC*HYP;
    damage_aec_by_hyp_k1 = 0.0382;

  // Unit definitions:
  unit length = metre;
  unit area = metre^2;
  unit volume = dimensionless^0;
  unit time = 360000 second;
  unit substance = item;
end
