// SBML level 3 version 2

model Corbat2021_Apoptotic_Reaction_Model_models()
  // Apoptotic Reaction Model is an ordinary differential equation model describing every species in the apoptotic cascade and trained to simulate experiments with extrinsic or intrinsic stimuli. It is based on the model introduced by Albeck et al. 2008 and contains a missing feedback between effector caspase 3 and intrinsic caspase 9 to be able to predict results from experiments with either extrinsic and intrinsic stimuli.
  // hasProperty mamo:MAMO_0000046

  // Compartments:
  compartment default = 1;

  // Species:
  substanceOnly species __s0 in default = L_0; __s0 is "L(bf=None)";
  substanceOnly species __s1 in default = R_0; __s1 is "R(bf=None)";
  substanceOnly species __s2 in default = flip_0; __s2 is "flip(bf=None)";
  substanceOnly species __s3 in default = C8_0; __s3 is "C8(bf=None, state='pro')";
  substanceOnly species __s4 in default = BAR_0; __s4 is "BAR(bf=None)";
  substanceOnly species __s5 in default = Apaf_0; __s5 is "Apaf(bf=None, state='I')";
  substanceOnly species __s6 in default = C3_0; __s6 is "C3(bf=None, state='pro')";
  substanceOnly species __s7 in default = C6_0; __s7 is "C6(bf=None, state='pro')";
  substanceOnly species __s8 in default = PARP_0; __s8 is "PARP(bf=None, state='U')";
  substanceOnly species __s9 in default = XIAP_0; __s9 is "XIAP(bf=None)";
  substanceOnly species __s10 in default = Bid_0; __s10 is "Bid(bf=None, state='U')";
  substanceOnly species __s11 in default = Bax_0; __s11 is "Bax(bf=None, s1=None, s2=None, state='C')";
  substanceOnly species __s12 in default = Bcl2_0; __s12 is "Bcl2(bf=None)";
  substanceOnly species __s13 in default = Mito_0; __s13 is "Mito(bf=None, state='I')";
  substanceOnly species __s14 in default = Smac_0; __s14 is "Smac(bf=None, state='M')";
  substanceOnly species __s15 in default = CytoC_0; __s15 is "CytoC(bf=None, state='M')";
  substanceOnly species __s16 in default = Bcl2c_0; __s16 is "Bcl2c(b=None)";
  substanceOnly species __s17 in default = dBFP_0; __s17 is "BFP(sl=1, bf=None) ._br_BFP(sl=1, bf=None)";
  substanceOnly species __s18 in default = dCit_0; __s18 is "Cit(sl=1, bf=None) ._br_Cit(sl=1, bf=None)";
  substanceOnly species __s19 in default = dmKate_0; __s19 is "mKate(sl=1, bf=None) ._br_mKate(sl=1, bf=None)";
  substanceOnly species __s20 in default = 0; __s20 is "L(bf=1) ._br_R(bf=1)";
  substanceOnly species __s21 in default = 0; __s21 is "DISC(bf=None)";
  substanceOnly species __s22 in default = 0; __s22 is "C8(bf=1, state='pro') ._br_DISC(bf=1)";
  substanceOnly species __s23 in default = 0; __s23 is "DISC(bf=1) ._br_flip(bf=1)";
  substanceOnly species __s24 in default = 0; __s24 is "C8(bf=None, state='A')";
  substanceOnly species __s25 in default = 0; __s25 is "Bid(bf=1, state='U') ._br_C8(bf=1, state='A')";
  substanceOnly species __s26 in default = 0; __s26 is "BAR(bf=1) ._br_C8(bf=1, state='A')";
  substanceOnly species __s27 in default = 0; __s27 is "C3(bf=1, state='pro') ._br_C8(bf=1, state='A')";
  substanceOnly species __s28 in default = 0; __s28 is "C8(bf=1, state='A') ._br_mKate(sl=2, bf=1) ._br_mKate(sl=2, bf=None)";
  substanceOnly species __s29 in default = 0; __s29 is "Bid(bf=None, state='T')";
  substanceOnly species __s30 in default = 0; __s30 is "C3(bf=None, state='A')";
  substanceOnly species __s31 in default = 0; __s31 is "mKate(sl=None, bf=None)";
  substanceOnly species __s32 in default = 0; __s32 is "C3(bf=1, state='A') ._br_XIAP(bf=1)";
  substanceOnly species __s33 in default = 0; __s33 is "C3(bf=1, state='A') ._br_PARP(bf=1, state='U')";
  substanceOnly species __s34 in default = 0; __s34 is "C3(bf=1, state='A') ._br_C6(bf=1, state='pro')";
  substanceOnly species __s35 in default = 0; __s35 is "Bax(bf=1, s1=None, s2=None, state='C') ._br_Bid(bf=1, state='T')";
  substanceOnly species __s36 in default = 0; __s36 is "Bcl2c(b=1) ._br_Bid(bf=1, state='T')";
  substanceOnly species __s37 in default = 0; __s37 is "BFP(sl=2, bf=1) ._br_BFP(sl=2, bf=None) ._br_C3(bf=1, state='A')";
  substanceOnly species __s38 in default = 0; __s38 is "C3(bf=None, state='ub')";
  substanceOnly species __s39 in default = 0; __s39 is "PARP(bf=None, state='C')";
  substanceOnly species __s40 in default = 0; __s40 is "C6(bf=None, state='A')";
  substanceOnly species __s41 in default = 0; __s41 is "Bax(bf=None, s1=None, s2=None, state='A')";
  substanceOnly species __s42 in default = 0; __s42 is "BFP(sl=None, bf=None)";
  substanceOnly species __s43 in default = 0; __s43 is "C6(bf=1, state='A') ._br_C8(bf=1, state='pro')";
  substanceOnly species __s44 in default = 0; __s44 is "Bax(bf=None, s1=None, s2=None, state='M')";
  substanceOnly species __s45 in default = 0; __s45 is "Bax(bf=None, s1=1, s2=None, state='M') ._br_Bax(bf=None, s1=None, s2=1, state='M')";
  substanceOnly species __s46 in default = 0; __s46 is "Bax(bf=1, s1=None, s2=None, state='M') ._br_Bcl2(bf=1)";
  substanceOnly species __s47 in default = 0; __s47 is "Bax(bf=None, s1=1, s2=2, state='M') ._br_Bax(bf=None, s1=3, s2=1, state='M') ._br_Bax(bf=None, s1=4, s2=3, state='M') ._br_Bax(bf=None, s1=2, s2=4, state='M')";
  substanceOnly species __s48 in default = 0; __s48 is "Bax(bf=1, s1=None, s2=2, state='M') ._br_Bax(bf=None, s1=2, s2=None, state='M') ._br_Bcl2(bf=1)";
  substanceOnly species __s49 in default = 0; __s49 is "Bax(bf=1, s1=2, s2=3, state='M') ._br_Bax(bf=None, s1=4, s2=2, state='M') ._br_Bax(bf=None, s1=5, s2=4, state='M') ._br_Bax(bf=None, s1=3, s2=5, state='M') ._br_Bcl2(bf=1)";
  substanceOnly species __s50 in default = 0; __s50 is "Bax(bf=1, s1=2, s2=3, state='M') ._br_Bax(bf=None, s1=4, s2=2, state='M') ._br_Bax(bf=None, s1=5, s2=4, state='M') ._br_Bax(bf=None, s1=3, s2=5, state='M') ._br_Mito(bf=1, state='I')";
  substanceOnly species __s51 in default = 0; __s51 is "Mito(bf=None, state='A')";
  substanceOnly species __s52 in default = 0; __s52 is "Mito(bf=1, state='A') ._br_Smac(bf=1, state='M')";
  substanceOnly species __s53 in default = 0; __s53 is "CytoC(bf=1, state='M') ._br_Mito(bf=1, state='A')";
  substanceOnly species __s54 in default = 0; __s54 is "Smac(bf=None, state='C')";
  substanceOnly species __s55 in default = 0; __s55 is "CytoC(bf=None, state='C')";
  substanceOnly species __s56 in default = 0; __s56 is "Smac(bf=None, state='A')";
  substanceOnly species __s57 in default = 0; __s57 is "CytoC(bf=None, state='A')";
  substanceOnly species __s58 in default = 0; __s58 is "Apaf(bf=1, state='I') ._br_CytoC(bf=1, state='A')";
  substanceOnly species __s59 in default = 0; __s59 is "Smac(bf=1, state='A') ._br_XIAP(bf=1)";
  substanceOnly species __s60 in default = 0; __s60 is "Apaf(bf=None, state='A')";
  substanceOnly species __s61 in default = 0; __s61 is "Apaf(bf=1, state='A') ._br_C3(bf=1, state='pro')";
  substanceOnly species __s62 in default = 0; __s62 is "Apaf(bf=1, state='A') ._br_C3(bf=1, state='A')";
  substanceOnly species __s63 in default = 0; __s63 is "Apaf(bf=1, state='A') ._br_XIAP(bf=1)";
  substanceOnly species __s64 in default = 0; __s64 is "Apaf(bf=1, state='A') ._br_Cit(sl=2, bf=1) ._br_Cit(sl=2, bf=None)";
  substanceOnly species __s65 in default = 0; __s65 is "Apop(bf=None)";
  substanceOnly species __s66 in default = 0; __s66 is "Cit(sl=None, bf=None)";
  substanceOnly species __s67 in default = 0; __s67 is "Apop(bf=1) ._br_C3(bf=1, state='pro')";
  substanceOnly species __s68 in default = 0; __s68 is "Apop(bf=1) ._br_Cit(sl=2, bf=1) ._br_Cit(sl=2, bf=None)";

  // Parameters:
  L_0 = 1000;
  R_0 = 200;
  flip_0 = 100;
  C8_0 = 20000;
  BAR_0 = 1000;
  bind_L_R_to_LR_kf = 4e-7;
  bind_L_R_to_LR_kr = 0.001;
  convert_LR_to_DISC_kc = 1e-5;
  bind_DISC_C8pro_to_DISCC8pro_kf = 1e-6;
  bind_DISC_C8pro_to_DISCC8pro_kr = 0.001;
  catalyze_DISCC8pro_to_DISC_C8A_kc = 1;
  bind_C8A_BidU_to_C8ABidU_kf = 1e-7;
  bind_C8A_BidU_to_C8ABidU_kr = 0.001;
  catalyze_C8ABidU_to_C8A_BidT_kc = 1;
  bind_DISC_flip_kf = 1e-6;
  bind_DISC_flip_kr = 0.001;
  bind_BAR_C8A_kf = 1e-6;
  bind_BAR_C8A_kr = 0.001;
  Apaf_0 = 1000;
  C3_0 = 10000;
  C6_0 = 10000;
  XIAP_0 = 10000;
  PARP_0 = 1000000;
  equilibrate_SmacC_to_SmacA_kf = 0.01;
  equilibrate_SmacC_to_SmacA_kr = 0.01;
  equilibrate_CytoCC_to_CytoCA_kf = 0.01;
  equilibrate_CytoCC_to_CytoCA_kr = 0.01;
  bind_CytoCA_ApafI_to_CytoCAApafI_kf = 5e-7;
  bind_CytoCA_ApafI_to_CytoCAApafI_kr = 0.001;
  catalyze_CytoCAApafI_to_CytoCA_ApafA_kc = 1;
  bind_ApafA_C3pro_to_ApafAC3pro_kf = 5e-9;
  bind_ApafA_C3pro_to_ApafAC3pro_kr = 0.001;
  catalyze_ApafAC3pro_to_ApafA_C3A_kc = 1;
  bind_C3A_ApafA_to_C3AApafA_kf = 1.3e-6;
  bind_C3A_ApafA_to_C3AApafA_kr = 0.001;
  catalyze_C3AApafA_to_C3A_Apop_kc = 1;
  bind_Apop_C3pro_to_ApopC3pro_kf = 5e-9;
  bind_Apop_C3pro_to_ApopC3pro_kr = 0.001;
  catalyze_ApopC3pro_to_Apop_C3A_kc = 1;
  bind_ApafA_XIAP_kf = 2e-6;
  bind_ApafA_XIAP_kr = 0.001;
  bind_SmacA_XIAP_kf = 7e-6;
  bind_SmacA_XIAP_kr = 0.001;
  bind_C8A_C3pro_to_C8AC3pro_kf = 1e-7;
  bind_C8A_C3pro_to_C8AC3pro_kr = 0.001;
  catalyze_C8AC3pro_to_C8A_C3A_kc = 1;
  bind_XIAP_C3A_to_XIAPC3A_kf = 2e-6;
  bind_XIAP_C3A_to_XIAPC3A_kr = 0.001;
  catalyze_XIAPC3A_to_XIAP_C3ub_kc = 0.1;
  bind_C3A_PARPU_to_C3APARPU_kf = 1e-6;
  bind_C3A_PARPU_to_C3APARPU_kr = 0.01;
  catalyze_C3APARPU_to_C3A_PARPC_kc = 1;
  bind_C3A_C6pro_to_C3AC6pro_kf = 1e-6;
  bind_C3A_C6pro_to_C3AC6pro_kr = 0.001;
  catalyze_C3AC6pro_to_C3A_C6A_kc = 1;
  bind_C6A_C8pro_to_C6AC8pro_kf = 3e-8;
  bind_C6A_C8pro_to_C6AC8pro_kr = 0.001;
  catalyze_C6AC8pro_to_C6A_C8A_kc = 1;
  Bid_0 = 40000;
  Bax_0 = 100000;
  Bcl2_0 = 20000;
  bind_BidT_BaxC_to_BidTBaxC_kf = 1e-7;
  bind_BidT_BaxC_to_BidTBaxC_kr = 0.001;
  catalyze_BidTBaxC_to_BidT_BaxA_kc = 1;
  equilibrate_BaxA_to_BaxM_kf = 0.01;
  equilibrate_BaxA_to_BaxM_kr = 0.01;
  Bax_dimerization_kf = 1.428571e-5;
  Bax_dimerization_kr = 0.001;
  Bax_tetramerization_kf = 2.857143e-5;
  Bax_tetramerization_kr = 0.0005;
  bind_BaxM_Bcl2_kf = 1.428571e-5;
  bind_BaxM_Bcl2_kr = 0.001;
  pore_bind_Bax_2_Bcl2_kf = 1.428571e-5;
  pore_bind_Bax_2_Bcl2_kr = 0.001;
  pore_bind_Bax_4_Bcl2_kf = 1.428571e-5;
  pore_bind_Bax_4_Bcl2_kr = 0.001;
  Mito_0 = 500000;
  pore_bind_Bax_4_MitoI_kf = 1.428571e-5;
  pore_bind_Bax_4_MitoI_kr = 0.001;
  Mito_activation_kc = 1;
  Smac_0 = 100000;
  CytoC_0 = 100000;
  bind_MitoA_SmacM_to_MitoASmacM_kf = 2.857143e-5;
  bind_MitoA_SmacM_to_MitoASmacM_kr = 0.001;
  catalyze_MitoASmacM_to_MitoA_SmacC_kc = 10;
  bind_MitoA_CytoCM_to_MitoACytoCM_kf = 2.857143e-5;
  bind_MitoA_CytoCM_to_MitoACytoCM_kr = 0.001;
  catalyze_MitoACytoCM_to_MitoA_CytoCC_kc = 10;
  Bcl2c_0 = 20000;
  bind_BidT_Bcl2c_kf = 1e-6;
  bind_BidT_Bcl2c_kr = 0.001;
  dBFP_0 = 750000;
  dCit_0 = 750000;
  dmKate_0 = 750000;
  bind_BFPBFP_C3A_kf = 2.8e-7;
  bind_BFPBFP_C3A_kr = 0.01;
  cleave_C3ABFPBFP_to_BFP_BFP_C3A_kc = 1;
  bind_CitCit_Apop_kf = 2.8e-7;
  bind_CitCit_Apop_kr = 0.001;
  cleave_ApopCitCit_to_Cit_Cit_Apop_kc = 1;
  bind_mKatemKate_C8A_kf = 5.4e-8;
  bind_mKatemKate_C8A_kr = 0.001;
  cleave_C8AmKatemKate_to_mKate_mKate_C8A_kc = 1;
  bind_CitCit_ApafA_kf = 2e-10;
  bind_CitCit_ApafA_kr = 0.001;
  cleave_ApafACitCit_to_Cit_Cit_ApafA_kc = 1;

  // Reactions:
  bind_L_R_to_LR: __s0 + __s1 -> __s20; __s0*__s1*bind_L_R_to_LR_kf - __s20*bind_L_R_to_LR_kr;
  convert_LR_to_DISC: __s20 => __s21; __s20*convert_LR_to_DISC_kc;
  bind_DISC_C8pro_to_DISCC8pro: __s3 + __s21 -> __s22; __s21*__s3*bind_DISC_C8pro_to_DISCC8pro_kf - __s22*bind_DISC_C8pro_to_DISCC8pro_kr;
  bind_DISC_flip: __s2 + __s21 -> __s23; __s2*__s21*bind_DISC_flip_kf - __s23*bind_DISC_flip_kr;
  catalyze_DISCC8pro_to_DISC_C8A: __s22 => __s21 + __s24; __s22*catalyze_DISCC8pro_to_DISC_C8A_kc;
  bind_C8A_BidU_to_C8ABidU: __s10 + __s24 -> __s25; __s10*__s24*bind_C8A_BidU_to_C8ABidU_kf - __s25*bind_C8A_BidU_to_C8ABidU_kr;
  bind_BAR_C8A: __s4 + __s24 -> __s26; __s24*__s4*bind_BAR_C8A_kf - __s26*bind_BAR_C8A_kr;
  bind_C8A_C3pro_to_C8AC3pro: __s6 + __s24 -> __s27; __s24*__s6*bind_C8A_C3pro_to_C8AC3pro_kf - __s27*bind_C8A_C3pro_to_C8AC3pro_kr;
  bind_mKatemKate_C8A: __s19 + __s24 -> __s28; 2*__s19*__s24*bind_mKatemKate_C8A_kf - __s28*bind_mKatemKate_C8A_kr;
  catalyze_C8ABidU_to_C8A_BidT: __s25 => __s24 + __s29; __s25*catalyze_C8ABidU_to_C8A_BidT_kc;
  catalyze_C8AC3pro_to_C8A_C3A: __s27 => __s24 + __s30; __s27*catalyze_C8AC3pro_to_C8A_C3A_kc;
  r11: __s28 => __s24 + __s31 + __s31; __s28*cleave_C8AmKatemKate_to_mKate_mKate_C8A_kc; r11 is "cleave_C8AmKatemKate_to_mKate_mKate_C8A";
  bind_XIAP_C3A_to_XIAPC3A: __s9 + __s30 -> __s32; __s30*__s9*bind_XIAP_C3A_to_XIAPC3A_kf - __s32*bind_XIAP_C3A_to_XIAPC3A_kr;
  bind_C3A_PARPU_to_C3APARPU: __s8 + __s30 -> __s33; __s30*__s8*bind_C3A_PARPU_to_C3APARPU_kf - __s33*bind_C3A_PARPU_to_C3APARPU_kr;
  bind_C3A_C6pro_to_C3AC6pro: __s7 + __s30 -> __s34; __s30*__s7*bind_C3A_C6pro_to_C3AC6pro_kf - __s34*bind_C3A_C6pro_to_C3AC6pro_kr;
  bind_BidT_BaxC_to_BidTBaxC: __s11 + __s29 -> __s35; __s11*__s29*bind_BidT_BaxC_to_BidTBaxC_kf - __s35*bind_BidT_BaxC_to_BidTBaxC_kr;
  bind_BidT_Bcl2c: __s16 + __s29 -> __s36; __s16*__s29*bind_BidT_Bcl2c_kf - __s36*bind_BidT_Bcl2c_kr;
  bind_BFPBFP_C3A: __s17 + __s30 -> __s37; 2*__s17*__s30*bind_BFPBFP_C3A_kf - __s37*bind_BFPBFP_C3A_kr;
  catalyze_XIAPC3A_to_XIAP_C3ub: __s32 => __s9 + __s38; __s32*catalyze_XIAPC3A_to_XIAP_C3ub_kc;
  catalyze_C3APARPU_to_C3A_PARPC: __s33 => __s30 + __s39; __s33*catalyze_C3APARPU_to_C3A_PARPC_kc;
  catalyze_C3AC6pro_to_C3A_C6A: __s34 => __s30 + __s40; __s34*catalyze_C3AC6pro_to_C3A_C6A_kc;
  catalyze_BidTBaxC_to_BidT_BaxA: __s35 => __s29 + __s41; __s35*catalyze_BidTBaxC_to_BidT_BaxA_kc;
  cleave_C3ABFPBFP_to_BFP_BFP_C3A: __s37 => __s30 + __s42 + __s42; __s37*cleave_C3ABFPBFP_to_BFP_BFP_C3A_kc;
  bind_C6A_C8pro_to_C6AC8pro: __s3 + __s40 -> __s43; __s3*__s40*bind_C6A_C8pro_to_C6AC8pro_kf - __s43*bind_C6A_C8pro_to_C6AC8pro_kr;
  equilibrate_BaxA_to_BaxM: __s41 -> __s44; __s41*equilibrate_BaxA_to_BaxM_kf - __s44*equilibrate_BaxA_to_BaxM_kr;
  catalyze_C6AC8pro_to_C6A_C8A: __s43 => __s24 + __s40; __s43*catalyze_C6AC8pro_to_C6A_C8A_kc;
  Bax_dimerization: __s44 + __s44 -> __s45; __s44^2*Bax_dimerization_kf - __s45*Bax_dimerization_kr;
  bind_BaxM_Bcl2: __s12 + __s44 -> __s46; __s12*__s44*bind_BaxM_Bcl2_kf - __s46*bind_BaxM_Bcl2_kr;
  Bax_tetramerization: __s45 + __s45 -> __s47; 0.5*__s45^2*Bax_tetramerization_kf - 2*__s47*Bax_tetramerization_kr;
  pore_bind_Bax_2_Bcl2: __s12 + __s45 -> __s48; __s12*__s45*pore_bind_Bax_2_Bcl2_kf - __s48*pore_bind_Bax_2_Bcl2_kr;
  pore_bind_Bax_4_Bcl2: __s12 + __s47 -> __s49; __s12*__s47*pore_bind_Bax_4_Bcl2_kf - __s49*pore_bind_Bax_4_Bcl2_kr;
  pore_bind_Bax_4_MitoI: __s13 + __s47 -> __s50; __s13*__s47*pore_bind_Bax_4_MitoI_kf - __s50*pore_bind_Bax_4_MitoI_kr;
  Mito_activation: __s50 => __s51; __s50*Mito_activation_kc;
  bind_MitoA_SmacM_to_MitoASmacM: __s14 + __s51 -> __s52; __s14*__s51*bind_MitoA_SmacM_to_MitoASmacM_kf - __s52*bind_MitoA_SmacM_to_MitoASmacM_kr;
  bind_MitoA_CytoCM_to_MitoACytoCM: __s15 + __s51 -> __s53; __s15*__s51*bind_MitoA_CytoCM_to_MitoACytoCM_kf - __s53*bind_MitoA_CytoCM_to_MitoACytoCM_kr;
  r35: __s52 => __s51 + __s54; __s52*catalyze_MitoASmacM_to_MitoA_SmacC_kc; r35 is "catalyze_MitoASmacM_to_MitoA_SmacC";
  r36: __s53 => __s51 + __s55; __s53*catalyze_MitoACytoCM_to_MitoA_CytoCC_kc; r36 is "catalyze_MitoACytoCM_to_MitoA_CytoCC";
  equilibrate_SmacC_to_SmacA: __s54 -> __s56; __s54*equilibrate_SmacC_to_SmacA_kf - __s56*equilibrate_SmacC_to_SmacA_kr;
  equilibrate_CytoCC_to_CytoCA: __s55 -> __s57; __s55*equilibrate_CytoCC_to_CytoCA_kf - __s57*equilibrate_CytoCC_to_CytoCA_kr;
  bind_CytoCA_ApafI_to_CytoCAApafI: __s5 + __s57 -> __s58; __s5*__s57*bind_CytoCA_ApafI_to_CytoCAApafI_kf - __s58*bind_CytoCA_ApafI_to_CytoCAApafI_kr;
  bind_SmacA_XIAP: __s9 + __s56 -> __s59; __s56*__s9*bind_SmacA_XIAP_kf - __s59*bind_SmacA_XIAP_kr;
  r41: __s58 => __s57 + __s60; __s58*catalyze_CytoCAApafI_to_CytoCA_ApafA_kc; r41 is "catalyze_CytoCAApafI_to_CytoCA_ApafA";
  bind_ApafA_C3pro_to_ApafAC3pro: __s6 + __s60 -> __s61; __s6*__s60*bind_ApafA_C3pro_to_ApafAC3pro_kf - __s61*bind_ApafA_C3pro_to_ApafAC3pro_kr;
  bind_C3A_ApafA_to_C3AApafA: __s30 + __s60 -> __s62; __s30*__s60*bind_C3A_ApafA_to_C3AApafA_kf - __s62*bind_C3A_ApafA_to_C3AApafA_kr;
  bind_ApafA_XIAP: __s9 + __s60 -> __s63; __s60*__s9*bind_ApafA_XIAP_kf - __s63*bind_ApafA_XIAP_kr;
  bind_CitCit_ApafA: __s18 + __s60 -> __s64; 2*__s18*__s60*bind_CitCit_ApafA_kf - __s64*bind_CitCit_ApafA_kr;
  catalyze_ApafAC3pro_to_ApafA_C3A: __s61 => __s30 + __s60; __s61*catalyze_ApafAC3pro_to_ApafA_C3A_kc;
  catalyze_C3AApafA_to_C3A_Apop: __s62 => __s30 + __s65; __s62*catalyze_C3AApafA_to_C3A_Apop_kc;
  r48: __s64 => __s60 + __s66 + __s66; __s64*cleave_ApafACitCit_to_Cit_Cit_ApafA_kc; r48 is "cleave_ApafACitCit_to_Cit_Cit_ApafA";
  bind_Apop_C3pro_to_ApopC3pro: __s6 + __s65 -> __s67; __s6*__s65*bind_Apop_C3pro_to_ApopC3pro_kf - __s67*bind_Apop_C3pro_to_ApopC3pro_kr;
  bind_CitCit_Apop: __s18 + __s65 -> __s68; 2*__s18*__s65*bind_CitCit_Apop_kf - __s68*bind_CitCit_Apop_kr;
  catalyze_ApopC3pro_to_Apop_C3A: __s67 => __s30 + __s65; __s67*catalyze_ApopC3pro_to_Apop_C3A_kc;
  r52: __s68 => __s65 + __s66 + __s66; __s68*cleave_ApopCitCit_to_Cit_Cit_Apop_kc; r52 is "cleave_ApopCitCit_to_Cit_Cit_Apop";
end
