// SBML level 2 version 4
// dcterms:bibliographicCitation: urn:miriam:pubmed:32493951

function Rate_Law_for_Treg_increase(a_DR, D_m, a_IR, I_2, p_R, m_R, R_1, a_XR, X_1, X_2)
  a_DR*D_m + a_IR*I_2 + p_R*m_R*R_1 + a_XR*(X_1 + X_2);
end

function Rate_Law_for_Treg_death_inactivation(mu_R, R_2, k_antiRR, AR)
  mu_R*R_2 + k_antiRR*AR*R_2;
end

function Rate_Law_for_IL_2_production(a_CI, C_2)
  a_CI*C_2;
end
Rate_Law_for_IL_2_production is "Rate Law for IL-2_production";

function Rate_Law_for_Androgen_proliferation(A, lambda_A)
  lambda_A*(1 - A);
end

function Rate_Law_for_Androgen_depletion(lambda_A, Boolean_CX)
  lambda_A*Boolean_CX;
end

function Rate_Law_for_CTLs_lymphoid_increase(a_Df, D_f, a_IC, C_1, I_1, s_I)
  a_Df*D_f + a_IC*(C_1*I_1/(s_I + I_1));
end

function Rate_Law_for_Treg_lymphoid_proliferation(a_DrR, D_r, a_IR, I_1)
  a_DrR*D_r + a_IR*I_1;
end

function Rate_Law_for_CTLs_lymphoid_transformation(a_DfDr, D_f)
  a_DfDr*D_f;
end

function Rate_Law_for_MDSC_increase(rho_M, a_XM, X_1, X_2, s_M)
  rho_M + a_XM*((X_1 + X_2)/(s_M + X_1 + X_2));
end

function Rate_Law_for_CTLs_migration_lymphoid(p_D, m_D, D_m)
  p_D*m_D*D_m;
end

function Rate_Law_for_ADPC_death(mu_1, A, X_1, k_CX, delta_ICB, ICB, C_2, k_NX, k_RN, R_2, k_MN, M, N)
  mu_1*(1 - A)*X_1 + k_CX*(1 + delta_ICB*ICB)*C_2*X_1 + k_NX*(exponentiale^(-k_RN*R_2) + exponentiale^(-k_MN*M))*N*X_1;
end

function Rate_Law_for_ADPC_mutation(r_M, A, X_1)
  r_M*(1 - A)*X_1;
end

function Rate_Law_for_CTLs_inhibition_death(k_RC, R_2, C_2, k_MC, M, mu_C)
  k_RC*R_2*C_2 + k_MC*M*C_2 + mu_C*C_2;
end

function Rate_Law_for_DCs_mature_increase(a_VD, V, a_XD, mu_1, A, X_1, mu_2, X_2, k_CX, delta_ICB, ICB, C_2, k_NX, k_RN, R_2, k_MN, M, N)
  a_VD*V + a_XD*(mu_1*(1 - A)*X_1 + mu_2*X_2 + k_CX*(1 + delta_ICB*ICB)*C_2*(X_1 + X_2) + k_NX*(exponentiale^(-k_RN*R_2) + exponentiale^(-k_MN*M))*N*(X_1 + X_2));
end

function Rate_Law_for_MDSC_death_inactivation(mu_M, M, k_antiMM, AM)
  mu_M*M + k_antiMM*AM*M;
end

function Rate_Law_for_ADPC_proliferation(r_p1, A, X_1)
  r_p1*A*X_1;
end

function Rate_Law_for_NK_cell_death_inhibition(mu_N, N, k_XN, X_1, X_2)
  mu_N*N + k_XN*N*(X_1 + X_2);
end

function Rate_Law_for_CTLs_lymphoid_decrease(m_C, C_1, k_RC, R_1, mu_C)
  m_C*C_1 + k_RC*R_1*C_1 + mu_C*C_1;
end

function Rate_Law_for_CTLs_increase(a_DC, D_m, a_IC, C_2, I_2, p_C, m_C, C_1, s_I)
  a_DC*D_m + a_IC*(C_2*I_2/(s_I + I_2)) + p_C*m_C*C_1;
end

function Rate_Law_for_IL_2_degradation(mu_I, I_2, k_antiIl, AI)
  mu_I*I_2 + k_antiIl*AI*I_2;
end
Rate_Law_for_IL_2_degradation is "Rate Law for IL-2_degradation";

function Rate_Law_for_AIPC_proliferation(r_p2, X_2)
  r_p2*X_2;
end

function Rate_Law_for_AIPC_death(mu_2, X_2, k_CX, delta_ICB, ICB, C_2, k_NX, k_RN, R_2, k_MN, M, N)
  mu_2*X_2 + k_CX*(1 + delta_ICB*ICB)*C_2*X_2 + k_NX*(exponentiale^(-k_RN*R_2) + exponentiale^(-k_MN*M))*N*X_2;
end

function Rate_Law_for_NK_cell_proliferation(rho__N, a_IN, N, I_2, s_N)
  rho__N + a_IN*(N*I_2/(s_N + I_2));
end

function Rate_Law_for_IL_2_lymphoid_degradation(mu_I, I_1, k_antiI, AI)
  mu_I*I_1 + k_antiI*AI*I_1;
end
Rate_Law_for_IL_2_lymphoid_degradation is "Rate Law for IL-2_lymphoid_degradation";

function Rate_Law_for_Treg_lymphoid_decrease(m_R, R_1, mu_R, k_antiRR, AR)
  m_R*R_1 + mu_R*R_1 + k_antiRR*AR*R_1;
end

function Rate_Law_for_IL_2_lymphoid_production(a_CI, C_1)
  a_CI*C_1;
end
Rate_Law_for_IL_2_lymphoid_production is "Rate Law for IL-2_lymphoid_production";

model Coletti2020___QSP_model_of_prostate_cancer_immunotherapy()
  // Coletti2020 - QSP model of prostate cancer immunotherapy
  // This model is based on the publication:
  // Coletti R, Leonardelli L, Parolo S, Marchetti L. A QSP model of prostate cancer immunotherapy to identify effective combination therapies. Sci Rep. 2020 Jun 3;10(1):9063. doi: 10.1038/s41598-020-65590-0
  // Eq. 3 - no listed species "R", therefore based on Eq. 1 and 2, R_2 used instead.
  // Eq. 12 - no listed parameter "a_Df" in Table S1, a_Dc used based on parameter description.
  // Curation Comment:
  // Simulations are not reproducing manuscript plots. Matlab code is available (Supplementary File 2 of the manuscript publication) but has not been tested, so would be worth reattempting model curation.
  // isPropertyOf ncit:C15438
  // hasTaxon taxonomy:9606
  // isDescribedBy pubmed:32493951
  // hasProperty GO:0002837 DOID:10283 ncit:C94604 mamo:MAMO_0000046

  // Compartments:
  compartment Prostate_gland = 1;
  compartment Lymphoid_tissue = 1;

  // Species:
  species X_1 in Prostate_gland = 1;
  species X_2 in Prostate_gland = 0;
  species A in Prostate_gland = 1;
  species D_m in Prostate_gland = 1;
  species V in Prostate_gland = 0;
  species C_2 in Prostate_gland = 1;
  species I_2 in Prostate_gland = 1;
  species N in Prostate_gland = 1;
  species R_2 in Prostate_gland = 1;
  species M in Prostate_gland = 1;
  species D_f in Lymphoid_tissue = 1;
  species D_r in Lymphoid_tissue = 1;
  species C_1 in Lymphoid_tissue = 1;
  species R_1 in Lymphoid_tissue = 1;
  species I_1 in Lymphoid_tissue = 1;
  species AI in Prostate_gland = 0;
  species AR in Prostate_gland = 0;
  species AM in Prostate_gland = 0;
  species ICB in Prostate_gland = 0;
  species $Tumor in Prostate_gland;

  // Parameters:
  a_CI = 0.0584;
  a_DC = 0.424;
  a_DfDr = 0.0143;
  a_DR = 0.106;
  a_DrR = 0.0675;
  a_IC = 770;
  a_IN = 0.0743;
  a_IR = 0.0506;
  a_VD = 0.808;
  a_XD = 0.273;
  a_XM = 670;
  a_XR = 0.0206;
  k_antiIl = 0.714;
  k_antiMM = 75.7;
  k_antiRR = 1.43;
  k_CX = 0.000655;
  k_MC = 0.0962;
  k_MN = 3.88;
  k_NX = 0.00722;
  k_RC = 0.1;
  k_RN = 2.07;
  k_XN = 0.0016;
  m_C = 0.429;
  m_D = 0.936;
  m_R = 0.0143;
  p_C = 0.5;
  p_D = 0.5;
  p_R = 0.5;
  r_M = 0.811;
  r_p1 = 0.0363;
  r_p2 = 0.17;
  s_I = 77200;
  s_M = 18200;
  s_N = 149;
  delta_ICB = 10.9;
  lambda_A = 0.099;
  lambda_AI = 0.099;
  lambda_AM = 4.75;
  lambda_AR = 0.099;
  lambda_ICB = 0.139;
  lambda_V = 0.099;
  mu_1 = 0.0101;
  mu_2 = 0.148;
  mu_C = 0.146;
  mu_D = 0.0929;
  mu_I = 0.0305;
  mu_M = 0.294;
  mu_R = 0.0807;
  mu_N = 0.09;
  rho_M = 0.324;
  rho_N = 0.09;
  Boolean_CX = 1;

  // Assignment rules:
  Tumor := X_1 + X_2;

  // Reactions:
  ADPC_proliferation: => X_1; Prostate_gland*Rate_Law_for_ADPC_proliferation(r_p1, A, X_1);  // modifiers: A
  ADPC_death: X_1 => ; Prostate_gland*Rate_Law_for_ADPC_death(mu_1, A, X_1, k_CX, delta_ICB, ICB, C_2, k_NX, k_RN, R_2, k_MN, M, N);  // modifiers: A, ICB, C_2, R_2, M, N
  AIPC_proliferation: => X_2; Prostate_gland*Rate_Law_for_AIPC_proliferation(r_p2, X_2);
  AIPC_death: X_2 => ; Prostate_gland*Rate_Law_for_AIPC_death(mu_2, X_2, k_CX, delta_ICB, ICB, C_2, k_NX, k_RN, R_2, k_MN, M, N);  // modifiers: ICB, C_2, R_2, M, N
  DCs_mature_increase: => D_m; Prostate_gland*Rate_Law_for_DCs_mature_increase(a_VD, V, a_XD, mu_1, A, X_1, mu_2, X_2, k_CX, delta_ICB, ICB, C_2, k_NX, k_RN, R_2, k_MN, M, N);  // modifiers: V, A, X_1, X_2, ICB, C_2, R_2, M, N
  DCs_mature_migration: D_m => ; Prostate_gland*m_D*D_m;
  CTLs_increase: => C_2; Rate_Law_for_CTLs_increase(a_DC, D_m, a_IC, C_2, I_2, p_C, m_C, C_1, s_I);  // modifiers: D_m, I_2, C_1
  CTLs_inhibition_death: C_2 => ; Prostate_gland*Rate_Law_for_CTLs_inhibition_death(k_RC, R_2, C_2, k_MC, M, mu_C);  // modifiers: R_2, M
  NK_cell_proliferation: => N; Prostate_gland*Rate_Law_for_NK_cell_proliferation(rho_N, a_IN, N, I_2, s_N);  // modifiers: I_2
  NK_cell_death_inhibition: N => ; Prostate_gland*Rate_Law_for_NK_cell_death_inhibition(mu_N, N, k_XN, X_1, X_2);  // modifiers: X_1, X_2
  Treg_increase: => R_2; Rate_Law_for_Treg_increase(a_DR, D_m, a_IR, I_2, p_R, m_R, R_1, a_XR, X_1, X_2);  // modifiers: D_m, I_2, R_1, X_1, X_2
  Treg_death_inactivation: R_2 => ; Prostate_gland*Rate_Law_for_Treg_death_inactivation(mu_R, R_2, k_antiRR, AR);  // modifiers: AR
  MDSC_increase: => M; Prostate_gland*Rate_Law_for_MDSC_increase(rho_M, a_XM, X_1, X_2, s_M);  // modifiers: X_1, X_2
  MDSC_death_inactivation: M => ; Prostate_gland*Rate_Law_for_MDSC_death_inactivation(mu_M, M, k_antiMM, AM);  // modifiers: AM
  IL_2_production: => I_2; Prostate_gland*Rate_Law_for_IL_2_production(a_CI, C_2); IL_2_production is "IL-2_production";  // modifiers: C_2
  IL_2_degradation: I_2 => ; Prostate_gland*Rate_Law_for_IL_2_degradation(mu_I, I_2, k_antiIl, AI); IL_2_degradation is "IL-2_degradation";  // modifiers: AI
  Androgen_proliferation: => A; Prostate_gland*Rate_Law_for_Androgen_proliferation(A, lambda_A);
  Androgen_depletion: A => ; Prostate_gland*Rate_Law_for_Androgen_depletion(lambda_A, Boolean_CX);
  Vaccine_decay: V => ; Prostate_gland*lambda_V*V;
  Anti_IL_2_decay: AI => ; Prostate_gland*lambda_AI*AI; Anti_IL_2_decay is "Anti_IL-2_decay";
  Anti_treg_decay: AR => ; Prostate_gland*lambda_AR*AR;
  Anti_MDSC_decay: AM => ; Prostate_gland*lambda_AM*AM;
  Immune_checkpotin_blocakde_decay: ICB => ; Prostate_gland*lambda_ICB*ICB;
  ADPC_mutation: X_1 => X_2; Prostate_gland*Rate_Law_for_ADPC_mutation(r_M, A, X_1);  // modifiers: A
  DCs_functional_lymphoid_migration: => D_f; Rate_Law_for_CTLs_migration_lymphoid(p_D, m_D, D_m);  // modifiers: D_m
  DCs_functional_lymphoid_transformation: D_f => D_r; Lymphoid_tissue*Rate_Law_for_CTLs_lymphoid_transformation(a_DfDr, D_f);
  DCs_regulatory_lymphoid_death: D_r => ; Lymphoid_tissue*mu_D*D_r;
  CTLs_lymphoid_increase: => C_1; Lymphoid_tissue*Rate_Law_for_CTLs_lymphoid_increase(a_DC, D_f, a_IC, C_1, I_1, s_I);  // modifiers: D_f, I_1
  CTLs_lymphoid_decrease: C_1 => ; Lymphoid_tissue*Rate_Law_for_CTLs_lymphoid_decrease(m_C, C_1, k_RC, R_1, mu_C);  // modifiers: R_1
  Treg_lymphoid_proliferation: => R_1; Lymphoid_tissue*Rate_Law_for_Treg_lymphoid_proliferation(a_DrR, D_r, a_IR, I_1);  // modifiers: D_r, I_1
  Treg_lymphoid_decrease: R_1 => ; Rate_Law_for_Treg_lymphoid_decrease(m_R, R_1, mu_R, k_antiRR, AR);  // modifiers: AR
  IL_2_lymphoid_production: => I_1; Lymphoid_tissue*Rate_Law_for_IL_2_lymphoid_production(a_CI, C_1); IL_2_lymphoid_production is "IL-2_lymphoid_production";  // modifiers: C_1
  IL_2_lymphoid_degradation: I_1 => ; Rate_Law_for_IL_2_lymphoid_degradation(mu_I, I_1, k_antiIl, AI); IL_2_lymphoid_degradation is "IL-2_lymphoid_degradation";  // modifiers: AI

  // Unit definitions:
  unit length = metre;
  unit area = metre^2;
  unit volume = litre;
  unit time = 86400 second;
  unit substance = item;
end
