// SBML level 2 version 4
// dcterms:bibliographicCitation: urn:miriam:pubmed:33205434

function Rate_Law_for_Tumor_cell_growth(F_cure, g, U, U_max)
  F_cure*g*U*((ln(U_max) - ln(U))/ln(U_max));
end

function Rate_Law_for_Tumor_cell_death(d, C_E, U)
  d*C_E*U;
end

model Chaudhury2020___First_order_expansion_model__Eq__S1_S3()
  // Chaudhury2020 - First order expansion model of CAR-T cell and tumour kinetics
  // This ordinary differential equation model of the cellular kinetics and pharmacodynamics of CAR-T cell therapy is described in the publication:
  // Chaudhury, A., Zhu, X., Chu, L., Goliaei, A., June, C., Kearns, J. and Stein, A., 2020. Chimeric Antigen Receptor T Cell Therapies: A Review of Cellular Kinetic‐Pharmacodynamic Modeling Approaches. The Journal of Clinical Pharmacology, 60(S1).
  // DOI: 10.1002/jcph.1691
  // This model is based on equations S1-S3 from the manuscript's supplemental information.
  // A version of the approximated model, based on equations S4-S6, has been encoded separately.
  // Curation Comment:
  // There is a simulation error that has been attempted to be troubleshooted, however curation would be worth attempting again.
  // isPropertyOf ncit:C15438
  // isPropertyOf ncit:C126102
  // hasTaxon taxonomy:9606
  // isDescribedBy pubmed:33205434
  // hasProperty DOID:0060058 DOID:1240 GO:0002837 mamo:MAMO_0000046

  // Compartments:
  compartment compartment = 1;

  // Species:
  species $C_E in compartment = 10;
  species $C_P in compartment = 0;
  species U in compartment = 900;
  species $CAR_T_cells in compartment; CAR_T_cells is "CAR-T_cells";

  // Parameters:
  rho = 1;
  k_E = 0.16;
  g = 0.3;
  d = 0.0007;
  k_EP = 0.0012;
  beta = 0.0032;
  U_crit = 0.1;
  U_max = 100;
  h = 3;
  T_max = 9.3;
  h_T = 3;

  // Assignment rules:
  CAR_T_cells := C_E + C_P;
  F_cure := 1/(1 + (U_crit/U)^h);

  // Rate rules:
  C_E' = piecewise(rho*C_E, time <= T_max, -(k_EP + k_E)*C_E);
  C_P' = piecewise(0, time <= T_max, k_EP*C_E - beta*C_P);

  // Reactions:
  Tumor_cell_growth: => U; compartment*Rate_Law_for_Tumor_cell_growth(F_cure, g, U, U_max);
  Tumor_cell_death: U => ; compartment*Rate_Law_for_Tumor_cell_death(d, C_E, U);  // modifiers: C_E

  // Unit definitions:
  unit length = metre;
  unit area = metre^2;
  unit volume = 1e-6 litre;
  unit time = 86400 second;
  unit substance = item;
end
